<?xml version="1.0"?>
<?xml-stylesheet type="text/xsl" href="http://jsbsim.sourceforge.net/JSBSim.xsl"?>
<!-- Generated by hangar 0.1.0 from b52h.toml on 2026-09-26. Edit the design and rebuild; changes
     made here are overwritten.  -->
<fdm_config name="b52h" version="2.0" release="ALPHA"
            xmlns:xsi="http://www.w3.org/2001/XMLSchema-instance"
            xsi:noNamespaceSchemaLocation="http://jsbsim.sourceforge.net/JSBSim.xsd">
    <fileheader>
      <author>hangar</author>
      <filecreationdate>2026-09-26</filecreationdate>
      <version>0.1.0</version>
      <description>Boeing B-52H Stratofortress (hangar build)</description>
      <note>Aerodynamics: vortex lattice with viscous section polars, full-envelope
        strip model, slender-body fuselage (hangar). Mass: Raymer component
        weights on the geometry. Propeller: blade-element momentum theory.</note>
    </fileheader>
    <metrics>
      <wingarea unit="M2"> 371.6000 </wingarea>
      <wingspan unit="M"> 56.3800 </wingspan>
      <chord unit="M"> 7.4565 </chord>
      <htailarea unit="M2"> 82.0512 </htailarea>
      <htailarm unit="M"> 19.8155 </htailarm>
      <vtailarea unit="M2"> 39.7750 </vtailarea>
      <vtailarm unit="M"> 19.6973 </vtailarm>
      <location name="AERORP" unit="M">
        <x> 21.0538 </x>
        <y> 0.0000 </y>
        <z> -0.0848 </z>
      </location>
      <location name="EYEPOINT" unit="M">
        <x> 4.5000 </x>
        <y> 0.0000 </y>
        <z> 1.0000 </z>
      </location>
      <location name="VRP" unit="M">
        <x> 21.3000 </x>
        <y> -0.0000 </y>
        <z> -0.8000 </z>
      </location>
    </metrics>
    <mass_balance negated_crossproduct_inertia="false">
      <ixx unit="KG*M2"> 8032440.23 </ixx>
      <iyy unit="KG*M2"> 8003821.85 </iyy>
      <izz unit="KG*M2"> 15476048.70 </izz>
      <ixy unit="KG*M2"> 3.693 </ixy>
      <ixz unit="KG*M2"> 89751.809 </ixz>
      <iyz unit="KG*M2"> -4.446 </iyz>
      <emptywt unit="KG"> 83250.00 </emptywt>
      <location name="CG" unit="M">
        <x> 21.3000 </x>
        <y> -0.0000 </y>
        <z> -0.8000 </z>
      </location>
      <pointmass name="pilot">
        <weight unit="KG"> 200.00 </weight>
        <location unit="M">
          <x> 4.5000 </x>
          <y> 0.0000 </y>
          <z> 0.3000 </z>
        </location>
      </pointmass>
      <pointmass name="navigators and weapons officers">
        <weight unit="KG"> 300.00 </weight>
        <location unit="M">
          <x> 6.5000 </x>
          <y> 0.0000 </y>
          <z> -1.2000 </z>
        </location>
      </pointmass>
    </mass_balance>
    <ground_reactions>
      <contact type="BOGEY" name="Left Forward Main Gear">
        <location unit="M">
          <x> 12.0400 </x>
          <y> -1.2550 </y>
          <z> -4.8190 </z>
        </location>
        <static_friction> 0.8 </static_friction>
        <dynamic_friction> 0.5 </dynamic_friction>
        <rolling_friction> 0.02 </rolling_friction>
        <spring_coeff unit="N/M"> 1529772 </spring_coeff>
        <damping_coeff unit="N/M/SEC"> 189196 </damping_coeff>
        <damping_coeff_rebound unit="N/M/SEC"> 378392 </damping_coeff_rebound>
        <max_steer unit="DEG"> 20.0 </max_steer>
        <brake_group> NONE </brake_group>
        <retractable> 1 </retractable>
      </contact>
      <contact type="BOGEY" name="Right Forward Main Gear">
        <location unit="M">
          <x> 12.0400 </x>
          <y> 1.2550 </y>
          <z> -4.8190 </z>
        </location>
        <static_friction> 0.8 </static_friction>
        <dynamic_friction> 0.5 </dynamic_friction>
        <rolling_friction> 0.02 </rolling_friction>
        <spring_coeff unit="N/M"> 1529772 </spring_coeff>
        <damping_coeff unit="N/M/SEC"> 189196 </damping_coeff>
        <damping_coeff_rebound unit="N/M/SEC"> 378392 </damping_coeff_rebound>
        <max_steer unit="DEG"> 20.0 </max_steer>
        <brake_group> NONE </brake_group>
        <retractable> 1 </retractable>
      </contact>
      <contact type="BOGEY" name="Left Aft Main Gear">
        <location unit="M">
          <x> 24.2900 </x>
          <y> -1.2550 </y>
          <z> -4.8190 </z>
        </location>
        <static_friction> 0.8 </static_friction>
        <dynamic_friction> 0.5 </dynamic_friction>
        <rolling_friction> 0.02 </rolling_friction>
        <spring_coeff unit="N/M"> 1529772 </spring_coeff>
        <damping_coeff unit="N/M/SEC"> 189196 </damping_coeff>
        <damping_coeff_rebound unit="N/M/SEC"> 378392 </damping_coeff_rebound>
        <max_steer unit="DEG"> 0.0 </max_steer>
        <brake_group> LEFT </brake_group>
        <retractable> 1 </retractable>
      </contact>
      <contact type="BOGEY" name="Right Aft Main Gear">
        <location unit="M">
          <x> 24.2900 </x>
          <y> 1.2550 </y>
          <z> -4.8190 </z>
        </location>
        <static_friction> 0.8 </static_friction>
        <dynamic_friction> 0.5 </dynamic_friction>
        <rolling_friction> 0.02 </rolling_friction>
        <spring_coeff unit="N/M"> 1529772 </spring_coeff>
        <damping_coeff unit="N/M/SEC"> 189196 </damping_coeff>
        <damping_coeff_rebound unit="N/M/SEC"> 378392 </damping_coeff_rebound>
        <max_steer unit="DEG"> 0.0 </max_steer>
        <brake_group> RIGHT </brake_group>
        <retractable> 1 </retractable>
      </contact>
      <contact type="BOGEY" name="Left Outrigger">
        <location unit="M">
          <x> 30.3300 </x>
          <y> -22.6300 </y>
          <z> -4.6080 </z>
        </location>
        <static_friction> 0.8 </static_friction>
        <dynamic_friction> 0.5 </dynamic_friction>
        <rolling_friction> 0.02 </rolling_friction>
        <spring_coeff unit="N/M"> 4589316 </spring_coeff>
        <damping_coeff unit="N/M/SEC"> 327697 </damping_coeff>
        <damping_coeff_rebound unit="N/M/SEC"> 655394 </damping_coeff_rebound>
        <max_steer unit="DEG"> 0.0 </max_steer>
        <brake_group> LEFT </brake_group>
        <retractable> 1 </retractable>
      </contact>
      <contact type="BOGEY" name="Right Outrigger">
        <location unit="M">
          <x> 30.3300 </x>
          <y> 22.6300 </y>
          <z> -4.6080 </z>
        </location>
        <static_friction> 0.8 </static_friction>
        <dynamic_friction> 0.5 </dynamic_friction>
        <rolling_friction> 0.02 </rolling_friction>
        <spring_coeff unit="N/M"> 4589316 </spring_coeff>
        <damping_coeff unit="N/M/SEC"> 327697 </damping_coeff>
        <damping_coeff_rebound unit="N/M/SEC"> 655394 </damping_coeff_rebound>
        <max_steer unit="DEG"> 0.0 </max_steer>
        <brake_group> RIGHT </brake_group>
        <retractable> 1 </retractable>
      </contact>
      <contact type="STRUCTURE" name="canopy front">
        <location unit="M">
          <x> 3.1904 </x>
          <y> 0.0000 </y>
          <z> 0.5822 </z>
        </location>
        <static_friction> 0.8 </static_friction>
        <dynamic_friction> 0.6 </dynamic_friction>
        <spring_coeff unit="N/M"> 8454519 </spring_coeff>
        <damping_coeff unit="N/M/SEC"> 281817 </damping_coeff>
        <damping_coeff_rebound unit="N/M/SEC"> 281817 </damping_coeff_rebound>
      </contact>
      <contact type="STRUCTURE" name="fin rear">
        <location unit="M">
          <x> 45.8200 </x>
          <y> 0.0000 </y>
          <z> 7.6450 </z>
        </location>
        <static_friction> 0.8 </static_friction>
        <dynamic_friction> 0.6 </dynamic_friction>
        <spring_coeff unit="N/M"> 9371054 </spring_coeff>
        <damping_coeff unit="N/M/SEC"> 312368 </damping_coeff>
        <damping_coeff_rebound unit="N/M/SEC"> 312368 </damping_coeff_rebound>
      </contact>
      <contact type="STRUCTURE" name="fuselage front">
        <location unit="M">
          <x> 0.0000 </x>
          <y> 0.0000 </y>
          <z> -1.5000 </z>
        </location>
        <static_friction> 0.8 </static_friction>
        <dynamic_friction> 0.6 </dynamic_friction>
        <spring_coeff unit="N/M"> 6544750 </spring_coeff>
        <damping_coeff unit="N/M/SEC"> 218158 </damping_coeff>
        <damping_coeff_rebound unit="N/M/SEC"> 218158 </damping_coeff_rebound>
      </contact>
      <contact type="STRUCTURE" name="fuselage rear">
        <location unit="M">
          <x> 48.5650 </x>
          <y> -0.0000 </y>
          <z> -1.4000 </z>
        </location>
        <static_friction> 0.8 </static_friction>
        <dynamic_friction> 0.6 </dynamic_friction>
        <spring_coeff unit="N/M"> 8576726 </spring_coeff>
        <damping_coeff unit="N/M/SEC"> 285891 </damping_coeff>
        <damping_coeff_rebound unit="N/M/SEC"> 285891 </damping_coeff_rebound>
      </contact>
      <contact type="STRUCTURE" name="fuselage bottom front">
        <location unit="M">
          <x> 8.0942 </x>
          <y> 0.0000 </y>
          <z> -3.2131 </z>
        </location>
        <static_friction> 0.8 </static_friction>
        <dynamic_friction> 0.6 </dynamic_friction>
        <spring_coeff unit="N/M"> 8688498 </spring_coeff>
        <damping_coeff unit="N/M/SEC"> 289617 </damping_coeff>
        <damping_coeff_rebound unit="N/M/SEC"> 289617 </damping_coeff_rebound>
      </contact>
      <contact type="STRUCTURE" name="htail left rear">
        <location unit="M">
          <x> 45.6700 </x>
          <y> -7.9200 </y>
          <z> -0.7496 </z>
        </location>
        <static_friction> 0.8 </static_friction>
        <dynamic_friction> 0.6 </dynamic_friction>
        <spring_coeff unit="N/M"> 9572004 </spring_coeff>
        <damping_coeff unit="N/M/SEC"> 319067 </damping_coeff>
        <damping_coeff_rebound unit="N/M/SEC"> 319067 </damping_coeff_rebound>
      </contact>
      <contact type="STRUCTURE" name="htail right rear">
        <location unit="M">
          <x> 45.6700 </x>
          <y> 7.9200 </y>
          <z> -0.7496 </z>
        </location>
        <static_friction> 0.8 </static_friction>
        <dynamic_friction> 0.6 </dynamic_friction>
        <spring_coeff unit="N/M"> 9572008 </spring_coeff>
        <damping_coeff unit="N/M/SEC"> 319067 </damping_coeff>
        <damping_coeff_rebound unit="N/M/SEC"> 319067 </damping_coeff_rebound>
      </contact>
      <contact type="STRUCTURE" name="outboard pod, outer nacelle left front">
        <location unit="M">
          <x> 19.3100 </x>
          <y> -19.1521 </y>
          <z> -2.3859 </z>
        </location>
        <static_friction> 0.8 </static_friction>
        <dynamic_friction> 0.6 </dynamic_friction>
        <spring_coeff unit="N/M"> 15386950 </spring_coeff>
        <damping_coeff unit="N/M/SEC"> 512898 </damping_coeff>
        <damping_coeff_rebound unit="N/M/SEC"> 512898 </damping_coeff_rebound>
      </contact>
      <contact type="STRUCTURE" name="outboard pod, outer nacelle right front">
        <location unit="M">
          <x> 19.3100 </x>
          <y> 19.1521 </y>
          <z> -2.3859 </z>
        </location>
        <static_friction> 0.8 </static_friction>
        <dynamic_friction> 0.6 </dynamic_friction>
        <spring_coeff unit="N/M"> 15386947 </spring_coeff>
        <damping_coeff unit="N/M/SEC"> 512898 </damping_coeff>
        <damping_coeff_rebound unit="N/M/SEC"> 512898 </damping_coeff_rebound>
      </contact>
      <contact type="STRUCTURE" name="wing left rear">
        <location unit="M">
          <x> 31.6070 </x>
          <y> -28.1900 </y>
          <z> -1.5020 </z>
        </location>
        <static_friction> 0.8 </static_friction>
        <dynamic_friction> 0.6 </dynamic_friction>
        <spring_coeff unit="N/M"> 3620479 </spring_coeff>
        <damping_coeff unit="N/M/SEC"> 120683 </damping_coeff>
        <damping_coeff_rebound unit="N/M/SEC"> 120683 </damping_coeff_rebound>
      </contact>
      <contact type="STRUCTURE" name="wing left rear 2">
        <location unit="M">
          <x> 35.2102 </x>
          <y> -28.1587 </y>
          <z> -1.8163 </z>
        </location>
        <static_friction> 0.8 </static_friction>
        <dynamic_friction> 0.6 </dynamic_friction>
        <spring_coeff unit="N/M"> 3332278 </spring_coeff>
        <damping_coeff unit="N/M/SEC"> 111076 </damping_coeff>
        <damping_coeff_rebound unit="N/M/SEC"> 111076 </damping_coeff_rebound>
      </contact>
      <contact type="STRUCTURE" name="wing right rear">
        <location unit="M">
          <x> 35.2102 </x>
          <y> 28.1587 </y>
          <z> -1.8163 </z>
        </location>
        <static_friction> 0.8 </static_friction>
        <dynamic_friction> 0.6 </dynamic_friction>
        <spring_coeff unit="N/M"> 3332280 </spring_coeff>
        <damping_coeff unit="N/M/SEC"> 111076 </damping_coeff>
        <damping_coeff_rebound unit="N/M/SEC"> 111076 </damping_coeff_rebound>
      </contact>
      <contact type="STRUCTURE" name="wing right rear 2">
        <location unit="M">
          <x> 31.6070 </x>
          <y> 28.1900 </y>
          <z> -1.5020 </z>
        </location>
        <static_friction> 0.8 </static_friction>
        <dynamic_friction> 0.6 </dynamic_friction>
        <spring_coeff unit="N/M"> 3620480 </spring_coeff>
        <damping_coeff unit="N/M/SEC"> 120683 </damping_coeff>
        <damping_coeff_rebound unit="N/M/SEC"> 120683 </damping_coeff_rebound>
      </contact>
    </ground_reactions>
    <propulsion>
      <engine file="b52h_engine0">
        <location unit="M">
          <x> 15.2000 </x>
          <y> -9.5500 </y>
          <z> -1.5300 </z>
        </location>
        <feed>0</feed>
        <feed>1</feed>
        <feed>2</feed>
        <feed>3</feed>
        <feed>4</feed>
        <feed>5</feed>
        <feed>6</feed>
        <feed>7</feed>
        <thruster file="b52h_nozzle0">
          <location unit="M">
            <x> 17.7000 </x>
            <y> -9.5500 </y>
            <z> -1.5300 </z>
          </location>
          <orient unit="DEG"> <roll>0.00</roll> <pitch>0.00</pitch> <yaw>0.00</yaw> </orient>

        </thruster>
      </engine>
      <engine file="b52h_engine0">
        <location unit="M">
          <x> 15.2000 </x>
          <y> 9.5500 </y>
          <z> -1.5300 </z>
        </location>
        <feed>0</feed>
        <feed>1</feed>
        <feed>2</feed>
        <feed>3</feed>
        <feed>4</feed>
        <feed>5</feed>
        <feed>6</feed>
        <feed>7</feed>
        <thruster file="b52h_nozzle0">
          <location unit="M">
            <x> 17.7000 </x>
            <y> 9.5500 </y>
            <z> -1.5300 </z>
          </location>
          <orient unit="DEG"> <roll>0.00</roll> <pitch>0.00</pitch> <yaw>0.00</yaw> </orient>

        </thruster>
      </engine>
      <engine file="b52h_engine1">
        <location unit="M">
          <x> 15.2000 </x>
          <y> -10.9900 </y>
          <z> -1.5300 </z>
        </location>
        <feed>0</feed>
        <feed>1</feed>
        <feed>2</feed>
        <feed>3</feed>
        <feed>4</feed>
        <feed>5</feed>
        <feed>6</feed>
        <feed>7</feed>
        <thruster file="b52h_nozzle1">
          <location unit="M">
            <x> 17.7000 </x>
            <y> -10.9900 </y>
            <z> -1.5300 </z>
          </location>
          <orient unit="DEG"> <roll>0.00</roll> <pitch>0.00</pitch> <yaw>0.00</yaw> </orient>

        </thruster>
      </engine>
      <engine file="b52h_engine1">
        <location unit="M">
          <x> 15.2000 </x>
          <y> 10.9900 </y>
          <z> -1.5300 </z>
        </location>
        <feed>0</feed>
        <feed>1</feed>
        <feed>2</feed>
        <feed>3</feed>
        <feed>4</feed>
        <feed>5</feed>
        <feed>6</feed>
        <feed>7</feed>
        <thruster file="b52h_nozzle1">
          <location unit="M">
            <x> 17.7000 </x>
            <y> 10.9900 </y>
            <z> -1.5300 </z>
          </location>
          <orient unit="DEG"> <roll>0.00</roll> <pitch>0.00</pitch> <yaw>0.00</yaw> </orient>

        </thruster>
      </engine>
      <engine file="b52h_engine2">
        <location unit="M">
          <x> 21.1100 </x>
          <y> -17.3300 </y>
          <z> -1.8600 </z>
        </location>
        <feed>0</feed>
        <feed>1</feed>
        <feed>2</feed>
        <feed>3</feed>
        <feed>4</feed>
        <feed>5</feed>
        <feed>6</feed>
        <feed>7</feed>
        <thruster file="b52h_nozzle2">
          <location unit="M">
            <x> 23.6100 </x>
            <y> -17.3300 </y>
            <z> -1.8600 </z>
          </location>
          <orient unit="DEG"> <roll>0.00</roll> <pitch>0.00</pitch> <yaw>0.00</yaw> </orient>

        </thruster>
      </engine>
      <engine file="b52h_engine2">
        <location unit="M">
          <x> 21.1100 </x>
          <y> 17.3300 </y>
          <z> -1.8600 </z>
        </location>
        <feed>0</feed>
        <feed>1</feed>
        <feed>2</feed>
        <feed>3</feed>
        <feed>4</feed>
        <feed>5</feed>
        <feed>6</feed>
        <feed>7</feed>
        <thruster file="b52h_nozzle2">
          <location unit="M">
            <x> 23.6100 </x>
            <y> 17.3300 </y>
            <z> -1.8600 </z>
          </location>
          <orient unit="DEG"> <roll>0.00</roll> <pitch>0.00</pitch> <yaw>0.00</yaw> </orient>

        </thruster>
      </engine>
      <engine file="b52h_engine3">
        <location unit="M">
          <x> 21.1100 </x>
          <y> -18.7700 </y>
          <z> -1.8600 </z>
        </location>
        <feed>0</feed>
        <feed>1</feed>
        <feed>2</feed>
        <feed>3</feed>
        <feed>4</feed>
        <feed>5</feed>
        <feed>6</feed>
        <feed>7</feed>
        <thruster file="b52h_nozzle3">
          <location unit="M">
            <x> 23.6100 </x>
            <y> -18.7700 </y>
            <z> -1.8600 </z>
          </location>
          <orient unit="DEG"> <roll>0.00</roll> <pitch>0.00</pitch> <yaw>0.00</yaw> </orient>

        </thruster>
      </engine>
      <engine file="b52h_engine3">
        <location unit="M">
          <x> 21.1100 </x>
          <y> 18.7700 </y>
          <z> -1.8600 </z>
        </location>
        <feed>0</feed>
        <feed>1</feed>
        <feed>2</feed>
        <feed>3</feed>
        <feed>4</feed>
        <feed>5</feed>
        <feed>6</feed>
        <feed>7</feed>
        <thruster file="b52h_nozzle3">
          <location unit="M">
            <x> 23.6100 </x>
            <y> 18.7700 </y>
            <z> -1.8600 </z>
          </location>
          <orient unit="DEG"> <roll>0.00</roll> <pitch>0.00</pitch> <yaw>0.00</yaw> </orient>

        </thruster>
      </engine>
      <tank type="FUEL">
        <location unit="M">
          <x> 9.5000 </x>
          <y> 0.0000 </y>
          <z> -1.2000 </z>
        </location>
        <capacity unit="KG"> 11000.00 </capacity>
        <contents unit="KG"> 4400.00 </contents>
      </tank>
      <tank type="FUEL">
        <location unit="M">
          <x> 16.5000 </x>
          <y> 0.0000 </y>
          <z> 0.0000 </z>
        </location>
        <capacity unit="KG"> 20000.00 </capacity>
        <contents unit="KG"> 8000.00 </contents>
      </tank>
      <tank type="FUEL">
        <location unit="M">
          <x> 21.0000 </x>
          <y> 0.0000 </y>
          <z> -1.5000 </z>
        </location>
        <capacity unit="KG"> 18000.00 </capacity>
        <contents unit="KG"> 7200.00 </contents>
      </tank>
      <tank type="FUEL">
        <location unit="M">
          <x> 28.0000 </x>
          <y> 0.0000 </y>
          <z> -1.2000 </z>
        </location>
        <capacity unit="KG"> 22000.00 </capacity>
        <contents unit="KG"> 8800.00 </contents>
      </tank>
      <tank type="FUEL">
        <location unit="M">
          <x> 18.9000 </x>
          <y> -7.0000 </y>
          <z> -0.1000 </z>
        </location>
        <capacity unit="KG"> 20000.00 </capacity>
        <contents unit="KG"> 8000.00 </contents>
      </tank>
      <tank type="FUEL">
        <location unit="M">
          <x> 18.9000 </x>
          <y> 7.0000 </y>
          <z> -0.1000 </z>
        </location>
        <capacity unit="KG"> 20000.00 </capacity>
        <contents unit="KG"> 8000.00 </contents>
      </tank>
      <tank type="FUEL">
        <location unit="M">
          <x> 24.6000 </x>
          <y> -15.5000 </y>
          <z> -0.6000 </z>
        </location>
        <capacity unit="KG"> 15305.00 </capacity>
        <contents unit="KG"> 6122.00 </contents>
      </tank>
      <tank type="FUEL">
        <location unit="M">
          <x> 24.6000 </x>
          <y> 15.5000 </y>
          <z> -0.6000 </z>
        </location>
        <capacity unit="KG"> 15305.00 </capacity>
        <contents unit="KG"> 6122.00 </contents>
      </tank>
    </propulsion>
    <flight_control name="b52h">
      <!-- the aircraft's profile for the platform (docs/control-architecture.md, section 7): what
           hangar knows of it - its design, its flight tests, its identified responses -->
      <property value="1">fsim/identity/version</property>
      <property value="1">fsim/identity/provenance</property>
      <property value="4">fsim/identity/class</property>
      <property value="1">fsim/identity/family</property>
      <property value="1">fsim/effectors/version</property>
      <property value="1">fsim/effectors/provenance</property>
      <property value="1">fsim/effectors/flaps</property>
      <property value="8">fsim/effectors/flaps_transit_s</property>
      <property value="0.0">fsim/effectors/neutral</property>
      <property value="0.0">fsim/effectors/pitch</property>
      <property value="1">fsim/effectors/pitch_trim</property>
      <property value="1">fsim/effectors/retractable_gear</property>
      <property value="0.0">fsim/effectors/roll</property>
      <property value="0.0">fsim/effectors/speedbrake</property>
      <property value="1">fsim/effectors/wheel_brakes</property>
      <property value="0.0">fsim/effectors/yaw</property>
      <property value="1">fsim/envelope/version</property>
      <property value="1">fsim/envelope/provenance</property>
      <property value="17.1902">fsim/envelope/clean/alpha_max_deg</property>
      <property value="58.3381">fsim/envelope/clean/cas_min_ms</property>
      <property value="1">fsim/propulsion/version</property>
      <property value="1">fsim/propulsion/provenance</property>
      <property value="0.0">fsim/propulsion/afterburner</property>
      <property value="8">fsim/propulsion/engines</property>
      <property value="0.178957">fsim/propulsion/spool_s</property>
      <property value="2">fsim/propulsion/type</property>
      <property value="1">fsim/plant/version</property>
      <property value="1">fsim/plant/provenance</property>
      <property value="-8.34731">fsim/plant/alpha_zero_lift_deg</property>
      <property value="3000">fsim/plant/altitude_m</property>
      <property value="132.51">fsim/plant/eas_ms</property>
      <property value="0.650906">fsim/plant/elevator_trim</property>
      <property value="-0.2149">fsim/plant/elevator_trim_lift</property>
      <property value="3.93441">fsim/plant/pitch/gain</property>
      <property value="0.904725">fsim/plant/pitch/tau_s</property>
      <property value="0.642973">fsim/plant/roll/gain</property>
      <property value="0.574601">fsim/plant/roll/tau_s</property>
      <property value="1.43723">fsim/plant/speed/gain</property>
      <property value="0.178957">fsim/plant/speed/tau_s</property>
      <property value="152.59">fsim/plant/tas_ms</property>
      <property value="0.176249">fsim/plant/yaw/gain</property>
      <property value="1">fsim/performance/version</property>
      <property value="1">fsim/performance/provenance</property>
      <property value="16166.8">fsim/performance/ceiling_m</property>
      <property value="307.736">fsim/performance/max_tas_ms</property>
      <property value="58.3381">fsim/performance/stall_cas_ms</property>
      <!-- the platform's built-in control loops, tuned for this aircraft (hangar autopilot):
           every vehicle of the type takes these as its controllers' parameters -->
      <property value="0.0">fsim/control/pid_acceleration/load_factor/eas_exponent</property>
      <property value="0.0">fsim/control/pid_acceleration/load_factor/feedforward</property>
      <property value="0.3">fsim/control/pid_acceleration/load_factor/integral_limit</property>
      <property value="0.27321">fsim/control/pid_acceleration/load_factor/kd</property>
      <property value="0.0842802">fsim/control/pid_acceleration/load_factor/ki</property>
      <property value="0.0254168">fsim/control/pid_acceleration/load_factor/kp</property>
      <property value="0.0">fsim/control/pid_acceleration/load_factor/path_hold</property>
      <property value="1">fsim/control/pid_acceleration/load_factor/tas_exponent</property>
      <property value="0.695784">fsim/control/pid_acceleration/longitudinal/ki</property>
      <property value="0.139157">fsim/control/pid_acceleration/longitudinal/kp</property>
      <property value="0.650906">fsim/control/pid_acceleration/pitch/trim</property>
      <property value="-0.2149">fsim/control/pid_acceleration/pitch/trim_lift</property>
      <property value="-2">fsim/control/pid_acceleration/roll_rate/eas_exponent</property>
      <property value="1.24422">fsim/control/pid_acceleration/roll_rate/feedforward</property>
      <property value="0.812012">fsim/control/pid_acceleration/roll_rate/ki</property>
      <property value="0.155528">fsim/control/pid_acceleration/roll_rate/kp</property>
      <property value="2">fsim/control/pid_acceleration/roll_rate/tas_exponent</property>
      <property value="-2.83689">fsim/control/pid_acceleration/rudder/beta_gain</property>
      <property value="132.51">fsim/control/pid_acceleration/schedule/eas_ms</property>
      <property value="152.593">fsim/control/pid_acceleration/schedule/tas_ms</property>
      <property value="0.42126">fsim/control/pid_acceleration/throttle/feedforward</property>
      <property value="0.0434865">fsim/control/pid_attitude/airspeed/ki</property>
      <property value="0.313103">fsim/control/pid_attitude/airspeed/kp</property>
      <property value="3.11202">fsim/control/pid_attitude/heading/gain</property>
      <property value="0.0">fsim/control/pid_attitude/pitch/eas_exponent</property>
      <property value="0.5">fsim/control/pid_attitude/pitch/integral_limit</property>
      <property value="0.27321">fsim/control/pid_attitude/pitch/kd</property>
      <property value="0.181189">fsim/control/pid_attitude/pitch/ki</property>
      <property value="1.09284">fsim/control/pid_attitude/pitch/kp</property>
      <property value="0.0">fsim/control/pid_attitude/pitch/tas_exponent</property>
      <property value="0.650906">fsim/control/pid_attitude/pitch/trim</property>
      <property value="-0.2149">fsim/control/pid_attitude/pitch/trim_lift</property>
      <property value="-2">fsim/control/pid_attitude/roll/eas_exponent</property>
      <property value="0.169169">fsim/control/pid_attitude/roll/kd</property>
      <property value="0.0">fsim/control/pid_attitude/roll/ki</property>
      <property value="0.676676">fsim/control/pid_attitude/roll/kp</property>
      <property value="0.321486">fsim/control/pid_attitude/roll/max_rate</property>
      <property value="2">fsim/control/pid_attitude/roll/tas_exponent</property>
      <property value="-2.83689">fsim/control/pid_attitude/rudder/beta_gain</property>
      <property value="132.51">fsim/control/pid_attitude/schedule/eas_ms</property>
      <property value="152.593">fsim/control/pid_attitude/schedule/tas_ms</property>
      <property value="0.42126">fsim/control/pid_attitude/throttle/feedforward</property>
      <property value="0.0552654">fsim/control/pid_position/altitude/gain</property>
      <property value="15.2593">fsim/control/pid_position/max_vertical_speed</property>
      <property value="0.523599">fsim/control/pid_velocity/max_bank</property>
      <property value="152.593">fsim/control/pid_velocity/schedule/tas_ms</property>
      <property value="-0.145688">fsim/control/pid_velocity/vertical_speed/alpha_zero_lift</property>
      <property value="1.50788">fsim/control/pid_velocity/vertical_speed/command_lag</property>
      <property value="1">fsim/control/pid_velocity/vertical_speed/feedforward</property>
      <property value="6.004743e-05">fsim/control/pid_velocity/vertical_speed/ki</property>
      <property value="0.00108653">fsim/control/pid_velocity/vertical_speed/kp</property>
      <channel name="Pitch">
        <summer name="fcs/pitch-trim-sum">
          <input>fcs/elevator-cmd-norm</input>
          <input>fcs/pitch-trim-cmd-norm</input>
          <clipto> <min>-1</min> <max>1</max> </clipto>
        </summer>
        <aerosurface_scale name="fcs/elevator-control">
          <input>fcs/pitch-trim-sum</input>
          <range> <min>-15.00</min> <max>10.00</max> </range>
          <gain>0.0174533</gain>
        </aerosurface_scale>
        <actuator name="fcs/elevator-actuator">
          <input>fcs/elevator-control</input>
          <rate_limit>2.0</rate_limit>
          <output>fcs/elevator-pos-rad</output>
        </actuator>
      </channel>
      <channel name="Roll">
        <summer name="fcs/roll-trim-sum">
          <input>fcs/aileron-cmd-norm</input>
          <input>fcs/roll-trim-cmd-norm</input>
          <clipto> <min>-1</min> <max>1</max> </clipto>
        </summer>
        <aerosurface_scale name="fcs/left-aileron-control">
          <input>fcs/roll-trim-sum</input>
          <range> <min>-20.00</min> <max>20.00</max> </range>
          <gain>0.0174533</gain>
        </aerosurface_scale>
        <actuator name="fcs/left-aileron-actuator">
          <input>fcs/left-aileron-control</input>
          <rate_limit>2.0</rate_limit>
          <output>fcs/left-aileron-pos-rad</output>
        </actuator>
        <pure_gain name="fcs/right-aileron">
          <input>fcs/left-aileron-pos-rad</input>
          <gain>-1</gain>
          <output>fcs/right-aileron-pos-rad</output>
        </pure_gain>
      </channel>
      <channel name="Yaw">
        <summer name="fcs/yaw-trim-sum">
          <input>fcs/rudder-cmd-norm</input>
          <input>fcs/yaw-trim-cmd-norm</input>
          <clipto> <min>-1</min> <max>1</max> </clipto>
        </summer>
        <aerosurface_scale name="fcs/rudder-control">
          <input>fcs/yaw-trim-sum</input>
          <range> <min>-25.00</min> <max>25.00</max> </range>
          <gain>0.0174533</gain>
        </aerosurface_scale>
        <!-- the yaw damper (hangar/fcs.py yaw_damper): the yaw rate, washed out so a
             steady turn's is left alone, against itself through the rudder - the
             dutch roll damped to 0.30 at 1 g across the speed range -->
        <washout_filter name="fcs/yaw-damper-washout">
          <input>velocities/r-rad_sec</input>
          <c1>0.500</c1>
        </washout_filter>
        <fcs_function name="fcs/yaw-damper">
          <function>
            <product>
              <value>-1</value>
              <table>
                <independentVar lookup="row">aero/qbar-psf</independentVar>
                <tableData>
                  10.0    0.00000
                  20.0    0.00000
                  40.0    0.00000
                  80.0   -3.00000
                 150.0   -1.38146
                 300.0   -0.55473
                 600.0   -0.28021
                1200.0   -0.26685
                2400.0   -0.59459
                </tableData>
              </table>
              <property>fcs/yaw-damper-washout</property>
            </product>
          </function>
          <clipto> <min>-0.21817</min> <max>0.21817</max> </clipto>
        </fcs_function>
        <summer name="fcs/rudder-sum">
          <input>fcs/rudder-control</input>
          <input>fcs/yaw-damper</input>
          <clipto> <min>-0.43633</min> <max>0.43633</max> </clipto>
        </summer>
        <actuator name="fcs/rudder-actuator">
          <input>fcs/rudder-sum</input>
          <rate_limit>2.0</rate_limit>
          <output>fcs/rudder-pos-rad</output>
        </actuator>
        <!-- the nose or tail wheel steers with the rudder pedals (JSBSim steers from
             fcs/steer-cmd-norm, positive right; the rudder command is positive left) -->
        <pure_gain name="fcs/steer-from-rudder">
          <input>fcs/yaw-trim-sum</input>
          <gain>-1</gain>
          <output>fcs/steer-cmd-norm</output>
        </pure_gain>
      </channel>
      <channel name="Flaps">
        <kinematic name="fcs/flaps-control">
          <input>fcs/flap-cmd-norm</input>
          <traverse>
            <setting> <position>0.0</position> <time>0.0</time> </setting>
            <setting> <position>7.5</position> <time>2.0</time> </setting>
            <setting> <position>15.0</position> <time>2.0</time> </setting>
            <setting> <position>22.5</position> <time>2.0</time> </setting>
            <setting> <position>30.0</position> <time>2.0</time> </setting>
          </traverse>
          <output>fcs/flap-pos-deg</output>
        </kinematic>
      </channel>
      <channel name="Throttle 4">
        <pure_gain name="fcs/throttle-lever-4">
          <input>fcs/throttle-cmd-norm[0]</input>
          <gain>1</gain>
          <output>fcs/throttle-pos-norm[4]</output>
        </pure_gain>
      </channel>
      <channel name="Throttle 5">
        <pure_gain name="fcs/throttle-lever-5">
          <input>fcs/throttle-cmd-norm[1]</input>
          <gain>1</gain>
          <output>fcs/throttle-pos-norm[5]</output>
        </pure_gain>
      </channel>
      <channel name="Throttle 6">
        <pure_gain name="fcs/throttle-lever-6">
          <input>fcs/throttle-cmd-norm[2]</input>
          <gain>1</gain>
          <output>fcs/throttle-pos-norm[6]</output>
        </pure_gain>
      </channel>
      <channel name="Throttle 7">
        <pure_gain name="fcs/throttle-lever-7">
          <input>fcs/throttle-cmd-norm[3]</input>
          <gain>1</gain>
          <output>fcs/throttle-pos-norm[7]</output>
        </pure_gain>
      </channel>
      <channel name="Landing Gear">
        <kinematic name="fcs/gear-control">
          <input>gear/gear-cmd-norm</input>
          <traverse>
            <setting> <position>0</position> <time>0</time> </setting>
            <setting> <position>1</position> <time>5</time> </setting>
          </traverse>
          <output>gear/gear-pos-norm</output>
        </kinematic>
      </channel>
    </flight_control>
    <aerodynamics>
        <function name="aero/function/mach-lift">
          <description>lift, and damping, over its low-speed value (hangar: aero/mach.py)</description>
          <table>
            <independentVar lookup="row">velocities/mach</independentVar>
            <tableData>
                 0.000     1.000000
                 0.300     1.027921
                 0.500     1.085277
                 0.600     1.132115
                 0.700     1.198097
                 0.800     1.293852
                 0.850     1.356220
                 0.900     1.401459
                 0.950     1.405695
                 1.000     1.405402
                 1.050     1.400847
                 1.100     1.392296
                 1.200     1.364269
                 1.400     0.976957
                 1.600     0.785012
                 1.800     0.664686
                 2.000     0.580107
                 2.300     0.490180
                 2.600     0.426124
            </tableData>
          </table>
        </function>
        <function name="aero/function/mach-side">
          <description>side force, rolling and yawing moment over their low-speed values</description>
          <table>
            <independentVar lookup="row">velocities/mach</independentVar>
            <tableData>
                 0.000     1.000000
                 0.300     1.019123
                 0.500     1.058300
                 0.600     1.090229
                 0.700     1.135144
                 0.800     1.200469
                 0.850     1.244652
                 0.900     1.297863
                 0.950     1.275676
                 1.000     1.216743
                 1.050     1.141019
                 1.100     1.068459
                 1.200     1.012647
                 1.400     1.377337
                 1.600     1.157884
                 1.800     1.005189
                 2.000     0.891624
                 2.300     0.765677
                 2.600     0.672902
            </tableData>
          </table>
        </function>
        <function name="aero/function/mach-dCm-dCL">
          <description>pitching moment per unit low-speed lift: the neutral point's move</description>
          <table>
            <independentVar lookup="row">velocities/mach</independentVar>
            <tableData>
                 0.000     0.000000
                 0.300    -0.004263
                 0.500    -0.012979
                 0.600    -0.020115
                 0.700    -0.030227
                 0.800    -0.044265
                 0.850    -0.049709
                 0.900    -0.014646
                 0.950    -0.024571
                 1.000    -0.053750
                 1.050    -0.095522
                 1.100    -0.143049
                 1.200    -0.228369
                 1.400    -0.223474
                 1.600    -0.158888
                 1.800    -0.113907
                 2.000    -0.080277
                 2.300    -0.042735
                 2.600    -0.014893
            </tableData>
          </table>
        </function>
        <function name="aero/function/mach-dCD0">
          <description>zero-lift drag's change: friction and wave drag</description>
          <table>
            <independentVar lookup="row">velocities/mach</independentVar>
            <tableData>
                 0.000     0.000000
                 0.300    -0.000106
                 0.500    -0.000289
                 0.600    -0.000411
                 0.700    -0.000552
                 0.800    -0.000484
                 0.850     0.000630
                 0.900     0.011490
                 0.950     0.040541
                 1.000     0.070924
                 1.050     0.084923
                 1.100     0.084824
                 1.200     0.084619
                 1.400     0.080804
                 1.600     0.078716
                 1.800     0.076955
                 2.000     0.075374
                 2.300     0.073229
                 2.600     0.071286
            </tableData>
          </table>
        </function>
        <function name="aero/function/mach-dK">
          <description>induced-drag factor's change (per CL^2)</description>
          <table>
            <independentVar lookup="row">velocities/mach</independentVar>
            <tableData>
                 0.000     0.000000
                 0.300     0.002277
                 0.500     0.006415
                 0.600     0.009339
                 0.700     0.012890
                 0.800     0.017109
                 0.850     0.019390
                 0.900     0.020857
                 0.950     0.020988
                 1.000     0.020979
                 1.050     0.030066
                 1.100     0.052206
                 1.200     0.103807
                 1.400     0.148172
                 1.600     0.170855
                 1.800     0.187042
                 2.000     0.198245
                 2.300     0.207201
                 2.600     0.207768
            </tableData>
          </table>
        </function>
        <function name="aero/function/mach-aileron">
          <description>aileron power over its low-speed value</description>
          <table>
            <independentVar lookup="row">velocities/mach</independentVar>
            <tableData>
                 0.000     1.000000
                 0.300     1.021692
                 0.500     1.064908
                 0.600     1.098862
                 0.700     1.144737
                 0.800     1.208025
                 0.850     1.249220
                 0.900     1.302475
                 0.950     1.225820
                 1.000     1.093941
                 1.050     0.930602
                 1.100     0.759569
                 1.200     0.489484
                 1.400     0.333201
                 1.600     0.265140
                 1.800     0.223154
                 2.000     0.193945
                 2.300     0.163158
                 2.600     0.141396
            </tableData>
          </table>
        </function>
        <function name="aero/function/mach-elevator">
          <description>elevator power over its low-speed value</description>
          <table>
            <independentVar lookup="row">velocities/mach</independentVar>
            <tableData>
                 0.000     1.000000
                 0.300     1.020529
                 0.500     1.061594
                 0.600     1.094131
                 0.700     1.138705
                 0.800     1.201988
                 0.850     1.244850
                 0.900     1.299759
                 0.950     1.301689
                 1.000     1.281831
                 1.050     1.248915
                 1.100     1.211669
                 1.200     1.159105
                 1.400     1.129718
                 1.600     0.924485
                 1.800     0.790735
                 2.000     0.694662
                 2.300     0.590822
                 2.600     0.515874
            </tableData>
          </table>
        </function>
        <function name="aero/function/mach-flap">
          <description>flap power over its low-speed value</description>
          <table>
            <independentVar lookup="row">velocities/mach</independentVar>
            <tableData>
                 0.000     1.000000
                 0.300     1.033025
                 0.500     1.101615
                 0.600     1.158337
                 0.700     1.239273
                 0.800     1.358947
                 0.850     1.439653
                 0.900     1.515345
                 0.950     1.444245
                 1.000     1.312039
                 1.050     1.143881
                 1.100     0.964924
                 1.200     0.675225
                 1.400     0.459638
                 1.600     0.365751
                 1.800     0.307832
                 2.000     0.267540
                 2.300     0.225071
                 2.600     0.195050
            </tableData>
          </table>
        </function>
        <function name="aero/function/mach-rudder">
          <description>rudder power over its low-speed value</description>
          <table>
            <independentVar lookup="row">velocities/mach</independentVar>
            <tableData>
                 0.000     1.000000
                 0.300     1.020888
                 0.500     1.064286
                 0.600     1.100427
                 0.700     1.152945
                 0.800     1.234966
                 0.850     1.297007
                 0.900     1.387419
                 0.950     1.286117
                 1.000     1.099581
                 1.050     0.867787
                 1.100     0.630715
                 1.200     0.300648
                 1.400     0.408922
                 1.600     0.343768
                 1.800     0.298434
                 2.000     0.264717
                 2.300     0.227324
                 2.600     0.199780
            </tableData>
          </table>
        </function>
        <function name="aero/function/CL-base">
          <description>CL over alpha and beta at low speed</description>
          <table>
            <independentVar lookup="row">aero/alpha-deg</independentVar>
            <independentVar lookup="column">aero/beta-deg</independentVar>
            <tableData>
                        -90.00    -70.00    -50.00    -40.00    -30.00    -25.00    -20.00    -15.00    -10.00     -6.00     -3.00      0.00      3.00      6.00     10.00     15.00     20.00     25.00     30.00     40.00     50.00     70.00     90.00
             -180.00   0.00000   0.00604   0.10352   0.20364   0.31603   0.36998   0.41862   0.45925   0.48965   0.50562   0.51243   0.51470   0.51243   0.50562   0.48965   0.45925   0.41862   0.36998   0.31603   0.20364   0.10352   0.00604   0.00000
             -120.00  -0.00001   0.12887   0.34248   0.45506   0.55575   0.59841   0.63454   0.66335   0.68425   0.69557   0.70057   0.70097   0.70057   0.69557   0.68425   0.66335   0.63454   0.59841   0.55575   0.45506   0.34248   0.12887  -0.00001
              -70.00  -0.00001  -0.12614  -0.35967  -0.48761  -0.60439  -0.65456  -0.69743  -0.73188  -0.75706  -0.77014  -0.77517  -0.77534  -0.77517  -0.77014  -0.75706  -0.73188  -0.69743  -0.65456  -0.60439  -0.48761  -0.35967  -0.12614  -0.00001
              -46.00  -0.00001  -0.19727  -0.55621  -0.75031  -0.91951  -0.99070  -1.05200  -1.10249  -1.13659  -1.15185  -1.15836  -1.16051  -1.15836  -1.15185  -1.13659  -1.10249  -1.05200  -0.99070  -0.91951  -0.75031  -0.55621  -0.19727  -0.00001
              -32.00  -0.00000  -0.21957  -0.60702  -0.82568  -0.99605  -1.06682  -1.12510  -1.18150  -1.21678  -1.23681  -1.24529  -1.24812  -1.24529  -1.23681  -1.21678  -1.18150  -1.12510  -1.06682  -0.99605  -0.82568  -0.60702  -0.21957  -0.00000
              -22.00  -0.00000  -0.15415  -0.60511  -0.90287  -1.12208  -1.19030  -1.24057  -1.29555  -1.33521  -1.35541  -1.36381  -1.36657  -1.36381  -1.35541  -1.33521  -1.29555  -1.24057  -1.19030  -1.12208  -0.90287  -0.60511  -0.15415  -0.00000
              -17.00  -0.00000  -0.12128  -0.49277  -0.69152  -0.78900  -0.83356  -0.86559  -0.89437  -0.91449  -0.92433  -0.92826  -0.92952  -0.92826  -0.92433  -0.91449  -0.89437  -0.86559  -0.83356  -0.78900  -0.69152  -0.49277  -0.12128  -0.00000
              -13.00  -0.00000  -0.09451  -0.34510  -0.42699  -0.49313  -0.52077  -0.53490  -0.54628  -0.55349  -0.55651  -0.55750  -0.55778  -0.55750  -0.55651  -0.55349  -0.54628  -0.53490  -0.52077  -0.49313  -0.42699  -0.34510  -0.09451  -0.00000
               -9.00  -0.00000  -0.04459  -0.12267  -0.16364  -0.20112  -0.20562  -0.19978  -0.19362  -0.18790  -0.18409  -0.18214  -0.18144  -0.18214  -0.18409  -0.18790  -0.19362  -0.19978  -0.20562  -0.20112  -0.16364  -0.12267  -0.04459  -0.00000
               -5.00  -0.00000   0.00714   0.08665   0.08273   0.08735   0.10744   0.13444   0.15803   0.17642   0.18676   0.19150   0.19317   0.19150   0.18676   0.17642   0.15803   0.13444   0.10744   0.08735   0.08273   0.08665   0.00714  -0.00000
               -1.00  -0.00000   0.05136   0.30102   0.32756   0.37332   0.41950   0.46825   0.50920   0.54001   0.55645   0.56356   0.56593   0.56356   0.55645   0.54001   0.50920   0.46825   0.41950   0.37332   0.32756   0.30102   0.05136  -0.00000
                3.00   0.00000   0.08961   0.48834   0.57177   0.65655   0.72839   0.80026   0.85826   0.90128   0.92389   0.93354   0.93678   0.93354   0.92389   0.90128   0.85826   0.80026   0.72839   0.65655   0.57177   0.48834   0.08961   0.00000
                7.00   0.00000   0.13260   0.57511   0.79235   0.93102   1.02893   1.12635   1.20155   1.25695   1.28595   1.29836   1.30254   1.29836   1.28595   1.25695   1.20155   1.12635   1.02893   0.93102   0.79235   0.57511   0.13260   0.00000
               11.00   0.00000   0.17648   0.66290   0.87301   1.14022   1.26454   1.38695   1.47829   1.54553   1.58071   1.59579   1.60089   1.59579   1.58071   1.54553   1.47829   1.38695   1.26454   1.14022   0.87301   0.66290   0.17648   0.00000
               15.00   0.00000   0.20551   0.67894   0.89175   1.10798   1.20591   1.29396   1.35105   1.39194   1.41409   1.42492   1.42586   1.42492   1.41409   1.39194   1.35105   1.29396   1.20591   1.10798   0.89175   0.67894   0.20551   0.00000
               19.00   0.00000   0.21238   0.59449   0.83759   1.03897   1.11948   1.18475   1.22762   1.25925   1.27535   1.28201   1.28418   1.28201   1.27535   1.25925   1.22762   1.18475   1.11948   1.03897   0.83759   0.59449   0.21238   0.00000
               23.00   0.00000   0.20394   0.57409   0.79542   1.02512   1.10111   1.16772   1.21274   1.24484   1.26101   1.26769   1.26986   1.26769   1.26101   1.24484   1.21274   1.16772   1.10111   1.02512   0.79542   0.57409   0.20394   0.00000
               27.00   0.00000   0.19700   0.56489   0.76248   0.96800   1.05824   1.12100   1.20170   1.23581   1.25266   1.25963   1.26190   1.25963   1.25266   1.23581   1.20170   1.12100   1.05824   0.96800   0.76248   0.56489   0.19700   0.00000
               32.00   0.00000   0.19528   0.55573   0.74311   0.91197   0.98518   1.04051   1.08276   1.11289   1.12823   1.13458   1.13661   1.13458   1.12823   1.11289   1.08276   1.04051   0.98518   0.91197   0.74311   0.55573   0.19528   0.00000
               46.00   0.00001   0.17998   0.49978   0.67031   0.81380   0.87115   0.91820   0.95720   0.97779   0.98814   0.99248   0.99386   0.99248   0.98814   0.97779   0.95720   0.91820   0.87115   0.81380   0.67031   0.49978   0.17998   0.00001
               70.00   0.00001   0.09180   0.24235   0.32166   0.39273   0.42290   0.44850   0.46895   0.48381   0.49151   0.49425   0.49365   0.49425   0.49151   0.48381   0.46895   0.44850   0.42290   0.39273   0.32166   0.24235   0.09180   0.00001
              120.00   0.00001  -0.14805  -0.40679  -0.54582  -0.67137  -0.72490  -0.77042  -0.80685  -0.83336  -0.84761  -0.85385  -0.85468  -0.85385  -0.84761  -0.83336  -0.80685  -0.77042  -0.72490  -0.67137  -0.54582  -0.40679  -0.14805   0.00001
              180.00   0.00000   0.00604   0.10352   0.20364   0.31603   0.36998   0.41862   0.45925   0.48965   0.50562   0.51243   0.51470   0.51243   0.50562   0.48965   0.45925   0.41862   0.36998   0.31603   0.20364   0.10352   0.00604   0.00000
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            </tableData>
          </table>
        </function>
      <axis name="DRAG">
        <function name="aero/coefficient/CD_base">
          <description>CD over alpha and beta (hangar)</description>
          <product>
            <property>aero/qbar-psf</property>
            <property>metrics/Sw-sqft</property>
          <table>
            <independentVar lookup="row">aero/alpha-deg</independentVar>
            <independentVar lookup="column">aero/beta-deg</independentVar>
            <tableData>
                        -90.00    -70.00    -50.00    -40.00    -30.00    -25.00    -20.00    -15.00    -10.00     -6.00     -3.00      0.00      3.00      6.00     10.00     15.00     20.00     25.00     30.00     40.00     50.00     70.00     90.00
             -180.00   0.52781   0.43803   0.25250   0.16161   0.09078   0.06510   0.04611   0.03333   0.02427   0.02224   0.02203   0.02202   0.02203   0.02224   0.02427   0.03333   0.04611   0.06510   0.09078   0.16161   0.25250   0.43803   0.52781
             -120.00   0.52781   0.53871   0.72984   0.91226   1.12157   1.22364   1.31659   1.39516   1.45477   1.48628   1.49987   1.50451   1.49987   1.48628   1.45477   1.39516   1.31659   1.22364   1.12157   0.91226   0.72984   0.53871   0.52781
              -70.00   0.52781   0.55388   0.76166   0.94970   1.16248   1.26565   1.35940   1.43855   1.49859   1.53045   1.54401   1.54865   1.54401   1.53045   1.49859   1.43855   1.35940   1.26565   1.16248   0.94970   0.76166   0.55388   0.52781
              -46.00   0.52781   0.51103   0.53491   0.58540   0.65382   0.69066   0.72643   0.76075   0.78346   0.79177   0.79526   0.79637   0.79526   0.79177   0.78346   0.76075   0.72643   0.69066   0.65382   0.58540   0.53491   0.51103   0.52781
              -32.00   0.52781   0.48364   0.40047   0.38188   0.39184   0.40137   0.39763   0.39001   0.38311   0.38005   0.37861   0.37809   0.37861   0.38005   0.38311   0.39001   0.39763   0.40137   0.39184   0.38188   0.40047   0.48364   0.52781
              -22.00   0.52781   0.46930   0.32476   0.28168   0.27311   0.24202   0.20055   0.16831   0.14479   0.13257   0.12738   0.12564   0.12738   0.13257   0.14479   0.16831   0.20055   0.24202   0.27311   0.28168   0.32476   0.46930   0.52781
              -17.00   0.52781   0.46336   0.30232   0.24062   0.19001   0.15782   0.12729   0.10261   0.08473   0.07553   0.07165   0.07036   0.07165   0.07553   0.08473   0.10261   0.12729   0.15782   0.19001   0.24062   0.30232   0.46336   0.52781
              -13.00   0.52781   0.45937   0.29036   0.21265   0.15593   0.11720   0.08925   0.06742   0.05195   0.04417   0.04094   0.03988   0.04094   0.04417   0.05195   0.06742   0.08925   0.11720   0.15593   0.21265   0.29036   0.45937   0.52781
               -9.00   0.52781   0.45699   0.28167   0.19490   0.12932   0.09299   0.06676   0.04678   0.03304   0.02636   0.02367   0.02281   0.02367   0.02636   0.03304   0.04678   0.06676   0.09299   0.12932   0.19490   0.28167   0.45699   0.52781
               -5.00   0.52781   0.45605   0.27711   0.18656   0.12084   0.08389   0.05924   0.04056   0.02801   0.02224   0.01998   0.01926   0.01998   0.02224   0.02801   0.04056   0.05924   0.08389   0.12084   0.18656   0.27711   0.45605   0.52781
               -1.00   0.52781   0.45658   0.27686   0.18865   0.12725   0.09146   0.06744   0.04914   0.03691   0.03166   0.02952   0.02882   0.02952   0.03166   0.03691   0.04914   0.06744   0.09146   0.12725   0.18865   0.27686   0.45658   0.52781
                3.00   0.52781   0.45834   0.28225   0.19887   0.14596   0.11641   0.09186   0.07320   0.06072   0.05482   0.05258   0.05191   0.05258   0.05482   0.06072   0.07320   0.09186   0.11641   0.14596   0.19887   0.28225   0.45834   0.52781
                7.00   0.52781   0.46070   0.29861   0.22156   0.17844   0.15625   0.13233   0.11205   0.09795   0.09096   0.08811   0.08718   0.08811   0.09096   0.09795   0.11205   0.13233   0.15625   0.17844   0.22156   0.29861   0.46070   0.52781
               11.00   0.52781   0.46375   0.32338   0.29205   0.22008   0.20427   0.18327   0.16331   0.14891   0.14162   0.13848   0.13734   0.13848   0.14162   0.14891   0.16331   0.18327   0.20427   0.22008   0.29205   0.32338   0.46375   0.52781
               15.00   0.52781   0.46792   0.34608   0.31955   0.31529   0.31405   0.29539   0.27481   0.25643   0.24595   0.24054   0.22372   0.24054   0.24595   0.25643   0.27481   0.29539   0.31405   0.31529   0.31955   0.34608   0.46792   0.52781
               19.00   0.52781   0.47340   0.36735   0.34922   0.37441   0.36132   0.34000   0.32311   0.31167   0.30602   0.30384   0.30313   0.30384   0.30602   0.31167   0.32311   0.34000   0.36132   0.37441   0.34922   0.36735   0.47340   0.52781
               23.00   0.52781   0.47994   0.39575   0.38617   0.41004   0.40387   0.40040   0.39527   0.39182   0.39017   0.38952   0.38929   0.38952   0.39017   0.39182   0.39527   0.40040   0.40387   0.41004   0.38617   0.39575   0.47994   0.52781
               27.00   0.52781   0.48691   0.42902   0.43003   0.46616   0.47050   0.47347   0.47568   0.47907   0.48083   0.48159   0.48181   0.48159   0.48083   0.47907   0.47568   0.47347   0.47050   0.46616   0.43003   0.42902   0.48691   0.52781
               32.00   0.52781   0.49613   0.47551   0.49885   0.54078   0.56865   0.57506   0.58435   0.59237   0.59708   0.59915   0.59982   0.59915   0.59708   0.59237   0.58435   0.57506   0.56865   0.54078   0.49885   0.47551   0.49613   0.52781
               46.00   0.52781   0.52389   0.61696   0.72271   0.84140   0.89672   0.94558   0.98989   1.01320   1.02490   1.02966   1.03110   1.02966   1.02490   1.01320   0.98989   0.94558   0.89672   0.84140   0.72271   0.61696   0.52389   0.52781
               70.00   0.52781   0.56209   0.81431   1.03845   1.29044   1.41221   1.52268   1.61582   1.68642   1.72387   1.73983   1.74527   1.73983   1.72387   1.68642   1.61582   1.52268   1.41221   1.29044   1.03845   0.81431   0.56209   0.52781
              120.00   0.52781   0.52762   0.65885   0.79262   0.94909   1.02610   1.09652   1.15623   1.20161   1.22560   1.23595   1.23951   1.23595   1.22560   1.20161   1.15623   1.09652   1.02610   0.94909   0.79262   0.65885   0.52762   0.52781
              180.00   0.52781   0.43803   0.25250   0.16161   0.09078   0.06510   0.04611   0.03333   0.02427   0.02224   0.02203   0.02202   0.02203   0.02224   0.02427   0.03333   0.04611   0.06510   0.09078   0.16161   0.25250   0.43803   0.52781
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            </tableData>
          </table>
          </product>
        </function>
        <function name="aero/coefficient/CD_mach">
          <description>zero-lift drag's change with Mach: friction, wave drag</description>
          <product>
            <property>aero/qbar-psf</property>
            <property>metrics/Sw-sqft</property>
            <property>aero/function/mach-dCD0</property>
          </product>
        </function>
        <function name="aero/coefficient/CD_induced_mach">
          <description>induced drag's change with Mach (leading-edge suction lost)</description>
          <product>
            <property>aero/qbar-psf</property>
            <property>metrics/Sw-sqft</property>
            <property>aero/cl-squared</property>
            <property>aero/function/mach-dK</property>
          </product>
        </function>
        <function name="aero/coefficient/CD_aileron">
          <description>CD increment from aileron (deg), over alpha</description>
          <product>
            <property>aero/qbar-psf</property>
            <property>metrics/Sw-sqft</property>
            <property>aero/function/mach-aileron</property>
          <table>
            <independentVar lookup="row">aero/alpha-deg</independentVar>
            <independentVar lookup="column">fcs/left-aileron-pos-deg</independentVar>
            <tableData>
                        -20.00    -15.00    -10.00     -5.00      0.00      5.00     10.00     15.00     20.00
             -180.00   0.00282   0.00162   0.00073   0.00018   0.00000   0.00018   0.00073   0.00162   0.00282
             -120.00   0.00279   0.00160   0.00072   0.00018   0.00000   0.00018   0.00072   0.00160   0.00279
              -70.00   0.00279   0.00160   0.00072   0.00018   0.00000   0.00018   0.00072   0.00160   0.00279
              -46.00   0.00560   0.00353   0.00174   0.00046   0.00000   0.00046   0.00174   0.00353   0.00560
              -32.00   0.00843   0.00559   0.00289   0.00079   0.00000   0.00079   0.00289   0.00559   0.00843
              -22.00   0.00496   0.00316   0.00160   0.00042   0.00000   0.00042   0.00160   0.00316   0.00496
              -17.00   0.00659   0.00433   0.00221   0.00060   0.00000   0.00060   0.00221   0.00433   0.00659
              -13.00   0.00700   0.00462   0.00237   0.00065   0.00000   0.00065   0.00237   0.00462   0.00700
               -9.00   0.00723   0.00478   0.00246   0.00067   0.00000   0.00067   0.00246   0.00478   0.00723
               -5.00   0.00730   0.00483   0.00248   0.00068   0.00000   0.00068   0.00248   0.00483   0.00730
               -1.00   0.00720   0.00476   0.00244   0.00067   0.00000   0.00067   0.00244   0.00476   0.00720
                3.00   0.00694   0.00457   0.00234   0.00064   0.00000   0.00064   0.00234   0.00457   0.00694
                7.00   0.00808   0.00509   0.00244   0.00062   0.00000   0.00062   0.00244   0.00509   0.00808
               11.00   0.02785   0.01989   0.01097   0.00316   0.00000   0.00316   0.01097   0.01989   0.02785
               15.00   0.03734   0.02922   0.02119   0.01472   0.00000   0.01472   0.02119   0.02922   0.03734
               19.00   0.01596   0.01078   0.00565   0.00156   0.00000   0.00156   0.00565   0.01078   0.01596
               23.00   0.01240   0.00832   0.00434   0.00120   0.00000   0.00120   0.00434   0.00832   0.01240
               27.00   0.01046   0.00693   0.00358   0.00098   0.00000   0.00098   0.00358   0.00693   0.01046
               32.00   0.00906   0.00590   0.00300   0.00082   0.00000   0.00082   0.00300   0.00590   0.00906
               46.00   0.00550   0.00344   0.00169   0.00045   0.00000   0.00045   0.00169   0.00344   0.00550
               70.00   0.00279   0.00160   0.00072   0.00018   0.00000   0.00018   0.00072   0.00160   0.00279
              120.00   0.00279   0.00160   0.00072   0.00018   0.00000   0.00018   0.00072   0.00160   0.00279
              180.00   0.00282   0.00162   0.00073   0.00018   0.00000   0.00018   0.00073   0.00162   0.00282
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            </tableData>
          </table>
          </product>
        </function>
        <function name="aero/coefficient/CD_elevator">
          <description>CD increment from elevator (deg), over alpha</description>
          <product>
            <property>aero/qbar-psf</property>
            <property>metrics/Sw-sqft</property>
            <property>aero/function/mach-elevator</property>
          <table>
            <independentVar lookup="row">aero/alpha-deg</independentVar>
            <independentVar lookup="column">fcs/elevator-pos-deg</independentVar>
            <tableData>
                        -15.00    -10.00     -5.00      0.00      5.00     10.00
             -180.00   0.01369   0.00303   0.00045   0.00000   0.00045   0.00303
             -120.00  -0.05310  -0.03466  -0.01678   0.00000   0.01516   0.02825
              -70.00   0.02323   0.01844   0.01062   0.00000  -0.01309  -0.02825
              -46.00   0.04612   0.03248   0.01693   0.00000  -0.01769  -0.03545
              -32.00   0.04873   0.03283   0.01628   0.00000  -0.01471  -0.02654
              -22.00   0.04120   0.02808   0.01475   0.00000  -0.01142  -0.02132
              -17.00   0.04380   0.02858   0.01113   0.00000  -0.00963  -0.01684
              -13.00   0.04110   0.02166   0.00986   0.00000  -0.00749  -0.01214
               -9.00   0.03322   0.01765   0.00773   0.00000  -0.00488  -0.00663
               -5.00   0.02358   0.01275   0.00495   0.00000  -0.00182  -0.00038
               -1.00   0.01391   0.00634   0.00159   0.00000   0.00167   0.00659
                3.00   0.00537   0.00037  -0.00145   0.00000   0.00466   0.01236
                7.00  -0.00188  -0.00453  -0.00388   0.00000   0.00688   0.01649
               11.00  -0.01187  -0.01118  -0.00713   0.00000   0.00974   0.02188
               15.00  -0.01781  -0.01037  -0.00677   0.00000   0.01339   0.02827
               19.00  -0.00286  -0.00472  -0.01120   0.00000   0.01469   0.02874
               23.00  -0.01897  -0.01195  -0.01366   0.00000   0.01439   0.02311
               27.00   0.00008  -0.02292  -0.01430   0.00000   0.00983   0.02419
               32.00  -0.02741  -0.02418  -0.01293   0.00000   0.01542   0.03139
               46.00  -0.05282  -0.03563  -0.01778   0.00000   0.01702   0.03266
               70.00  -0.04503  -0.02825  -0.01309   0.00000   0.01062   0.01844
              120.00   0.03887   0.02825   0.01516   0.00000  -0.01678  -0.03466
              180.00   0.01369   0.00303   0.00045   0.00000   0.00045   0.00303
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            </tableData>
          </table>
          </product>
        </function>
        <function name="aero/coefficient/CD_flap">
          <description>CD increment from flap (deg), over alpha</description>
          <product>
            <property>aero/qbar-psf</property>
            <property>metrics/Sw-sqft</property>
            <property>aero/function/mach-flap</property>
          <table>
            <independentVar lookup="row">aero/alpha-deg</independentVar>
            <independentVar lookup="column">fcs/flap-pos-deg</independentVar>
            <tableData>
                          0.00      5.00     10.00     15.00     20.00     25.00     30.00
             -180.00   0.00000   0.00053   0.00210   0.00468   0.00817   0.01247   0.01745
             -120.00   0.00000   0.00053   0.00209   0.00465   0.00813   0.01241   0.01736
              -70.00   0.00000   0.00053   0.00209   0.00465   0.00812   0.01239   0.01735
              -46.00   0.00000   0.01154   0.02704   0.04617   0.06815   0.09229   0.11821
              -32.00   0.00000   0.01112   0.02865   0.05046   0.07231   0.08862   0.08705
              -22.00   0.00000  -0.01238  -0.02019  -0.02325  -0.02171  -0.01602  -0.00833
              -17.00   0.00000  -0.00699  -0.00968  -0.00804  -0.00269   0.00550   0.01593
              -13.00   0.00000  -0.00270  -0.00094   0.00498   0.01421   0.02579   0.03913
               -9.00   0.00000   0.00171   0.00790   0.01800   0.03091   0.04566   0.06174
               -5.00   0.00000   0.00599   0.01637   0.03029   0.04648   0.06394   0.08231
               -1.00   0.00000   0.01001   0.02421   0.04149   0.06046   0.08013   0.10012
                3.00   0.00000   0.01377   0.03143   0.05158   0.07257   0.09478   0.11936
                7.00   0.00000   0.01696   0.03779   0.06342   0.09352   0.12557   0.15766
               11.00   0.00000   0.02428   0.05824   0.09678   0.13483   0.17204   0.20835
               15.00   0.00000   0.01294   0.04471   0.08543   0.12742   0.16716   0.20440
               19.00   0.00000  -0.00324   0.00882   0.03478   0.06964   0.10863   0.14854
               23.00   0.00000  -0.01371  -0.01694  -0.01130   0.00055   0.01664   0.03687
               27.00   0.00000  -0.02183  -0.03507  -0.04074  -0.04088  -0.03745  -0.03170
               32.00   0.00000  -0.03084  -0.05427  -0.07059  -0.08113  -0.08749  -0.09094
               46.00   0.00000  -0.01828  -0.03290  -0.04378  -0.05131  -0.05616  -0.05898
               70.00   0.00000   0.00053   0.00209   0.00465   0.00812   0.01239   0.01735
              120.00   0.00000   0.00053   0.00209   0.00465   0.00813   0.01241   0.01736
              180.00   0.00000   0.00053   0.00210   0.00468   0.00817   0.01247   0.01745
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            </tableData>
          </table>
          </product>
        </function>
        <function name="aero/coefficient/CD_rudder">
          <description>CD increment from rudder (deg), over alpha</description>
          <product>
            <property>aero/qbar-psf</property>
            <property>metrics/Sw-sqft</property>
            <property>aero/function/mach-rudder</property>
          <table>
            <independentVar lookup="row">aero/alpha-deg</independentVar>
            <independentVar lookup="column">fcs/rudder-pos-deg</independentVar>
            <tableData>
                        -25.00    -20.00    -15.00    -10.00     -5.00      0.00      5.00     10.00     15.00     20.00     25.00
             -180.00   0.00083   0.00054   0.00031   0.00014   0.00004   0.00000   0.00004   0.00014   0.00031   0.00054   0.00083
             -120.00   0.00010   0.00007   0.00004   0.00002   0.00000   0.00000   0.00000   0.00002   0.00004   0.00007   0.00010
              -70.00   0.00004   0.00002   0.00001   0.00001   0.00000   0.00000   0.00000   0.00001   0.00001   0.00002   0.00004
              -46.00   0.00282   0.00223   0.00157   0.00085   0.00023   0.00000   0.00023   0.00085   0.00157   0.00223   0.00282
              -32.00   0.00279   0.00217   0.00152   0.00083   0.00025   0.00000   0.00025   0.00083   0.00152   0.00217   0.00279
              -22.00   0.00296   0.00228   0.00157   0.00084   0.00024   0.00000   0.00024   0.00084   0.00157   0.00228   0.00296
              -17.00   0.00305   0.00234   0.00161   0.00085   0.00024   0.00000   0.00024   0.00085   0.00161   0.00234   0.00305
              -13.00   0.00311   0.00238   0.00163   0.00086   0.00024   0.00000   0.00024   0.00086   0.00163   0.00238   0.00311
               -9.00   0.00315   0.00241   0.00164   0.00086   0.00024   0.00000   0.00024   0.00086   0.00164   0.00241   0.00315
               -5.00   0.00315   0.00241   0.00164   0.00086   0.00024   0.00000   0.00024   0.00086   0.00164   0.00241   0.00315
               -1.00   0.00312   0.00238   0.00162   0.00085   0.00024   0.00000   0.00024   0.00085   0.00162   0.00238   0.00312
                3.00   0.00304   0.00232   0.00158   0.00083   0.00023   0.00000   0.00023   0.00083   0.00158   0.00232   0.00304
                7.00   0.00294   0.00224   0.00152   0.00080   0.00022   0.00000   0.00022   0.00080   0.00152   0.00224   0.00294
               11.00   0.00281   0.00214   0.00145   0.00076   0.00021   0.00000   0.00021   0.00076   0.00145   0.00214   0.00281
               15.00   0.00267   0.00203   0.00138   0.00073   0.00020   0.00000   0.00020   0.00073   0.00138   0.00203   0.00267
               19.00   0.00247   0.00188   0.00128   0.00067   0.00019   0.00000   0.00019   0.00067   0.00128   0.00188   0.00247
               23.00   0.00226   0.00172   0.00117   0.00062   0.00017   0.00000   0.00017   0.00062   0.00117   0.00172   0.00226
               27.00   0.00202   0.00153   0.00104   0.00054   0.00015   0.00000   0.00015   0.00054   0.00104   0.00153   0.00202
               32.00   0.00183   0.00139   0.00094   0.00049   0.00014   0.00000   0.00014   0.00049   0.00094   0.00139   0.00183
               46.00   0.00224   0.00176   0.00123   0.00066   0.00018   0.00000   0.00018   0.00066   0.00123   0.00176   0.00224
               70.00   0.00004   0.00002   0.00001   0.00001   0.00000   0.00000   0.00000   0.00001   0.00001   0.00002   0.00004
              120.00   0.00010   0.00007   0.00004   0.00002   0.00000   0.00000   0.00000   0.00002   0.00004   0.00007   0.00010
              180.00   0.00083   0.00054   0.00031   0.00014   0.00004   0.00000   0.00004   0.00014   0.00031   0.00054   0.00083
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            </tableData>
          </table>
          </product>
        </function>
        <function name="aero/coefficient/CD_ground">
          <description>Induced drag change in ground effect</description>
          <product>
            <property>aero/qbar-psf</property>
            <property>metrics/Sw-sqft</property>
            <property>aero/cl-squared</property>
            <value>0.04378</value>
          <table>
            <independentVar lookup="row">aero/h_b-mac-ft</independentVar>
            <tableData>
                    0.00   -1.00000
                    0.10   -0.28090
                    0.15   -0.14793
                    0.20   -0.08897
                    0.30   -0.04160
                    0.40   -0.02383
                    0.50   -0.01538
                    0.60   -0.01073
                    0.70   -0.00791
                    0.80   -0.00607
                    0.90   -0.00480
                    1.00   -0.00389
                    1.10   -0.00322
            </tableData>
          </table>
          </product>
        </function>
      </axis>
      <axis name="SIDE">
        <function name="aero/coefficient/CY_base">
          <description>CY over alpha and beta (hangar)</description>
          <product>
            <property>aero/qbar-psf</property>
            <property>metrics/Sw-sqft</property>
            <property>aero/function/mach-side</property>
          <table>
            <independentVar lookup="row">aero/alpha-deg</independentVar>
            <independentVar lookup="column">aero/beta-deg</independentVar>
            <tableData>
                        -90.00    -70.00    -50.00    -40.00    -30.00    -25.00    -20.00    -15.00    -10.00     -6.00     -3.00      0.00      3.00      6.00     10.00     15.00     20.00     25.00     30.00     40.00     50.00     70.00     90.00
             -180.00  -0.00001   0.15808   0.19563   0.16942   0.12303   0.09653   0.07032   0.04619   0.04670   0.05128   0.02672  -0.00000  -0.02672  -0.05128  -0.04670  -0.04619  -0.07032  -0.09653  -0.12303  -0.16942  -0.19563  -0.15808   0.00001
             -120.00  -0.00000  -0.07959  -0.32025  -0.40545  -0.41904  -0.39343  -0.34618  -0.27923  -0.19597  -0.11881  -0.05135  -0.00000   0.05135   0.11881   0.19597   0.27923   0.34618   0.39343   0.41904   0.40545   0.32025   0.07959   0.00000
              -70.00   0.00000  -0.09208  -0.33220  -0.41424  -0.42436  -0.39712  -0.34826  -0.27953  -0.19377  -0.11463  -0.05183  -0.00000   0.05183   0.11463   0.19377   0.27953   0.34826   0.39712   0.42436   0.41424   0.33220   0.09208  -0.00000
              -46.00   0.00001   0.02390  -0.06677  -0.11241  -0.12993  -0.12373  -0.10622  -0.07144  -0.03723  -0.02421  -0.01224  -0.00000   0.01224   0.02421   0.03723   0.07144   0.10622   0.12373   0.12993   0.11241   0.06677  -0.02390  -0.00001
              -32.00   0.00001   0.09149   0.08365   0.05290   0.03919   0.04174   0.05274   0.03327   0.01994   0.01100   0.00521  -0.00000  -0.00521  -0.01100  -0.01994  -0.03327  -0.05274  -0.04174  -0.03919  -0.05290  -0.08365  -0.09149  -0.00001
              -22.00   0.00001   0.14018   0.17615   0.15952   0.14233   0.15443   0.12300   0.08993   0.05782   0.03360   0.01644  -0.00000  -0.01644  -0.03360  -0.05782  -0.08993  -0.12300  -0.15443  -0.14233  -0.15952  -0.17615  -0.14018  -0.00001
              -17.00   0.00001   0.16347   0.21555   0.19588   0.17423   0.17818   0.14201   0.10379   0.06665   0.03867   0.01891  -0.00000  -0.01891  -0.03867  -0.06665  -0.10379  -0.14201  -0.17818  -0.17423  -0.19588  -0.21555  -0.16347  -0.00001
              -13.00   0.00001   0.17994   0.23441   0.21096   0.19175   0.18773   0.14891   0.10848   0.06934   0.04006   0.01955  -0.00000  -0.01955  -0.04006  -0.06934  -0.10848  -0.14891  -0.18773  -0.19175  -0.21096  -0.23441  -0.17994  -0.00001
               -9.00   0.00001   0.18961   0.24247   0.21925   0.20641   0.19066   0.15042   0.10894   0.06908   0.03962   0.01923  -0.00000  -0.01923  -0.03962  -0.06908  -0.10894  -0.15042  -0.19066  -0.20641  -0.21925  -0.24247  -0.18961  -0.00001
               -5.00   0.00001   0.19089   0.24508   0.21751   0.20195   0.18342   0.14416   0.10394   0.06548   0.03725   0.01793  -0.00000  -0.01793  -0.03725  -0.06548  -0.10394  -0.14416  -0.18342  -0.20195  -0.21751  -0.24508  -0.19089  -0.00001
               -1.00   0.00001   0.18396   0.24134   0.20794   0.18937   0.16939   0.13250   0.09500   0.05949   0.03366   0.01612  -0.00000  -0.01612  -0.03366  -0.05949  -0.09500  -0.13250  -0.16939  -0.18937  -0.20794  -0.24134  -0.18396  -0.00001
                3.00   0.00001   0.17165   0.22848   0.19205   0.17121   0.14955   0.11580   0.08225   0.05111   0.02888   0.01389  -0.00000  -0.01389  -0.02888  -0.05111  -0.08225  -0.11580  -0.14955  -0.17121  -0.19205  -0.22848  -0.17165  -0.00001
                7.00   0.00001   0.15913   0.20230   0.16816   0.14743   0.12213   0.09238   0.06429   0.03915   0.02181   0.01041  -0.00000  -0.01041  -0.02181  -0.03915  -0.06429  -0.09238  -0.12213  -0.14743  -0.16816  -0.20230  -0.15913  -0.00001
               11.00   0.00001   0.14564   0.17240   0.14162   0.11858   0.08791   0.06166   0.04004   0.02247   0.01164   0.00527  -0.00000  -0.00527  -0.01164  -0.02247  -0.04004  -0.06166  -0.08791  -0.11858  -0.14162  -0.17240  -0.14564  -0.00001
               15.00   0.00001   0.12975   0.14674   0.11348   0.07821   0.07506   0.05191   0.03307   0.01821   0.00987   0.00672  -0.00000  -0.00672  -0.00987  -0.01821  -0.03307  -0.05191  -0.07506  -0.07821  -0.11348  -0.14674  -0.12975  -0.00001
               19.00   0.00001   0.11387   0.11942   0.08377   0.05248   0.05360   0.03245   0.01748   0.00719   0.00250   0.00095  -0.00000  -0.00095  -0.00250  -0.00719  -0.01748  -0.03245  -0.05360  -0.05248  -0.08377  -0.11942  -0.11387  -0.00001
               23.00   0.00001   0.09954   0.08673   0.05026   0.01900   0.02445   0.00803  -0.00072  -0.00472  -0.00446  -0.00251  -0.00000   0.00251   0.00446   0.00472   0.00072  -0.00803  -0.02445  -0.01900  -0.05026  -0.08673  -0.09954  -0.00001
               27.00   0.00001   0.08429   0.04933   0.01125  -0.01450  -0.00427  -0.01671  -0.02113  -0.01836  -0.01258  -0.00659  -0.00000   0.00659   0.01258   0.01836   0.02113   0.01671   0.00427   0.01450  -0.01125  -0.04933  -0.08429  -0.00001
               32.00   0.00001   0.06146  -0.00261  -0.04524  -0.06415  -0.04188  -0.04213  -0.04172  -0.03305  -0.02158  -0.01115  -0.00000   0.01115   0.02158   0.03305   0.04172   0.04213   0.04188   0.06415   0.04524   0.00261  -0.06146  -0.00001
               46.00   0.00001  -0.01025  -0.16363  -0.22693  -0.23856  -0.22079  -0.18697  -0.12275  -0.08605  -0.05369  -0.02670  -0.00000   0.02670   0.05369   0.08605   0.12275   0.18697   0.22079   0.23856   0.22693   0.16363   0.01025  -0.00001
               70.00   0.00000  -0.11413  -0.39453  -0.48836  -0.49797  -0.46523  -0.40750  -0.32689  -0.22679  -0.13490  -0.06206  -0.00000   0.06206   0.13490   0.22679   0.32689   0.40750   0.46523   0.49797   0.48836   0.39453   0.11413  -0.00000
              120.00  -0.00000  -0.04978  -0.23619  -0.30551  -0.31982  -0.30161  -0.26633  -0.21540  -0.15145  -0.09149  -0.03756  -0.00000   0.03756   0.09149   0.15145   0.21540   0.26633   0.30161   0.31982   0.30551   0.23619   0.04978   0.00000
              180.00  -0.00001   0.15808   0.19563   0.16942   0.12303   0.09653   0.07032   0.04619   0.04670   0.05128   0.02672  -0.00000  -0.02672  -0.05128  -0.04670  -0.04619  -0.07032  -0.09653  -0.12303  -0.16942  -0.19563  -0.15808   0.00001
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            </tableData>
          </table>
          </product>
        </function>
        <function name="aero/coefficient/CY_aileron">
          <description>CY increment from aileron (deg), over alpha</description>
          <product>
            <property>aero/qbar-psf</property>
            <property>metrics/Sw-sqft</property>
            <property>aero/function/mach-aileron</property>
          <table>
            <independentVar lookup="row">aero/alpha-deg</independentVar>
            <independentVar lookup="column">fcs/left-aileron-pos-deg</independentVar>
            <tableData>
                        -20.00    -15.00    -10.00     -5.00      0.00      5.00     10.00     15.00     20.00
             -180.00   0.00000   0.00000   0.00000   0.00000   0.00000   0.00000   0.00000   0.00000   0.00000
             -120.00  -0.00084  -0.00072  -0.00053  -0.00028   0.00000   0.00028   0.00053   0.00072   0.00084
              -70.00   0.00061   0.00052   0.00038   0.00020   0.00000  -0.00020  -0.00038  -0.00052  -0.00061
              -46.00   0.00291   0.00256   0.00194   0.00105   0.00000  -0.00105  -0.00194  -0.00256  -0.00291
              -32.00   0.00564   0.00490   0.00373   0.00203   0.00000  -0.00203  -0.00373  -0.00490  -0.00564
              -22.00   0.00870   0.00752   0.00565   0.00302   0.00000  -0.00302  -0.00565  -0.00752  -0.00870
              -17.00   0.01091   0.00939   0.00702   0.00375   0.00000  -0.00375  -0.00702  -0.00939  -0.01091
              -13.00   0.01112   0.00957   0.00716   0.00383   0.00000  -0.00383  -0.00716  -0.00957  -0.01112
               -9.00   0.01120   0.00964   0.00721   0.00386   0.00000  -0.00386  -0.00721  -0.00964  -0.01120
               -5.00   0.01114   0.00960   0.00718   0.00384   0.00000  -0.00384  -0.00718  -0.00960  -0.01114
               -1.00   0.01097   0.00945   0.00707   0.00378   0.00000  -0.00378  -0.00707  -0.00945  -0.01097
                3.00   0.01064   0.00917   0.00686   0.00367   0.00000  -0.00367  -0.00686  -0.00917  -0.01064
                7.00   0.01094   0.00925   0.00678   0.00357   0.00000  -0.00357  -0.00678  -0.00925  -0.01094
               11.00   0.01462   0.01258   0.00946   0.00510   0.00000  -0.00510  -0.00946  -0.01258  -0.01462
               15.00  -0.00433  -0.00496  -0.00615  -0.00775   0.00000   0.00775   0.00615   0.00496   0.00433
               19.00  -0.00197  -0.00126  -0.00073  -0.00034   0.00000   0.00034   0.00073   0.00126   0.00197
               23.00  -0.00167  -0.00116  -0.00073  -0.00036   0.00000   0.00036   0.00073   0.00116   0.00167
               27.00  -0.00061  -0.00029  -0.00009  -0.00002   0.00000   0.00002   0.00009   0.00029   0.00061
               32.00   0.00007   0.00029   0.00034   0.00021   0.00000  -0.00021  -0.00034  -0.00029  -0.00007
               46.00   0.00097   0.00095   0.00077   0.00043   0.00000  -0.00043  -0.00077  -0.00095  -0.00097
               70.00   0.00023   0.00019   0.00014   0.00008   0.00000  -0.00008  -0.00014  -0.00019  -0.00023
              120.00  -0.00167  -0.00142  -0.00105  -0.00056   0.00000   0.00056   0.00105   0.00142   0.00167
              180.00   0.00000   0.00000   0.00000   0.00000   0.00000   0.00000   0.00000   0.00000   0.00000
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            </tableData>
          </table>
          </product>
        </function>
        <function name="aero/coefficient/CY_rudder">
          <description>CY increment from rudder (deg), over alpha</description>
          <product>
            <property>aero/qbar-psf</property>
            <property>metrics/Sw-sqft</property>
            <property>aero/function/mach-rudder</property>
          <table>
            <independentVar lookup="row">aero/alpha-deg</independentVar>
            <independentVar lookup="column">fcs/rudder-pos-deg</independentVar>
            <tableData>
                        -25.00    -20.00    -15.00    -10.00     -5.00      0.00      5.00     10.00     15.00     20.00     25.00
             -180.00   0.00000   0.00000   0.00000   0.00000   0.00000   0.00000   0.00000   0.00000   0.00000   0.00000   0.00000
             -120.00   0.00000   0.00000   0.00000   0.00000   0.00000   0.00000   0.00000   0.00000   0.00000   0.00000   0.00000
              -70.00  -0.00868  -0.00783  -0.00665  -0.00493  -0.00262   0.00000   0.00262   0.00493   0.00665   0.00783   0.00868
              -46.00  -0.02614  -0.02363  -0.02012  -0.01494  -0.00793   0.00000   0.00793   0.01494   0.02012   0.02363   0.02614
              -32.00  -0.02245  -0.02021  -0.01716  -0.01274  -0.00680   0.00000   0.00680   0.01274   0.01716   0.02021   0.02245
              -22.00  -0.02800  -0.02524  -0.02145  -0.01592  -0.00850   0.00000   0.00850   0.01592   0.02145   0.02524   0.02800
              -17.00  -0.02996  -0.02697  -0.02288  -0.01695  -0.00902   0.00000   0.00902   0.01695   0.02288   0.02697   0.02996
              -13.00  -0.03113  -0.02800  -0.02373  -0.01755  -0.00932   0.00000   0.00932   0.01755   0.02373   0.02800   0.03113
               -9.00  -0.03182  -0.02861  -0.02424  -0.01792  -0.00952   0.00000   0.00952   0.01792   0.02424   0.02861   0.03182
               -5.00  -0.03205  -0.02882  -0.02443  -0.01807  -0.00960   0.00000   0.00960   0.01807   0.02443   0.02882   0.03205
               -1.00  -0.03196  -0.02875  -0.02437  -0.01802  -0.00957   0.00000   0.00957   0.01802   0.02437   0.02875   0.03196
                3.00  -0.03153  -0.02837  -0.02405  -0.01779  -0.00945   0.00000   0.00945   0.01779   0.02405   0.02837   0.03153
                7.00  -0.03075  -0.02767  -0.02346  -0.01735  -0.00922   0.00000   0.00922   0.01735   0.02346   0.02767   0.03075
               11.00  -0.02963  -0.02666  -0.02260  -0.01672  -0.00888   0.00000   0.00888   0.01672   0.02260   0.02666   0.02963
               15.00  -0.02779  -0.02497  -0.02115  -0.01564  -0.00831   0.00000   0.00831   0.01564   0.02115   0.02497   0.02779
               19.00  -0.02680  -0.02412  -0.02046  -0.01514  -0.00804   0.00000   0.00804   0.01514   0.02046   0.02412   0.02680
               23.00  -0.02494  -0.02245  -0.01904  -0.01409  -0.00748   0.00000   0.00748   0.01409   0.01904   0.02245   0.02494
               27.00  -0.02279  -0.02050  -0.01738  -0.01285  -0.00683   0.00000   0.00683   0.01285   0.01738   0.02050   0.02279
               32.00  -0.02046  -0.01835  -0.01551  -0.01145  -0.00607   0.00000   0.00607   0.01145   0.01551   0.01835   0.02046
               46.00  -0.02509  -0.02268  -0.01931  -0.01432  -0.00757   0.00000   0.00757   0.01432   0.01931   0.02268   0.02509
               70.00  -0.00868  -0.00783  -0.00665  -0.00493  -0.00262   0.00000   0.00262   0.00493   0.00665   0.00783   0.00868
              120.00   0.00000   0.00000   0.00000   0.00000   0.00000   0.00000   0.00000   0.00000   0.00000   0.00000   0.00000
              180.00   0.00000   0.00000   0.00000   0.00000   0.00000   0.00000   0.00000   0.00000   0.00000   0.00000   0.00000
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            </tableData>
          </table>
          </product>
        </function>
        <function name="aero/coefficient/CYp">
          <description>CY per p (non-dimensional), over alpha</description>
          <product>
            <property>aero/qbar-psf</property>
            <property>metrics/Sw-sqft</property>
            <property>aero/bi2vel</property>
            <property>velocities/p-aero-rad_sec</property>
            <property>aero/function/mach-lift</property>
          <table>
            <independentVar lookup="row">aero/alpha-deg</independentVar>
            <tableData>
                 -180.00    0.01176
                 -165.00   -0.01206
                 -105.00    0.08593
                  -60.00    0.04674
                  -42.00    0.00797
                  -30.00   -0.26828
                  -20.00    0.13331
                  -16.00    0.14021
                  -12.00    0.14250
                   -8.00    0.14395
                   -4.00    0.14249
                    0.00    0.14125
                    4.00    0.13171
                    8.00    0.09967
                   12.00   -0.01663
                   16.00    0.64807
                   20.00    0.20634
                   24.00    0.14599
                   28.00   -0.13710
                   35.00    0.07505
                   50.00    0.03847
                   80.00    0.09050
                  135.00    0.02803
                  180.00    0.01176
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            </tableData>
          </table>
          </product>
        </function>
        <function name="aero/coefficient/CYr">
          <description>CY per r (non-dimensional), over alpha</description>
          <product>
            <property>aero/qbar-psf</property>
            <property>metrics/Sw-sqft</property>
            <property>aero/bi2vel</property>
            <property>velocities/r-aero-rad_sec</property>
            <property>aero/function/mach-lift</property>
          <table>
            <independentVar lookup="row">aero/alpha-deg</independentVar>
            <tableData>
                 -180.00    0.33502
                 -165.00    0.32956
                 -105.00    0.05932
                  -60.00    0.24643
                  -42.00    0.24984
                  -30.00    0.40483
                  -20.00    0.21705
                  -16.00    0.21394
                  -12.00    0.21041
                   -8.00    0.20598
                   -4.00    0.20025
                    0.00    0.18907
                    4.00    0.16946
                    8.00    0.14406
                   12.00    0.09294
                   16.00    0.40673
                   20.00    0.18785
                   24.00    0.15230
                   28.00   -0.05415
                   35.00    0.11101
                   50.00    0.18247
                   80.00    0.05338
                  135.00    0.26361
                  180.00    0.33502
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            </tableData>
          </table>
          </product>
        </function>
      </axis>
      <axis name="LIFT">
        <function name="aero/coefficient/CL_base">
          <description>CL over alpha and beta, ground effect, compressibility (hangar)</description>
          <product>
            <property>aero/qbar-psf</property>
            <property>metrics/Sw-sqft</property>
            <property>aero/function/CL-base</property>
            <property>aero/function/mach-lift</property>
          <table>
            <independentVar lookup="row">aero/h_b-mac-ft</independentVar>
            <tableData>
                    0.00    1.20000
                    0.10    1.08692
                    0.15    1.05730
                    0.20    1.03778
                    0.30    1.01642
                    0.40    1.00713
                    0.50    1.00310
                    0.60    1.00135
                    0.70    1.00059
                    0.80    1.00025
                    0.90    1.00011
                    1.00    1.00005
                    1.10    1.00000
            </tableData>
          </table>
          </product>
        </function>
        <function name="aero/coefficient/CL_elevator">
          <description>CL increment from elevator (deg), over alpha</description>
          <product>
            <property>aero/qbar-psf</property>
            <property>metrics/Sw-sqft</property>
            <property>aero/function/mach-elevator</property>
          <table>
            <independentVar lookup="row">aero/alpha-deg</independentVar>
            <independentVar lookup="column">fcs/elevator-pos-deg</independentVar>
            <tableData>
                        -15.00    -10.00     -5.00      0.00      5.00     10.00
             -180.00  -0.05337  -0.07207  -0.07651   0.00000   0.07651   0.07207
             -120.00   0.01430   0.01268   0.00786   0.00000  -0.01067  -0.02383
              -70.00   0.05371   0.03503   0.01696   0.00000  -0.01542  -0.02894
              -46.00   0.02813   0.01647   0.00706   0.00000  -0.00480  -0.00776
              -32.00   0.01384   0.00831   0.00416   0.00000  -0.00793  -0.06451
              -22.00   0.04770   0.03783  -0.00033   0.00000   0.04913   0.10345
              -17.00  -0.00668  -0.01930  -0.04803   0.00000   0.05569   0.11378
              -13.00  -0.04570  -0.09110  -0.05544   0.00000   0.05817   0.11802
               -9.00  -0.08179  -0.11060  -0.05822   0.00000   0.05987   0.12074
               -5.00  -0.15653  -0.11799  -0.05994   0.00000   0.06088   0.12206
               -1.00  -0.17715  -0.12114  -0.06098   0.00000   0.06116   0.12190
                3.00  -0.18252  -0.12232  -0.06121   0.00000   0.06066   0.12024
                7.00  -0.18289  -0.12173  -0.06060   0.00000   0.05936   0.11702
               11.00  -0.17366  -0.11502  -0.05662   0.00000   0.05394   0.10608
               15.00  -0.13876  -0.08428  -0.02695   0.00000   0.04246   0.08326
               19.00  -0.14079  -0.03772  -0.04531   0.00000   0.04591   0.08218
               23.00  -0.05754  -0.08150  -0.04501   0.00000   0.03581  -0.03698
               27.00  -0.09535  -0.07639  -0.03474   0.00000  -0.07537  -0.08382
               32.00   0.02055   0.05695   0.01419   0.00000  -0.00631  -0.01146
               46.00   0.01225   0.00919   0.00543   0.00000  -0.00756  -0.01739
               70.00   0.04125   0.02949   0.01566   0.00000  -0.01714  -0.03534
              120.00   0.03907   0.02383   0.01067   0.00000  -0.00786  -0.01268
              180.00  -0.05337  -0.07207  -0.07651   0.00000   0.07651   0.07207
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            </tableData>
          </table>
          </product>
        </function>
        <function name="aero/coefficient/CL_flap">
          <description>CL increment from flap (deg), over alpha</description>
          <product>
            <property>aero/qbar-psf</property>
            <property>metrics/Sw-sqft</property>
            <property>aero/function/mach-flap</property>
          <table>
            <independentVar lookup="row">aero/alpha-deg</independentVar>
            <independentVar lookup="column">fcs/flap-pos-deg</independentVar>
            <tableData>
                          0.00      5.00     10.00     15.00     20.00     25.00     30.00
             -180.00   0.00000   0.00544   0.01086   0.01599   0.02060   0.02469   0.02838
             -120.00   0.00000   0.01935   0.03866   0.05688   0.07330   0.08785   0.10096
              -70.00   0.00000   0.02524   0.05196   0.07866   0.10400   0.12753   0.14965
              -46.00   0.00000   0.06458   0.13248   0.19887   0.25967   0.31348   0.36134
              -32.00   0.00000   0.09654   0.19624   0.28811   0.36332   0.41649   0.44824
              -22.00   0.00000   0.15828   0.32351   0.48301   0.62978   0.76457   0.92370
              -17.00   0.00000   0.16818   0.33683   0.49649   0.64061   0.76829   0.88345
              -13.00   0.00000   0.17086   0.34162   0.50253   0.64682   0.77379   0.88756
               -9.00   0.00000   0.17185   0.34315   0.50418   0.64823   0.77469   0.88762
               -5.00   0.00000   0.17155   0.34214   0.50216   0.64507   0.77032   0.88202
               -1.00   0.00000   0.17036   0.33947   0.49782   0.63891   0.76220   0.87131
                3.00   0.00000   0.16601   0.33029   0.48314   0.61644   0.72844   0.82294
                7.00   0.00000   0.15701   0.30463   0.42901   0.52688   0.60362   0.66719
               11.00   0.00000   0.11398   0.21804   0.31101   0.38873   0.45632   0.51606
               15.00   0.00000   0.20958   0.39161   0.53847   0.65274   0.74260   0.81680
               19.00   0.00000   0.15141   0.30789   0.45706   0.59220   0.71204   0.81645
               23.00   0.00000   0.12107   0.24206   0.35473   0.45403   0.54056   0.61882
               27.00   0.00000   0.10344   0.20552   0.29946   0.38089   0.44948   0.50741
               32.00   0.00000   0.08584   0.17287   0.25427   0.32546   0.38558   0.43627
               46.00   0.00000   0.04491   0.08948   0.13072   0.16673   0.19740   0.22383
               70.00   0.00000   0.00703   0.01370   0.01970   0.02485   0.02923   0.03301
              120.00   0.00000   0.04608   0.09207   0.13549   0.17462   0.20929   0.24054
              180.00   0.00000   0.00544   0.01086   0.01599   0.02060   0.02469   0.02838
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            </tableData>
          </table>
          <table>
            <independentVar lookup="row">aero/h_b-mac-ft</independentVar>
            <tableData>
                    0.00    1.20000
                    0.10    1.08692
                    0.15    1.05730
                    0.20    1.03778
                    0.30    1.01642
                    0.40    1.00713
                    0.50    1.00310
                    0.60    1.00135
                    0.70    1.00059
                    0.80    1.00025
                    0.90    1.00011
                    1.00    1.00005
                    1.10    1.00000
            </tableData>
          </table>
          </product>
        </function>
        <function name="aero/coefficient/CLq">
          <description>CL per q (non-dimensional), over alpha</description>
          <product>
            <property>aero/qbar-psf</property>
            <property>metrics/Sw-sqft</property>
            <property>aero/ci2vel</property>
            <property>velocities/q-aero-rad_sec</property>
            <property>aero/function/mach-lift</property>
          <table>
            <independentVar lookup="row">aero/alpha-deg</independentVar>
            <tableData>
                 -180.00   -5.10287
                 -165.00   -0.28968
                 -105.00   -0.68065
                  -60.00    0.96359
                  -42.00    1.33058
                  -30.00   -1.43840
                  -20.00    5.65646
                  -16.00    6.95764
                  -12.00    8.52113
                   -8.00    9.18097
                   -4.00    9.56441
                    0.00    9.75342
                    4.00    9.71613
                    8.00    8.40924
                   12.00    3.82854
                   16.00    1.47196
                   20.00    1.81839
                   24.00    1.72139
                   28.00    1.31531
                   35.00    0.37209
                   50.00    1.47327
                   80.00    0.48066
                  135.00   -1.29818
                  180.00   -5.10287
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            </tableData>
          </table>
          </product>
        </function>
        <function name="aero/coefficient/CLadot">
          <description>CL per alpha-dot (downwash lag at the tail)</description>
          <product>
            <property>aero/qbar-psf</property>
            <property>metrics/Sw-sqft</property>
            <property>aero/ci2vel</property>
            <property>aero/alphadot-rad_sec</property>
            <value>1.05464</value>
            <property>aero/function/mach-lift</property>
          </product>
        </function>
      </axis>
      <axis name="ROLL">
        <function name="aero/coefficient/Cl_base">
          <description>Cl over alpha and beta (hangar)</description>
          <product>
            <property>aero/qbar-psf</property>
            <property>metrics/Sw-sqft</property>
            <property>metrics/bw-ft</property>
            <property>aero/function/mach-side</property>
          <table>
            <independentVar lookup="row">aero/alpha-deg</independentVar>
            <independentVar lookup="column">aero/beta-deg</independentVar>
            <tableData>
                        -90.00    -70.00    -50.00    -40.00    -30.00    -25.00    -20.00    -15.00    -10.00     -6.00     -3.00      0.00      3.00      6.00     10.00     15.00     20.00     25.00     30.00     40.00     50.00     70.00     90.00
             -180.00  -0.00320  -0.01121  -0.01197  -0.01162  -0.01148  -0.01100  -0.01000  -0.00836  -0.00470  -0.00129  -0.00051  -0.00000   0.00051   0.00129   0.00470   0.00836   0.01000   0.01100   0.01148   0.01162   0.01197   0.01121   0.00320
             -120.00  -0.00320  -0.01440  -0.02136  -0.02127  -0.01869  -0.01654  -0.01388  -0.01081  -0.00740  -0.00438  -0.00165  -0.00000   0.00165   0.00438   0.00740   0.01081   0.01388   0.01654   0.01869   0.02127   0.02136   0.01440   0.00320
              -70.00  -0.00320  -0.01495  -0.02238  -0.02239  -0.01974  -0.01749  -0.01468  -0.01138  -0.00765  -0.00436  -0.00180  -0.00000   0.00180   0.00436   0.00765   0.01138   0.01468   0.01749   0.01974   0.02239   0.02238   0.01495   0.00320
              -46.00  -0.00320  -0.01089  -0.01569  -0.01523  -0.01279  -0.01086  -0.00838  -0.00520  -0.00237  -0.00143  -0.00070  -0.00000   0.00070   0.00143   0.00237   0.00520   0.00838   0.01086   0.01279   0.01523   0.01569   0.01089   0.00320
              -32.00  -0.00320  -0.00432  -0.00745  -0.01314  -0.03742  -0.04277  -0.03848  -0.03001  -0.02054  -0.01250  -0.00629  -0.00000   0.00629   0.01250   0.02054   0.03001   0.03848   0.04277   0.03742   0.01314   0.00745   0.00432   0.00320
              -22.00  -0.00320  -0.01398  -0.00813  -0.02584  -0.06691  -0.07085  -0.06304  -0.04953  -0.03411  -0.02080  -0.01046  -0.00000   0.01046   0.02080   0.03411   0.04953   0.06304   0.07085   0.06691   0.02584   0.00813   0.01398   0.00320
              -17.00  -0.00320  -0.02071  -0.03206  -0.04954  -0.06324  -0.06086  -0.05189  -0.04019  -0.02740  -0.01662  -0.00834  -0.00000   0.00834   0.01662   0.02740   0.04019   0.05189   0.06086   0.06324   0.04954   0.03206   0.02071   0.00320
              -13.00  -0.00320  -0.02672  -0.04549  -0.04233  -0.04454  -0.04180  -0.03512  -0.02715  -0.01847  -0.01119  -0.00561  -0.00000   0.00561   0.01119   0.01847   0.02715   0.03512   0.04180   0.04454   0.04233   0.04549   0.02672   0.00320
               -9.00  -0.00320  -0.03077  -0.04550  -0.03403  -0.02564  -0.02224  -0.01833  -0.01408  -0.00953  -0.00575  -0.00288  -0.00000   0.00288   0.00575   0.00953   0.01408   0.01833   0.02224   0.02564   0.03403   0.04550   0.03077   0.00320
               -5.00  -0.00320  -0.02925  -0.04575  -0.02526  -0.00696  -0.00237  -0.00154  -0.00103  -0.00059  -0.00031  -0.00014  -0.00000   0.00014   0.00031   0.00059   0.00103   0.00154   0.00237   0.00696   0.02526   0.04575   0.02925   0.00320
               -1.00  -0.00320  -0.02406  -0.04480  -0.01676   0.01161   0.01781   0.01535   0.01209   0.00837   0.00512   0.00258  -0.00000  -0.00258  -0.00512  -0.00837  -0.01209  -0.01535  -0.01781  -0.01161   0.01676   0.04480   0.02406   0.00320
                3.00  -0.00320  -0.01737  -0.03269  -0.00913   0.02991   0.03781   0.03237   0.02531   0.01738   0.01059   0.00533  -0.00000  -0.00533  -0.01059  -0.01738  -0.02531  -0.03237  -0.03781  -0.02991   0.00913   0.03269   0.01737   0.00320
                7.00  -0.00320  -0.01181  -0.00399   0.00815   0.04949   0.05831   0.05030   0.03915   0.02680   0.01631   0.00820  -0.00000  -0.00820  -0.01631  -0.02680  -0.03915  -0.05030  -0.05831  -0.04949  -0.00815   0.00399   0.01181   0.00320
               11.00  -0.00320  -0.00680   0.01732   0.04534   0.08566   0.09416   0.08395   0.06644   0.04599   0.02813   0.01418  -0.00000  -0.01418  -0.02813  -0.04599  -0.06644  -0.08395  -0.09416  -0.08566  -0.04534  -0.01732   0.00680   0.00320
               15.00  -0.00320  -0.00230   0.01386   0.04016   0.08999   0.09647   0.08641   0.06899   0.04957   0.03300   0.02003  -0.00000  -0.02003  -0.03300  -0.04957  -0.06899  -0.08641  -0.09647  -0.08999  -0.04016  -0.01386   0.00230   0.00320
               19.00  -0.00320  -0.00007  -0.00102   0.01375   0.05118   0.05965   0.05444   0.04230   0.02890   0.01757   0.00886  -0.00000  -0.00886  -0.01757  -0.02890  -0.04230  -0.05444  -0.05965  -0.05118  -0.01375   0.00102   0.00007   0.00320
               23.00  -0.00320  -0.00275  -0.00532   0.00480   0.03094   0.03883   0.03734   0.02916   0.02000   0.01219   0.00615  -0.00000  -0.00615  -0.01219  -0.02000  -0.02916  -0.03734  -0.03883  -0.03094  -0.00480   0.00532   0.00275   0.00320
               27.00  -0.00320  -0.00660  -0.00848  -0.00281   0.01354   0.02145   0.02194   0.01685   0.01152   0.00701   0.00353  -0.00000  -0.00353  -0.00701  -0.01152  -0.01685  -0.02194  -0.02145  -0.01354   0.00281   0.00848   0.00660   0.00320
               32.00  -0.00320  -0.00853  -0.01159  -0.00819  -0.00106   0.00274   0.00426   0.00357   0.00246   0.00150   0.00076  -0.00000  -0.00076  -0.00150  -0.00246  -0.00357  -0.00426  -0.00274   0.00106   0.00819   0.01159   0.00853   0.00320
               46.00  -0.00320  -0.01203  -0.01735  -0.01676  -0.01288  -0.01027  -0.00749  -0.00374  -0.00210  -0.00122  -0.00056  -0.00000   0.00056   0.00122   0.00210   0.00374   0.00749   0.01027   0.01288   0.01676   0.01735   0.01203   0.00320
               70.00  -0.00320  -0.01546  -0.02316  -0.02317  -0.02043  -0.01809  -0.01518  -0.01177  -0.00792  -0.00452  -0.00188  -0.00000   0.00188   0.00452   0.00792   0.01177   0.01518   0.01809   0.02043   0.02317   0.02316   0.01546   0.00320
              120.00  -0.00320  -0.01373  -0.02032  -0.02024  -0.01778  -0.01573  -0.01321  -0.01028  -0.00704  -0.00416  -0.00154  -0.00000   0.00154   0.00416   0.00704   0.01028   0.01321   0.01573   0.01778   0.02024   0.02032   0.01373   0.00320
              180.00  -0.00320  -0.01121  -0.01197  -0.01162  -0.01148  -0.01100  -0.01000  -0.00836  -0.00470  -0.00129  -0.00051  -0.00000   0.00051   0.00129   0.00470   0.00836   0.01000   0.01100   0.01148   0.01162   0.01197   0.01121   0.00320
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            </tableData>
          </table>
          </product>
        </function>
        <function name="aero/coefficient/Cl_aileron">
          <description>Cl increment from aileron (deg), over alpha</description>
          <product>
            <property>aero/qbar-psf</property>
            <property>metrics/Sw-sqft</property>
            <property>metrics/bw-ft</property>
            <property>aero/function/mach-aileron</property>
          <table>
            <independentVar lookup="row">aero/alpha-deg</independentVar>
            <independentVar lookup="column">fcs/left-aileron-pos-deg</independentVar>
            <tableData>
                        -20.00    -15.00    -10.00     -5.00      0.00      5.00     10.00     15.00     20.00
             -180.00   0.00000   0.00000   0.00000   0.00000   0.00000   0.00000   0.00000   0.00000   0.00000
              -35.00  -0.01515  -0.01357  -0.01049  -0.00572   0.00000   0.00572   0.01049   0.01357   0.01515
              -11.00  -0.04037  -0.03461  -0.02582  -0.01378   0.00000   0.01378   0.02582   0.03461   0.04037
                4.00  -0.03990  -0.03424  -0.02556  -0.01365   0.00000   0.01365   0.02556   0.03424   0.03990
               19.00  -0.03744  -0.03206  -0.02394  -0.01281   0.00000   0.01281   0.02394   0.03206   0.03744
               42.00  -0.00658  -0.00625  -0.00500  -0.00278   0.00000   0.00278   0.00500   0.00625   0.00658
              180.00   0.00000   0.00000   0.00000   0.00000   0.00000   0.00000   0.00000   0.00000   0.00000
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            </tableData>
          </table>
          </product>
        </function>
        <function name="aero/coefficient/Cl_rudder">
          <description>Cl increment from rudder (deg), over alpha</description>
          <product>
            <property>aero/qbar-psf</property>
            <property>metrics/Sw-sqft</property>
            <property>metrics/bw-ft</property>
            <property>aero/function/mach-rudder</property>
          <table>
            <independentVar lookup="row">aero/alpha-deg</independentVar>
            <independentVar lookup="column">fcs/rudder-pos-deg</independentVar>
            <tableData>
                        -25.00    -20.00    -15.00    -10.00     -5.00      0.00      5.00     10.00     15.00     20.00     25.00
             -180.00   0.00000   0.00000   0.00000   0.00000   0.00000   0.00000   0.00000   0.00000   0.00000   0.00000   0.00000
              -35.00  -0.00154  -0.00137  -0.00115  -0.00084  -0.00045   0.00000   0.00045   0.00084   0.00115   0.00137   0.00154
              -11.00  -0.00175  -0.00155  -0.00129  -0.00095  -0.00050   0.00000   0.00050   0.00095   0.00129   0.00155   0.00175
                4.00  -0.00186  -0.00165  -0.00138  -0.00101  -0.00053   0.00000   0.00053   0.00101   0.00138   0.00165   0.00186
               19.00  -0.00178  -0.00158  -0.00133  -0.00097  -0.00052   0.00000   0.00052   0.00097   0.00133   0.00158   0.00178
               42.00  -0.00160  -0.00143  -0.00120  -0.00089  -0.00047   0.00000   0.00047   0.00089   0.00120   0.00143   0.00160
              180.00   0.00000   0.00000   0.00000   0.00000   0.00000   0.00000   0.00000   0.00000   0.00000   0.00000   0.00000
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            </tableData>
          </table>
          </product>
        </function>
        <function name="aero/coefficient/Clp">
          <description>Cl per p (non-dimensional), over alpha</description>
          <product>
            <property>aero/qbar-psf</property>
            <property>metrics/Sw-sqft</property>
            <property>metrics/bw-ft</property>
            <property>aero/bi2vel</property>
            <property>velocities/p-aero-rad_sec</property>
            <property>aero/function/mach-lift</property>
          <table>
            <independentVar lookup="row">aero/alpha-deg</independentVar>
            <tableData>
                 -180.00   -0.35297
                 -165.00   -0.19882
                  -32.00   -0.11187
                  -10.00   -0.44970
                    5.00   -0.45465
                   20.00   -0.01532
                   46.00   -0.20816
                  180.00   -0.35297
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            </tableData>
          </table>
          </product>
        </function>
        <function name="aero/coefficient/Clr">
          <description>Cl per r (non-dimensional), over alpha</description>
          <product>
            <property>aero/qbar-psf</property>
            <property>metrics/Sw-sqft</property>
            <property>metrics/bw-ft</property>
            <property>aero/bi2vel</property>
            <property>velocities/r-aero-rad_sec</property>
            <property>aero/function/mach-lift</property>
          <table>
            <independentVar lookup="row">aero/alpha-deg</independentVar>
            <tableData>
                 -180.00    0.13790
                 -165.00    0.09623
                  -32.00   -0.19163
                  -10.00    0.02185
                    5.00    0.21321
                   20.00    0.27313
                   46.00    0.17547
                  180.00    0.13790
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            </tableData>
          </table>
          </product>
        </function>
      </axis>
      <axis name="PITCH">
        <function name="aero/coefficient/Cm_base">
          <description>Cm over alpha and beta (hangar)</description>
          <product>
            <property>aero/qbar-psf</property>
            <property>metrics/Sw-sqft</property>
            <property>metrics/cbarw-ft</property>
          <table>
            <independentVar lookup="row">aero/alpha-deg</independentVar>
            <independentVar lookup="column">aero/beta-deg</independentVar>
            <tableData>
                        -90.00    -70.00    -50.00    -40.00    -30.00    -25.00    -20.00    -15.00    -10.00     -6.00     -3.00      0.00      3.00      6.00     10.00     15.00     20.00     25.00     30.00     40.00     50.00     70.00     90.00
             -180.00  -0.00002  -0.00104   0.02926   0.07763   0.13631   0.16534   0.19183   0.21407   0.23309   0.24138   0.24323   0.24378   0.24323   0.24138   0.23309   0.21407   0.19183   0.16534   0.13631   0.07763   0.02926  -0.00104  -0.00002
              -35.00  -0.00002   0.05496   0.16817   0.21838   0.24738   0.25619   0.26844   0.27025   0.27130   0.27114   0.27081   0.27065   0.27081   0.27114   0.27130   0.27025   0.26844   0.25619   0.24738   0.21838   0.16817   0.05496  -0.00002
              -11.00  -0.00002   0.06111   0.21513   0.22020   0.24170   0.25698   0.27376   0.28695   0.29650   0.30144   0.30358   0.30441   0.30358   0.30144   0.29650   0.28695   0.27376   0.25698   0.24170   0.22020   0.21513   0.06111  -0.00002
                4.00  -0.00002  -0.01003   0.01082   0.04168   0.07222   0.07178   0.06683   0.06179   0.05669   0.05301   0.05097   0.05011   0.05097   0.05301   0.05669   0.06179   0.06683   0.07178   0.07222   0.04168   0.01082  -0.01003  -0.00002
               19.00  -0.00002  -0.05694  -0.17843  -0.26061  -0.18762  -0.17568  -0.20295  -0.22166  -0.23344  -0.23895  -0.24105  -0.24172  -0.24105  -0.23895  -0.23344  -0.22166  -0.20295  -0.17568  -0.18762  -0.26061  -0.17843  -0.05694  -0.00002
               42.00  -0.00002  -0.07692  -0.24530  -0.33439  -0.39625  -0.41587  -0.43197  -0.43567  -0.43123  -0.42774  -0.42570  -0.42474  -0.42570  -0.42774  -0.43123  -0.43567  -0.43197  -0.41587  -0.39625  -0.33439  -0.24530  -0.07692  -0.00002
              180.00  -0.00002  -0.00104   0.02926   0.07763   0.13631   0.16534   0.19183   0.21407   0.23309   0.24138   0.24323   0.24378   0.24323   0.24138   0.23309   0.21407   0.19183   0.16534   0.13631   0.07763   0.02926  -0.00104  -0.00002
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            </tableData>
          </table>
          </product>
        </function>
        <function name="aero/coefficient/Cm_mach">
          <description>Cm from the neutral point's move with Mach</description>
          <product>
            <property>aero/qbar-psf</property>
            <property>metrics/Sw-sqft</property>
            <property>metrics/cbarw-ft</property>
            <property>aero/function/CL-base</property>
            <property>aero/function/mach-dCm-dCL</property>
          </product>
        </function>
        <function name="aero/coefficient/Cm_elevator">
          <description>Cm increment from elevator (deg), over alpha</description>
          <product>
            <property>aero/qbar-psf</property>
            <property>metrics/Sw-sqft</property>
            <property>metrics/cbarw-ft</property>
            <property>aero/function/mach-elevator</property>
          <table>
            <independentVar lookup="row">aero/alpha-deg</independentVar>
            <independentVar lookup="column">fcs/elevator-pos-deg</independentVar>
            <tableData>
                        -15.00    -10.00     -5.00      0.00      5.00     10.00
             -180.00  -0.16276  -0.22086  -0.23484   0.00000   0.23492   0.22140
              -35.00   0.04694   0.03632   0.01972   0.00000  -0.01778  -0.02201
              -11.00   0.15665   0.25111   0.13940   0.00000  -0.14358  -0.28928
                4.00   0.43541   0.29221   0.14648   0.00000  -0.14554  -0.28872
               19.00   0.34743   0.09454   0.11946   0.00000  -0.12457  -0.22486
               42.00   0.07493   0.05358   0.02673   0.00000  -0.02313  -0.04034
              180.00  -0.16276  -0.22086  -0.23484   0.00000   0.23492   0.22140
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            </tableData>
          </table>
          </product>
        </function>
        <function name="aero/coefficient/Cm_flap">
          <description>Cm increment from flap (deg), over alpha</description>
          <product>
            <property>aero/qbar-psf</property>
            <property>metrics/Sw-sqft</property>
            <property>metrics/cbarw-ft</property>
            <property>aero/function/mach-flap</property>
          <table>
            <independentVar lookup="row">aero/alpha-deg</independentVar>
            <independentVar lookup="column">fcs/flap-pos-deg</independentVar>
            <tableData>
                          0.00      5.00     10.00     15.00     20.00     25.00     30.00
             -180.00   0.00000  -0.00110  -0.00214  -0.00304  -0.00377  -0.00433  -0.00477
              -35.00   0.00000   0.00948   0.01905   0.02719   0.03288   0.03586   0.03650
              -11.00   0.00000   0.01412   0.02807   0.04039   0.05005   0.05693   0.06158
                4.00   0.00000   0.00910   0.01822   0.02708   0.03795   0.05086   0.06305
               19.00   0.00000   0.05725   0.12154   0.18617   0.24589   0.29733   0.33822
               42.00   0.00000   0.00484   0.01009   0.01532   0.02017   0.02449   0.02833
              180.00   0.00000  -0.00110  -0.00214  -0.00304  -0.00377  -0.00433  -0.00477
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            </tableData>
          </table>
          </product>
        </function>
        <function name="aero/coefficient/Cmq">
          <description>Cm per q (non-dimensional), over alpha</description>
          <product>
            <property>aero/qbar-psf</property>
            <property>metrics/Sw-sqft</property>
            <property>metrics/cbarw-ft</property>
            <property>aero/ci2vel</property>
            <property>velocities/q-aero-rad_sec</property>
            <property>aero/function/mach-lift</property>
          <table>
            <independentVar lookup="row">aero/alpha-deg</independentVar>
            <tableData>
                 -180.00  -11.53775
                 -165.00   -2.43345
                  -32.00   -4.89375
                  -10.00  -15.82327
                    5.00  -16.77405
                   20.00   -7.51980
                   46.00   -9.67136
                  180.00  -11.53775
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            </tableData>
          </table>
          </product>
        </function>
        <function name="aero/coefficient/Cmadot">
          <description>Cm per alpha-dot (downwash lag at the tail)</description>
          <product>
            <property>aero/qbar-psf</property>
            <property>metrics/Sw-sqft</property>
            <property>metrics/cbarw-ft</property>
            <property>aero/ci2vel</property>
            <property>aero/alphadot-rad_sec</property>
            <value>-2.80269</value>
            <property>aero/function/mach-lift</property>
          </product>
        </function>
      </axis>
      <axis name="YAW">
        <function name="aero/coefficient/Cn_base">
          <description>Cn over alpha and beta (hangar)</description>
          <product>
            <property>aero/qbar-psf</property>
            <property>metrics/Sw-sqft</property>
            <property>metrics/bw-ft</property>
            <property>aero/function/mach-side</property>
          <table>
            <independentVar lookup="row">aero/alpha-deg</independentVar>
            <independentVar lookup="column">aero/beta-deg</independentVar>
            <tableData>
                        -90.00    -70.00    -50.00    -40.00    -30.00    -25.00    -20.00    -15.00    -10.00     -6.00     -3.00      0.00      3.00      6.00     10.00     15.00     20.00     25.00     30.00     40.00     50.00     70.00     90.00
             -180.00  -0.04939  -0.05464  -0.05264  -0.04818  -0.04024  -0.03499  -0.02897  -0.02230  -0.02334  -0.02452  -0.01318  -0.00000   0.01318   0.02452   0.02334   0.02230   0.02897   0.03499   0.04024   0.04818   0.05264   0.05464   0.04939
              -35.00  -0.04939  -0.03753  -0.02125  -0.01192  -0.00237  -0.00176  -0.01079  -0.00696  -0.00402  -0.00223  -0.00107  -0.00000   0.00107   0.00223   0.00402   0.00696   0.01079   0.00176   0.00237   0.01192   0.02125   0.03753   0.04939
              -11.00  -0.04939  -0.03317  -0.01326  -0.01127  -0.01868  -0.02105  -0.01713  -0.01270  -0.00823  -0.00477  -0.00232  -0.00000   0.00232   0.00477   0.00823   0.01270   0.01713   0.02105   0.01868   0.01127   0.01326   0.03317   0.04939
                4.00  -0.04939  -0.03799  -0.02837  -0.02487  -0.03382  -0.03410  -0.02955  -0.02332  -0.01605  -0.00976  -0.00489  -0.00000   0.00489   0.00976   0.01605   0.02332   0.02955   0.03410   0.03382   0.02487   0.02837   0.03799   0.04939
               19.00  -0.04939  -0.03650  -0.02212  -0.01728  -0.01816  -0.02088  -0.01656  -0.01212  -0.00772  -0.00447  -0.00227  -0.00000   0.00227   0.00447   0.00772   0.01212   0.01656   0.02088   0.01816   0.01728   0.02212   0.03650   0.04939
               42.00  -0.04939  -0.03663  -0.02057  -0.01355  -0.00924  -0.00891  -0.01132  -0.01389  -0.00841  -0.00482  -0.00251  -0.00000   0.00251   0.00482   0.00841   0.01389   0.01132   0.00891   0.00924   0.01355   0.02057   0.03663   0.04939
              180.00  -0.04939  -0.05464  -0.05264  -0.04818  -0.04024  -0.03499  -0.02897  -0.02230  -0.02334  -0.02452  -0.01318  -0.00000   0.01318   0.02452   0.02334   0.02230   0.02897   0.03499   0.04024   0.04818   0.05264   0.05464   0.04939
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            </tableData>
          </table>
          </product>
        </function>
        <function name="aero/coefficient/Cn_aileron">
          <description>Cn increment from aileron (deg), over alpha</description>
          <product>
            <property>aero/qbar-psf</property>
            <property>metrics/Sw-sqft</property>
            <property>metrics/bw-ft</property>
            <property>aero/function/mach-aileron</property>
          <table>
            <independentVar lookup="row">aero/alpha-deg</independentVar>
            <independentVar lookup="column">fcs/left-aileron-pos-deg</independentVar>
            <tableData>
                        -20.00    -15.00    -10.00     -5.00      0.00      5.00     10.00     15.00     20.00
             -180.00  -0.00000  -0.00000  -0.00000  -0.00000   0.00000  -0.00000  -0.00000  -0.00000  -0.00000
              -35.00   0.01786   0.01504   0.01108   0.00588   0.00000  -0.00588  -0.01108  -0.01504  -0.01786
              -11.00   0.00437   0.00374   0.00278   0.00148   0.00000  -0.00148  -0.00278  -0.00374  -0.00437
                4.00  -0.00007  -0.00004  -0.00001  -0.00000   0.00000   0.00000   0.00001   0.00004   0.00007
               19.00  -0.01622  -0.01361  -0.00997  -0.00527   0.00000   0.00527   0.00997   0.01361   0.01622
               42.00  -0.01696  -0.01431  -0.01055  -0.00560   0.00000   0.00560   0.01055   0.01431   0.01696
              180.00  -0.00000  -0.00000  -0.00000  -0.00000   0.00000  -0.00000  -0.00000  -0.00000  -0.00000
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            </tableData>
          </table>
          </product>
        </function>
        <function name="aero/coefficient/Cn_rudder">
          <description>Cn increment from rudder (deg), over alpha</description>
          <product>
            <property>aero/qbar-psf</property>
            <property>metrics/Sw-sqft</property>
            <property>metrics/bw-ft</property>
            <property>aero/function/mach-rudder</property>
          <table>
            <independentVar lookup="row">aero/alpha-deg</independentVar>
            <independentVar lookup="column">fcs/rudder-pos-deg</independentVar>
            <tableData>
                        -25.00    -20.00    -15.00    -10.00     -5.00      0.00      5.00     10.00     15.00     20.00     25.00
             -180.00  -0.00000  -0.00000  -0.00000  -0.00000  -0.00000   0.00000  -0.00000  -0.00000  -0.00000  -0.00000  -0.00000
              -35.00   0.00880   0.00794   0.00676   0.00502   0.00268   0.00000  -0.00268  -0.00502  -0.00676  -0.00794  -0.00880
              -11.00   0.01243   0.01117   0.00946   0.00699   0.00371   0.00000  -0.00371  -0.00699  -0.00946  -0.01117  -0.01243
                4.00   0.01291   0.01160   0.00982   0.00726   0.00386   0.00000  -0.00386  -0.00726  -0.00982  -0.01160  -0.01291
               19.00   0.01088   0.00978   0.00829   0.00613   0.00325   0.00000  -0.00325  -0.00613  -0.00829  -0.00978  -0.01088
               42.00   0.00943   0.00850   0.00722   0.00535   0.00283   0.00000  -0.00283  -0.00535  -0.00722  -0.00850  -0.00943
              180.00  -0.00000  -0.00000  -0.00000  -0.00000  -0.00000   0.00000  -0.00000  -0.00000  -0.00000  -0.00000  -0.00000
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            </tableData>
          </table>
          </product>
        </function>
        <function name="aero/coefficient/Cnp">
          <description>Cn per p (non-dimensional), over alpha</description>
          <product>
            <property>aero/qbar-psf</property>
            <property>metrics/Sw-sqft</property>
            <property>metrics/bw-ft</property>
            <property>aero/bi2vel</property>
            <property>velocities/p-aero-rad_sec</property>
            <property>aero/function/mach-lift</property>
          <table>
            <independentVar lookup="row">aero/alpha-deg</independentVar>
            <tableData>
                 -180.00   -0.04033
                 -165.00    0.03787
                  -32.00    0.03243
                  -10.00    0.07905
                    5.00   -0.12623
                   20.00   -0.06806
                   46.00    0.02215
                  180.00   -0.04033
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            </tableData>
          </table>
          </product>
        </function>
        <function name="aero/coefficient/Cnr">
          <description>Cn per r (non-dimensional), over alpha</description>
          <product>
            <property>aero/qbar-psf</property>
            <property>metrics/Sw-sqft</property>
            <property>metrics/bw-ft</property>
            <property>aero/bi2vel</property>
            <property>velocities/r-aero-rad_sec</property>
            <property>aero/function/mach-lift</property>
          <table>
            <independentVar lookup="row">aero/alpha-deg</independentVar>
            <tableData>
                 -180.00   -0.13774
                 -165.00   -0.14485
                  -32.00   -0.02152
                  -10.00   -0.09764
                    5.00   -0.09330
                   20.00   -0.07586
                   46.00   -0.08369
                  180.00   -0.13774
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            </tableData>
          </table>
          </product>
        </function>
      </axis>
    </aerodynamics>
</fdm_config>
