<?xml version="1.0"?>
<?xml-stylesheet type="text/xsl" href="http://jsbsim.sourceforge.net/JSBSim.xsl"?>
<!-- Generated by hangar 0.1.0 from f22a.toml on 2026-09-26. Edit the design and rebuild; changes
     made here are overwritten.  -->
<fdm_config name="f22a" version="2.0" release="ALPHA"
            xmlns:xsi="http://www.w3.org/2001/XMLSchema-instance"
            xsi:noNamespaceSchemaLocation="http://jsbsim.sourceforge.net/JSBSim.xsd">
    <fileheader>
      <author>hangar</author>
      <filecreationdate>2026-09-26</filecreationdate>
      <version>0.1.0</version>
      <description>Lockheed Martin F-22A Raptor (hangar build)</description>
      <note>Aerodynamics: vortex lattice with viscous section polars, full-envelope
        strip model, slender-body fuselage (hangar). Mass: Raymer component
        weights on the geometry. Propeller: blade-element momentum theory.</note>
    </fileheader>
    <metrics>
      <wingarea unit="M2"> 77.8089 </wingarea>
      <wingspan unit="M"> 13.5600 </wingspan>
      <chord unit="M"> 6.7411 </chord>
      <htailarea unit="M2"> 24.9227 </htailarea>
      <htailarm unit="M"> 4.5140 </htailarm>
      <vtailarea unit="M2"> 16.2527 </vtailarea>
      <vtailarm unit="M"> 3.3501 </vtailarm>
      <location name="AERORP" unit="M">
        <x> 11.1400 </x>
        <y> 0.0000 </y>
        <z> 0.0000 </z>
      </location>
      <location name="EYEPOINT" unit="M">
        <x> 4.9000 </x>
        <y> 0.0000 </y>
        <z> 1.2500 </z>
      </location>
      <location name="VRP" unit="M">
        <x> 10.5660 </x>
        <y> 0.0000 </y>
        <z> -0.3500 </z>
      </location>
    </metrics>
    <mass_balance negated_crossproduct_inertia="false">
      <ixx unit="KG*M2"> 66016.60 </ixx>
      <iyy unit="KG*M2"> 325975.84 </iyy>
      <izz unit="KG*M2"> 392919.57 </izz>
      <ixy unit="KG*M2"> -0.167 </ixy>
      <ixz unit="KG*M2"> 26763.014 </ixz>
      <iyz unit="KG*M2"> 1.461 </iyz>
      <emptywt unit="KG"> 19700.00 </emptywt>
      <location name="CG" unit="M">
        <x> 10.5660 </x>
        <y> 0.0000 </y>
        <z> -0.3500 </z>
      </location>
      <pointmass name="pilot">
        <weight unit="KG"> 100.00 </weight>
        <location unit="M">
          <x> 4.9000 </x>
          <y> 0.0000 </y>
          <z> 0.5500 </z>
        </location>
      </pointmass>
      <pointmass name="internal missiles">
        <weight unit="KG"> 1084.00 </weight>
        <location unit="M">
          <x> 10.4160 </x>
          <y> 0.0000 </y>
          <z> -0.7000 </z>
        </location>
      </pointmass>
      <pointmass name="gun ammunition">
        <weight unit="KG"> 150.00 </weight>
        <location unit="M">
          <x> 9.6160 </x>
          <y> 1.6000 </y>
          <z> 0.0000 </z>
        </location>
      </pointmass>
    </mass_balance>
    <ground_reactions>
      <contact type="BOGEY" name="Nose Gear">
        <location unit="M">
          <x> 5.7100 </x>
          <y> 0.0000 </y>
          <z> -2.1300 </z>
        </location>
        <static_friction> 0.8 </static_friction>
        <dynamic_friction> 0.5 </dynamic_friction>
        <rolling_friction> 0.02 </rolling_friction>
        <spring_coeff unit="N/M"> 393929 </spring_coeff>
        <damping_coeff unit="N/M/SEC"> 47068 </damping_coeff>
        <damping_coeff_rebound unit="N/M/SEC"> 94135 </damping_coeff_rebound>
        <max_steer unit="DEG"> 60.0 </max_steer>
        <brake_group> NONE </brake_group>
        <retractable> 1 </retractable>
      </contact>
      <contact type="BOGEY" name="Left Main Gear">
        <location unit="M">
          <x> 11.8300 </x>
          <y> -1.6000 </y>
          <z> -2.1700 </z>
        </location>
        <static_friction> 0.8 </static_friction>
        <dynamic_friction> 0.5 </dynamic_friction>
        <rolling_friction> 0.02 </rolling_friction>
        <spring_coeff unit="N/M"> 643160 </spring_coeff>
        <damping_coeff unit="N/M/SEC"> 87135 </damping_coeff>
        <damping_coeff_rebound unit="N/M/SEC"> 174271 </damping_coeff_rebound>
        <max_steer unit="DEG"> 0.0 </max_steer>
        <brake_group> LEFT </brake_group>
        <retractable> 1 </retractable>
      </contact>
      <contact type="BOGEY" name="Right Main Gear">
        <location unit="M">
          <x> 11.8300 </x>
          <y> 1.6000 </y>
          <z> -2.1700 </z>
        </location>
        <static_friction> 0.8 </static_friction>
        <dynamic_friction> 0.5 </dynamic_friction>
        <rolling_friction> 0.02 </rolling_friction>
        <spring_coeff unit="N/M"> 643160 </spring_coeff>
        <damping_coeff unit="N/M/SEC"> 87135 </damping_coeff>
        <damping_coeff_rebound unit="N/M/SEC"> 174271 </damping_coeff_rebound>
        <max_steer unit="DEG"> 0.0 </max_steer>
        <brake_group> RIGHT </brake_group>
        <retractable> 1 </retractable>
      </contact>
      <contact type="STRUCTURE" name="canopy front">
        <location unit="M">
          <x> 3.9111 </x>
          <y> 0.0000 </y>
          <z> 1.1740 </z>
        </location>
        <static_friction> 0.8 </static_friction>
        <dynamic_friction> 0.6 </dynamic_friction>
        <spring_coeff unit="N/M"> 4011032 </spring_coeff>
        <damping_coeff unit="N/M/SEC"> 133701 </damping_coeff>
        <damping_coeff_rebound unit="N/M/SEC"> 133701 </damping_coeff_rebound>
      </contact>
      <contact type="STRUCTURE" name="fin left rear">
        <location unit="M">
          <x> 15.8200 </x>
          <y> -2.9699 </y>
          <z> 3.0000 </z>
        </location>
        <static_friction> 0.8 </static_friction>
        <dynamic_friction> 0.6 </dynamic_friction>
        <spring_coeff unit="N/M"> 2209054 </spring_coeff>
        <damping_coeff unit="N/M/SEC"> 73635 </damping_coeff>
        <damping_coeff_rebound unit="N/M/SEC"> 73635 </damping_coeff_rebound>
      </contact>
      <contact type="STRUCTURE" name="fin right rear">
        <location unit="M">
          <x> 15.8200 </x>
          <y> 2.9699 </y>
          <z> 3.0000 </z>
        </location>
        <static_friction> 0.8 </static_friction>
        <dynamic_friction> 0.6 </dynamic_friction>
        <spring_coeff unit="N/M"> 2209049 </spring_coeff>
        <damping_coeff unit="N/M/SEC"> 73635 </damping_coeff>
        <damping_coeff_rebound unit="N/M/SEC"> 73635 </damping_coeff_rebound>
      </contact>
      <contact type="STRUCTURE" name="fuselage front">
        <location unit="M">
          <x> 0.0000 </x>
          <y> 0.0000 </y>
          <z> -0.3400 </z>
        </location>
        <static_friction> 0.8 </static_friction>
        <dynamic_friction> 0.6 </dynamic_friction>
        <spring_coeff unit="N/M"> 2288666 </spring_coeff>
        <damping_coeff unit="N/M/SEC"> 76289 </damping_coeff>
        <damping_coeff_rebound unit="N/M/SEC"> 76289 </damping_coeff_rebound>
      </contact>
      <contact type="STRUCTURE" name="fuselage rear">
        <location unit="M">
          <x> 13.6472 </x>
          <y> -0.0000 </y>
          <z> -0.9073 </z>
        </location>
        <static_friction> 0.8 </static_friction>
        <dynamic_friction> 0.6 </dynamic_friction>
        <spring_coeff unit="N/M"> 10702667 </spring_coeff>
        <damping_coeff unit="N/M/SEC"> 356756 </damping_coeff>
        <damping_coeff_rebound unit="N/M/SEC"> 356756 </damping_coeff_rebound>
      </contact>
      <contact type="STRUCTURE" name="htail left rear">
        <location unit="M">
          <x> 18.4000 </x>
          <y> -4.4300 </y>
          <z> 0.0299 </z>
        </location>
        <static_friction> 0.8 </static_friction>
        <dynamic_friction> 0.6 </dynamic_friction>
        <spring_coeff unit="N/M"> 821744 </spring_coeff>
        <damping_coeff unit="N/M/SEC"> 27391 </damping_coeff>
        <damping_coeff_rebound unit="N/M/SEC"> 27391 </damping_coeff_rebound>
      </contact>
      <contact type="STRUCTURE" name="htail left rear 2">
        <location unit="M">
          <x> 18.9200 </x>
          <y> -2.8200 </y>
          <z> 0.0097 </z>
        </location>
        <static_friction> 0.8 </static_friction>
        <dynamic_friction> 0.6 </dynamic_friction>
        <spring_coeff unit="N/M"> 1151593 </spring_coeff>
        <damping_coeff unit="N/M/SEC"> 38386 </damping_coeff>
        <damping_coeff_rebound unit="N/M/SEC"> 38386 </damping_coeff_rebound>
      </contact>
      <contact type="STRUCTURE" name="htail right rear">
        <location unit="M">
          <x> 18.9200 </x>
          <y> 2.8200 </y>
          <z> 0.0097 </z>
        </location>
        <static_friction> 0.8 </static_friction>
        <dynamic_friction> 0.6 </dynamic_friction>
        <spring_coeff unit="N/M"> 1151593 </spring_coeff>
        <damping_coeff unit="N/M/SEC"> 38386 </damping_coeff>
        <damping_coeff_rebound unit="N/M/SEC"> 38386 </damping_coeff_rebound>
      </contact>
      <contact type="STRUCTURE" name="htail right rear 2">
        <location unit="M">
          <x> 18.4000 </x>
          <y> 4.4300 </y>
          <z> 0.0299 </z>
        </location>
        <static_friction> 0.8 </static_friction>
        <dynamic_friction> 0.6 </dynamic_friction>
        <spring_coeff unit="N/M"> 821743 </spring_coeff>
        <damping_coeff unit="N/M/SEC"> 27391 </damping_coeff>
        <damping_coeff_rebound unit="N/M/SEC"> 27391 </damping_coeff_rebound>
      </contact>
      <contact type="STRUCTURE" name="wing left rear">
        <location unit="M">
          <x> 12.5650 </x>
          <y> -6.7800 </y>
          <z> -0.3000 </z>
        </location>
        <static_friction> 0.8 </static_friction>
        <dynamic_friction> 0.6 </dynamic_friction>
        <spring_coeff unit="N/M"> 574535 </spring_coeff>
        <damping_coeff unit="N/M/SEC"> 19151 </damping_coeff>
        <damping_coeff_rebound unit="N/M/SEC"> 19151 </damping_coeff_rebound>
      </contact>
      <contact type="STRUCTURE" name="wing left rear 2">
        <location unit="M">
          <x> 13.8150 </x>
          <y> -6.7800 </y>
          <z> -0.3001 </z>
        </location>
        <static_friction> 0.8 </static_friction>
        <dynamic_friction> 0.6 </dynamic_friction>
        <spring_coeff unit="N/M"> 559859 </spring_coeff>
        <damping_coeff unit="N/M/SEC"> 18662 </damping_coeff>
        <damping_coeff_rebound unit="N/M/SEC"> 18662 </damping_coeff_rebound>
      </contact>
      <contact type="STRUCTURE" name="wing right rear">
        <location unit="M">
          <x> 13.8150 </x>
          <y> 6.7800 </y>
          <z> -0.3001 </z>
        </location>
        <static_friction> 0.8 </static_friction>
        <dynamic_friction> 0.6 </dynamic_friction>
        <spring_coeff unit="N/M"> 559859 </spring_coeff>
        <damping_coeff unit="N/M/SEC"> 18662 </damping_coeff>
        <damping_coeff_rebound unit="N/M/SEC"> 18662 </damping_coeff_rebound>
      </contact>
      <contact type="STRUCTURE" name="wing right rear 2">
        <location unit="M">
          <x> 12.5650 </x>
          <y> 6.7800 </y>
          <z> -0.3000 </z>
        </location>
        <static_friction> 0.8 </static_friction>
        <dynamic_friction> 0.6 </dynamic_friction>
        <spring_coeff unit="N/M"> 574535 </spring_coeff>
        <damping_coeff unit="N/M/SEC"> 19151 </damping_coeff>
        <damping_coeff_rebound unit="N/M/SEC"> 19151 </damping_coeff_rebound>
      </contact>
    </ground_reactions>
    <propulsion>
      <engine file="f22a_engine0">
        <location unit="M">
          <x> 14.7000 </x>
          <y> -0.7000 </y>
          <z> -0.2500 </z>
        </location>
        <feed>0</feed>
        <feed>1</feed>
        <feed>2</feed>
        <feed>3</feed>
        <feed>4</feed>
        <thruster file="f22a_nozzle0">
          <location unit="M">
            <x> 16.7000 </x>
            <y> -0.7000 </y>
            <z> -0.2000 </z>
          </location>
          <orient unit="DEG"> <roll>0.00</roll> <pitch>0.00</pitch> <yaw>0.00</yaw> </orient>

        </thruster>
      </engine>
      <engine file="f22a_engine0">
        <location unit="M">
          <x> 14.7000 </x>
          <y> 0.7000 </y>
          <z> -0.2500 </z>
        </location>
        <feed>0</feed>
        <feed>1</feed>
        <feed>2</feed>
        <feed>3</feed>
        <feed>4</feed>
        <thruster file="f22a_nozzle0">
          <location unit="M">
            <x> 16.7000 </x>
            <y> 0.7000 </y>
            <z> -0.2000 </z>
          </location>
          <orient unit="DEG"> <roll>0.00</roll> <pitch>0.00</pitch> <yaw>0.00</yaw> </orient>

        </thruster>
      </engine>
      <tank type="FUEL">
        <location unit="M">
          <x> 8.6160 </x>
          <y> 0.0000 </y>
          <z> -0.2000 </z>
        </location>
        <capacity unit="KG"> 2400.00 </capacity>
        <contents unit="KG"> 2400.00 </contents>
      </tank>
      <tank type="FUEL">
        <location unit="M">
          <x> 11.1160 </x>
          <y> 0.0000 </y>
          <z> -0.2000 </z>
        </location>
        <capacity unit="KG"> 2600.00 </capacity>
        <contents unit="KG"> 2600.00 </contents>
      </tank>
      <tank type="FUEL">
        <location unit="M">
          <x> 13.3160 </x>
          <y> 0.0000 </y>
          <z> -0.2500 </z>
        </location>
        <capacity unit="KG"> 1400.00 </capacity>
        <contents unit="KG"> 1400.00 </contents>
      </tank>
      <tank type="FUEL">
        <location unit="M">
          <x> 12.1250 </x>
          <y> -3.2000 </y>
          <z> 0.0000 </z>
        </location>
        <capacity unit="KG"> 900.00 </capacity>
        <contents unit="KG"> 900.00 </contents>
      </tank>
      <tank type="FUEL">
        <location unit="M">
          <x> 12.1250 </x>
          <y> 3.2000 </y>
          <z> 0.0000 </z>
        </location>
        <capacity unit="KG"> 900.00 </capacity>
        <contents unit="KG"> 900.00 </contents>
      </tank>
    </propulsion>
    <flight_control name="f22a">
      <!-- the aircraft's profile for the platform (docs/control-architecture.md, section 7): what
           hangar knows of it - its design, its flight tests, its identified responses -->
      <property value="1">fsim/identity/version</property>
      <property value="1">fsim/identity/provenance</property>
      <property value="2">fsim/identity/class</property>
      <property value="2">fsim/identity/family</property>
      <property value="1">fsim/effectors/version</property>
      <property value="1">fsim/effectors/provenance</property>
      <property value="1">fsim/effectors/flaps</property>
      <property value="8">fsim/effectors/flaps_transit_s</property>
      <property value="1">fsim/effectors/neutral</property>
      <property value="1">fsim/effectors/pitch</property>
      <property value="0.0">fsim/effectors/pitch_trim</property>
      <property value="1">fsim/effectors/retractable_gear</property>
      <property value="1">fsim/effectors/roll</property>
      <property value="0.0">fsim/effectors/speedbrake</property>
      <property value="1">fsim/effectors/wheel_brakes</property>
      <property value="0.0">fsim/effectors/yaw</property>
      <property value="1">fsim/envelope/version</property>
      <property value="1">fsim/envelope/provenance</property>
      <property value="40">fsim/envelope/clean/alpha_max_deg</property>
      <property value="9">fsim/envelope/clean/n_max</property>
      <property value="-3">fsim/envelope/clean/n_min</property>
      <property value="240">fsim/envelope/clean/roll_rate_max_deg_s</property>
      <property value="1">fsim/envelope/law_alpha</property>
      <property value="1">fsim/envelope/law_load_factor</property>
      <property value="1">fsim/envelope/law_roll_rate</property>
      <property value="1">fsim/propulsion/version</property>
      <property value="1">fsim/propulsion/provenance</property>
      <property value="1">fsim/propulsion/afterburner</property>
      <property value="2">fsim/propulsion/engines</property>
      <property value="0.178957">fsim/propulsion/spool_s</property>
      <property value="2">fsim/propulsion/type</property>
      <property value="1">fsim/plant/version</property>
      <property value="1">fsim/plant/provenance</property>
      <property value="-1.50765">fsim/plant/alpha_zero_lift_deg</property>
      <property value="3000">fsim/plant/altitude_m</property>
      <property value="133.39">fsim/plant/eas_ms</property>
      <property value="0.0">fsim/plant/elevator_trim</property>
      <property value="0.0">fsim/plant/elevator_trim_lift</property>
      <property value="9.72652">fsim/plant/pitch/gain</property>
      <property value="0.88862">fsim/plant/pitch/tau_s</property>
      <property value="4.24712">fsim/plant/roll/gain</property>
      <property value="0.208615">fsim/plant/roll/tau_s</property>
      <property value="7.12306">fsim/plant/speed/gain</property>
      <property value="0.178957">fsim/plant/speed/tau_s</property>
      <property value="152.17">fsim/plant/tas_ms</property>
      <property value="0.118198">fsim/plant/yaw/gain</property>
      <property value="1">fsim/performance/version</property>
      <property value="1">fsim/performance/provenance</property>
      <property value="18406.6">fsim/performance/ceiling_m</property>
      <property value="314.765">fsim/performance/climb_ms</property>
      <property value="491.535">fsim/performance/max_tas_ms</property>
      <!-- the platform's built-in control loops, tuned for this aircraft (hangar autopilot):
           every vehicle of the type takes these as its controllers' parameters -->
      <property value="0.0">fsim/control/pid_acceleration/load_factor/eas_exponent</property>
      <property value="0.0873899">fsim/control/pid_acceleration/load_factor/feedforward</property>
      <property value="0.3">fsim/control/pid_acceleration/load_factor/integral_limit</property>
      <property value="0.0">fsim/control/pid_acceleration/load_factor/kd</property>
      <property value="0.0347094">fsim/control/pid_acceleration/load_factor/ki</property>
      <property value="0.0102812">fsim/control/pid_acceleration/load_factor/kp</property>
      <property value="1">fsim/control/pid_acceleration/load_factor/path_hold</property>
      <property value="0.0">fsim/control/pid_acceleration/load_factor/tas_exponent</property>
      <property value="0.140389">fsim/control/pid_acceleration/longitudinal/ki</property>
      <property value="0.0280778">fsim/control/pid_acceleration/longitudinal/kp</property>
      <property value="0.0">fsim/control/pid_acceleration/pitch/trim</property>
      <property value="0.0">fsim/control/pid_acceleration/pitch/trim_lift</property>
      <property value="0.0">fsim/control/pid_acceleration/roll_rate/eas_exponent</property>
      <property value="0.188363">fsim/control/pid_acceleration/roll_rate/feedforward</property>
      <property value="0.338596">fsim/control/pid_acceleration/roll_rate/ki</property>
      <property value="0.0235454">fsim/control/pid_acceleration/roll_rate/kp</property>
      <property value="0.0">fsim/control/pid_acceleration/roll_rate/tas_exponent</property>
      <property value="0.0">fsim/control/pid_acceleration/rudder/beta_gain</property>
      <property value="133.392">fsim/control/pid_acceleration/schedule/eas_ms</property>
      <property value="152.169">fsim/control/pid_acceleration/schedule/tas_ms</property>
      <property value="0.294463">fsim/control/pid_acceleration/throttle/feedforward</property>
      <property value="0.00877432">fsim/control/pid_attitude/airspeed/ki</property>
      <property value="0.0631751">fsim/control/pid_attitude/airspeed/kp</property>
      <property value="3.10339">fsim/control/pid_attitude/heading/gain</property>
      <property value="0.0">fsim/control/pid_attitude/pitch/eas_exponent</property>
      <property value="0.3">fsim/control/pid_attitude/pitch/integral_limit</property>
      <property value="0.191439">fsim/control/pid_attitude/pitch/kd</property>
      <property value="0.277185">fsim/control/pid_attitude/pitch/ki</property>
      <property value="0.879687">fsim/control/pid_attitude/pitch/kp</property>
      <property value="-1">fsim/control/pid_attitude/pitch/tas_exponent</property>
      <property value="0.0">fsim/control/pid_attitude/pitch/trim</property>
      <property value="0.0">fsim/control/pid_attitude/pitch/trim_lift</property>
      <property value="0.0">fsim/control/pid_attitude/roll/eas_exponent</property>
      <property value="0.0">fsim/control/pid_attitude/roll/kd</property>
      <property value="0.0">fsim/control/pid_attitude/roll/ki</property>
      <property value="0.282164">fsim/control/pid_attitude/roll/kp</property>
      <property value="2">fsim/control/pid_attitude/roll/max_rate</property>
      <property value="0.0">fsim/control/pid_attitude/roll/tas_exponent</property>
      <property value="0.0">fsim/control/pid_attitude/rudder/beta_gain</property>
      <property value="133.392">fsim/control/pid_attitude/schedule/eas_ms</property>
      <property value="152.169">fsim/control/pid_attitude/schedule/tas_ms</property>
      <property value="0.294463">fsim/control/pid_attitude/throttle/feedforward</property>
      <property value="0.0656449">fsim/control/pid_position/altitude/gain</property>
      <property value="15.2169">fsim/control/pid_position/max_vertical_speed</property>
      <property value="1.0472">fsim/control/pid_velocity/max_bank</property>
      <property value="152.169">fsim/control/pid_velocity/schedule/tas_ms</property>
      <property value="-0.0263135">fsim/control/pid_velocity/vertical_speed/alpha_zero_lift</property>
      <property value="1.26946">fsim/control/pid_velocity/vertical_speed/command_lag</property>
      <property value="1">fsim/control/pid_velocity/vertical_speed/feedforward</property>
      <property value="8.495648e-05">fsim/control/pid_velocity/vertical_speed/ki</property>
      <property value="0.00129418">fsim/control/pid_velocity/vertical_speed/kp</property>
      <channel name="Pitch (fly-by-wire)">
        <!-- hangar: load factor command, alpha and pitch-rate inner loop (hangar/fcs.py) -->
        <summer name="fcs/pitch-trim-sum">
          <input>fcs/elevator-cmd-norm</input>
          <input>fcs/pitch-trim-cmd-norm</input>
          <clipto> <min>-1</min> <max>1</max> </clipto>
        </summer>
        <!-- the integrators are reset below 60 kt (on the ground, taking off) -->
        <switch name="fcs/fbw/reset">
          <default value="0"/>
          <test value="-1">
            velocities/vc-kts lt 60
          </test>
        </switch>
        <!-- the pitch power (1/s^2 per rad of the surface): the surfaces', and with the
             vectoring nozzles' at the thrust the engines make -->
        <fcs_function name="fcs/fbw/md-aero">
          <function>
            <table>
              <independentVar lookup="row">aero/qbar-psf</independentVar>
              <independentVar lookup="column">velocities/mach</independentVar>
              <tableData>
                       0.150     0.400     0.700     0.900     1.100     1.400     2.000
              10.0 -1.429964e-01 -1.476720e-01 -1.629929e-01 -1.914062e-01 -1.899853e-01 -1.761360e-01 -1.080034e-01
              20.0 -2.859928e-01 -2.953441e-01 -3.259858e-01 -3.828124e-01 -3.799705e-01 -3.522719e-01 -2.160068e-01
              40.0 -5.719856e-01 -5.906881e-01 -6.519716e-01 -7.656248e-01 -7.599410e-01 -7.045438e-01 -4.320136e-01
              80.0 -1.926724e+00 -2.002864e+00 -2.236349e+00 -2.650462e+00 -2.595533e+00 -2.426695e+00 -1.285108e+00
             150.0 -3.755648e+00 -3.879542e+00 -4.285480e+00 -5.036625e+00 -4.993572e+00 -4.633074e+00 -2.828399e+00
             300.0 -7.556034e+00 -7.803919e+00 -8.616153e+00 -1.012075e+01 -1.004182e+01 -9.312209e+00 -5.697168e+00
             600.0 -1.513527e+01 -1.563053e+01 -1.725337e+01 -2.026108e+01 -2.011005e+01 -1.864479e+01 -1.142685e+01
            1200.0 -3.027194e+01 -3.126172e+01 -3.450519e+01 -4.052172e+01 -4.021920e+01 -3.728810e+01 -2.286457e+01
            2400.0 -6.055637e+01 -6.253672e+01 -6.902580e+01 -8.106005e+01 -8.045635e+01 -7.459231e+01 -4.573379e+01
              </tableData>
            </table>
          </function>
        </fcs_function>
        <fcs_function name="fcs/fbw/md-total">
          <function>
            <min>
              <sum>
                <property>fcs/fbw/md-aero</property>
                <product><value>-6.070054e-05</value><max><value>0</value><property>propulsion/engine[0]/thrust-lbs</property></max></product>
                <product><value>-6.070054e-05</value><max><value>0</value><property>propulsion/engine[1]/thrust-lbs</property></max></product>
              </sum>
              <value>-0.01</value>
            </min>
          </function>
        </fcs_function>
        <!-- the roll power (1/s^2 per rad of the surface): the surfaces', and with the
             vectoring nozzles' at the thrust the engines make -->
        <fcs_function name="fcs/fbw/lda-aero">
          <function>
            <table>
              <independentVar lookup="row">aero/qbar-psf</independentVar>
              <independentVar lookup="column">velocities/mach</independentVar>
              <tableData>
                       0.150     0.400     0.700     0.900     1.100     1.400     2.000
              10.0  6.437540e-01  6.594927e-01  7.106937e-01  8.048278e-01  4.375041e-01  3.306378e-01  2.093204e-01
              20.0  1.287508e+00  1.318985e+00  1.421387e+00  1.609656e+00  8.750083e-01  6.612756e-01  4.186407e-01
              40.0  2.575016e+00  2.637971e+00  2.842775e+00  3.219311e+00  1.750017e+00  1.322551e+00  8.372814e-01
              80.0  8.499657e+00  8.790971e+00  9.447595e+00  1.028933e+01  5.830944e+00  4.332047e+00  2.158770e+00
             150.0  1.468608e+01  1.505814e+01  1.626716e+01  1.847811e+01  1.000425e+01  7.578170e+00  4.748426e+00
             300.0  2.990701e+01  3.064599e+01  3.304924e+01  3.745748e+01  2.033926e+01  1.538123e+01  9.676652e+00
             600.0  6.009849e+01  6.157222e+01  6.636611e+01  7.516981e+01  4.085173e+01  3.087816e+01  1.951768e+01
            1200.0  1.203381e+02  1.232826e+02  1.328622e+02  1.504761e+02  8.178795e+01  6.181442e+01  3.911506e+01
            2400.0  2.408349e+02  2.467262e+02  2.658915e+02  3.011256e+02  1.636807e+02  1.237040e+02  7.829108e+01
              </tableData>
            </table>
          </function>
        </fcs_function>
        <fcs_function name="fcs/fbw/lda-total">
          <function>
            <max>
              <sum>
                <property>fcs/fbw/lda-aero</property>
                <product><value>1.230285e-05</value><max><value>0</value><property>propulsion/engine[0]/thrust-lbs</property></max></product>
                <product><value>1.201762e-05</value><max><value>0</value><property>propulsion/engine[1]/thrust-lbs</property></max></product>
              </sum>
              <value>0.01</value>
            </max>
          </function>
        </fcs_function>
        <fcs_function name="fcs/fbw/k-alpha-m">
          <function>
            <table>
              <independentVar lookup="row">aero/qbar-psf</independentVar>
              <independentVar lookup="column">velocities/mach</independentVar>
              <tableData>
                       0.150     0.400     0.700     0.900     1.100     1.400     2.000
              10.0  2.187123e+00  2.235103e+00  2.246551e+00  2.248922e+00  2.233332e+00  2.229586e+00  2.238167e+00
              20.0  2.126373e+00  2.220488e+00  2.243193e+00  2.247900e+00  2.216699e+00  2.209194e+00  2.226344e+00
              40.0  2.011220e+00  2.192106e+00  2.236755e+00  2.246027e+00  2.183539e+00  2.168474e+00  2.202726e+00
              80.0  1.640854e+00  2.384259e+00  2.750367e+00  3.005817e+00 -4.533879e-01 -1.274430e+00 -2.968311e-01
             150.0  2.954260e+00  4.723263e+00  5.500278e+00  5.858824e+00 -1.142894e+00 -2.797519e+00 -2.552126e+00
             300.0  5.188917e+00  8.449810e+00  1.031708e+01  1.108871e+01 -2.756599e+00 -6.027101e+00 -5.462322e+00
             600.0  1.247605e+01  1.425383e+01  1.849067e+01  2.017095e+01 -6.707494e+00 -1.304318e+01 -1.136703e+01
            1200.0  5.758172e+01  1.477599e+01  1.779284e+01  1.646508e+01 -3.216156e+01 -4.777896e+01 -2.589627e+01
            2400.0  4.396549e+02  2.645881e+01  1.117056e+01  5.033893e+00 -9.793479e+01 -1.301702e+02 -8.754989e+01
              </tableData>
            </table>
          </function>
        </fcs_function>
        <fcs_function name="fcs/fbw/k-alpha">
          <function>
            <quotient><property>fcs/fbw/k-alpha-m</property><property>fcs/fbw/md-total</property></quotient>
          </function>
          <clipto> <min>-6.00000</min> <max>6.00000</max> </clipto>
        </fcs_function>
        <fcs_function name="fcs/fbw/k-q-m">
          <function>
            <table>
              <independentVar lookup="row">aero/qbar-psf</independentVar>
              <independentVar lookup="column">velocities/mach</independentVar>
              <tableData>
                       0.150     0.400     0.700     0.900     1.100     1.400     2.000
              10.0  2.224424e+00  2.332988e+00  2.360591e+00  2.368062e+00  2.375253e+00  2.380044e+00  2.388164e+00
              20.0  2.121756e+00  2.293338e+00  2.336820e+00  2.348286e+00  2.360458e+00  2.367906e+00  2.381802e+00
              40.0  1.916214e+00  2.214029e+00  2.289274e+00  2.308733e+00  2.330866e+00  2.343630e+00  2.369077e+00
              80.0  1.457873e+00  2.247787e+00  2.561316e+00  2.790012e+00  2.643496e+00  2.798808e+00  2.331796e+00
             150.0  1.611671e+00  3.093225e+00  3.587433e+00  3.869596e+00  3.798888e+00  3.986926e+00  3.292300e+00
             300.0  1.031034e+00  3.913348e+00  4.802189e+00  5.242915e+00  5.249073e+00  5.544264e+00  4.697402e+00
             600.0 -1.316152e+00  4.537877e+00  6.174429e+00  6.888098e+00  7.092444e+00  7.573935e+00  6.543315e+00
            1200.0 -1.084247e+01  2.627031e+00  5.349458e+00  6.018821e+00  7.306591e+00  7.765882e+00  8.715451e+00
            2400.0 -4.798270e+01 -4.289039e+00  1.365712e+00  2.675018e+00  5.248080e+00  6.121867e+00  7.969875e+00
              </tableData>
            </table>
          </function>
        </fcs_function>
        <fcs_function name="fcs/fbw/k-q">
          <function>
            <quotient><property>fcs/fbw/k-q-m</property><property>fcs/fbw/md-total</property></quotient>
          </function>
          <clipto> <min>-3.00000</min> <max>3.00000</max> </clipto>
        </fcs_function>
        <fcs_function name="fcs/fbw/k-ff-m">
          <function>
            <table>
              <independentVar lookup="row">aero/qbar-psf</independentVar>
              <independentVar lookup="column">velocities/mach</independentVar>
              <tableData>
                       0.150     0.400     0.700     0.900     1.100     1.400     2.000
              10.0  1.483790e+01  1.480723e+01  1.471366e+01  1.457000e+01  1.505991e+01  1.504532e+01  1.560620e+01
              20.0  7.418948e+00  7.403615e+00  7.356830e+00  7.285000e+00  7.529956e+00  7.522658e+00  7.803099e+00
              40.0  3.709474e+00  3.701808e+00  3.678415e+00  3.642500e+00  3.764978e+00  3.761329e+00  3.901549e+00
              80.0  9.233996e-01  9.306516e-01  9.504266e-01  9.765331e-01  1.248783e+00  1.374946e+00  1.489270e+00
             150.0  9.744332e-01  9.781807e-01  9.891056e-01  1.005518e+00  1.344240e+00  1.471214e+00  1.501772e+00
             300.0  9.856050e-01  9.887886e-01  9.981599e-01  1.012668e+00  1.364267e+00  1.491611e+00  1.585965e+00
             600.0  9.882735e-01  9.913206e-01  1.000318e+00  1.014394e+00  1.369528e+00  1.497226e+00  1.604663e+00
            1200.0  6.975426e-01  6.858042e-01  6.520958e-01  6.060342e-01  9.151706e-01  9.440239e-01  1.515242e+00
            2400.0  3.487745e-01  3.429049e-01  3.260504e-01  3.030206e-01  4.577295e-01  4.721964e-01  7.582895e-01
              </tableData>
            </table>
          </function>
        </fcs_function>
        <fcs_function name="fcs/fbw/k-ff">
          <function>
            <quotient><property>fcs/fbw/k-ff-m</property><property>fcs/fbw/md-total</property></quotient>
          </function>
          <clipto> <min>-0.30000</min> <max>0.30000</max> </clipto>
        </fcs_function>
        <fcs_function name="fcs/fbw/k-i-m">
          <function>
            <table>
              <independentVar lookup="row">aero/qbar-psf</independentVar>
              <independentVar lookup="column">velocities/mach</independentVar>
              <tableData>
                       0.150     0.400     0.700     0.900     1.100     1.400     2.000
              10.0  1.483790e+01  1.480723e+01  1.471366e+01  1.457000e+01  1.505991e+01  1.504532e+01  1.560620e+01
              20.0  7.418948e+00  7.403615e+00  7.356830e+00  7.285000e+00  7.529956e+00  7.522658e+00  7.803099e+00
              40.0  3.709474e+00  3.701808e+00  3.678415e+00  3.642500e+00  3.764978e+00  3.761329e+00  3.901549e+00
              80.0  9.233996e-01  9.306516e-01  9.504266e-01  9.765331e-01  1.248783e+00  1.374946e+00  1.489270e+00
             150.0  9.744332e-01  9.781807e-01  9.891056e-01  1.005518e+00  1.344240e+00  1.471214e+00  1.501772e+00
             300.0  9.856050e-01  9.887886e-01  9.981599e-01  1.012668e+00  1.364267e+00  1.491611e+00  1.585965e+00
             600.0  9.882735e-01  9.913206e-01  1.000318e+00  1.014394e+00  1.369528e+00  1.497226e+00  1.604663e+00
            1200.0  6.975426e-01  6.858042e-01  6.520958e-01  6.060342e-01  9.151706e-01  9.440239e-01  1.515242e+00
            2400.0  3.487745e-01  3.429049e-01  3.260504e-01  3.030206e-01  4.577295e-01  4.721964e-01  7.582895e-01
              </tableData>
            </table>
          </function>
        </fcs_function>
        <fcs_function name="fcs/fbw/k-i">
          <function>
            <quotient><property>fcs/fbw/k-i-m</property><property>fcs/fbw/md-total</property></quotient>
          </function>
          <clipto> <min>-0.60000</min> <max>0.60000</max> </clipto>
        </fcs_function>
        <fcs_function name="fcs/fbw/n-alpha">
          <function>
            <table>
              <independentVar lookup="row">aero/qbar-psf</independentVar>
              <independentVar lookup="column">velocities/mach</independentVar>
              <tableData>
                       0.150     0.400     0.700     0.900     1.100     1.400     2.000
              10.0   1.00000   1.00000   1.00000   1.00000   1.00000   1.00000   1.00000
              20.0   1.00000   1.00000   1.00000   1.00000   1.00000   1.00000   1.00000
              40.0   1.00000   1.00000   1.00000   1.00000   1.00000   1.00000   1.00000
              80.0   2.82740   2.91573   3.19212   3.62300   3.07755   3.35711   1.65364
             150.0   6.23498   6.36681   6.77352   7.41421   6.60505   7.01760   4.54084
             300.0  12.70289  12.96274  13.76443  15.02792  13.43235  14.24493   9.47792
             600.0  25.50307  26.01962  27.61328  30.12957  26.95316  28.56886  19.10404
            1200.0  51.03753  52.06933  55.25234  60.28246  53.93402  57.16205  38.25585
            2400.0 102.08482 104.14773 110.51216 120.57241 107.87591 114.33158  76.52974
              </tableData>
            </table>
          </function>
        </fcs_function>
        <!-- the pitching moment's departures from a straight line through the
             angle-of-attack envelope (+0.019 per rad about the CG), cancelled by the
             elevator: the gains are designed on the line -->
        <fcs_function name="fcs/fbw/moment-comp-aero">
          <function>
            <table>
              <independentVar lookup="row">aero/alpha-rad</independentVar>
              <independentVar lookup="column">velocities/mach</independentVar>
              <tableData>
                       0.150     0.400     0.700     0.900     1.100     1.400     2.000
          -0.17453  -0.03145  -0.03046  -0.02759  -0.02350  -0.02367  -0.02554  -0.04164
          -0.15708  -0.02918  -0.02826  -0.02560  -0.02180  -0.02196  -0.02369  -0.03864
          -0.13963  -0.02691  -0.02605  -0.02360  -0.02010  -0.02025  -0.02184  -0.03562
          -0.12217  -0.02442  -0.02365  -0.02142  -0.01824  -0.01838  -0.01982  -0.03233
          -0.10472  -0.02198  -0.02128  -0.01928  -0.01642  -0.01654  -0.01784  -0.02910
          -0.08727  -0.01929  -0.01868  -0.01692  -0.01441  -0.01452  -0.01566  -0.02554
          -0.06981  -0.01676  -0.01623  -0.01470  -0.01252  -0.01261  -0.01360  -0.02219
          -0.05236  -0.01407  -0.01363  -0.01235  -0.01051  -0.01059  -0.01142  -0.01863
          -0.03491  -0.01174  -0.01137  -0.01030  -0.00877  -0.00884  -0.00953  -0.01555
          -0.01745  -0.00961  -0.00930  -0.00843  -0.00718  -0.00723  -0.00780  -0.01272
           0.00000  -0.00801  -0.00776  -0.00703  -0.00599  -0.00603  -0.00651  -0.01061
           0.01745  -0.00646  -0.00626  -0.00567  -0.00483  -0.00487  -0.00525  -0.00856
           0.03491  -0.00479  -0.00464  -0.00420  -0.00358  -0.00360  -0.00389  -0.00634
           0.05236  -0.00260  -0.00252  -0.00228  -0.00194  -0.00196  -0.00211  -0.00345
           0.06981  -0.00017  -0.00017  -0.00015  -0.00013  -0.00013  -0.00014  -0.00023
           0.08727   0.00298   0.00288   0.00261   0.00222   0.00224   0.00242   0.00394
           0.10472   0.00647   0.00627   0.00568   0.00483   0.00487   0.00525   0.00857
           0.12217   0.01029   0.00997   0.00903   0.00769   0.00775   0.00835   0.01363
           0.13963   0.01442   0.01396   0.01265   0.01077   0.01085   0.01170   0.01909
           0.15708   0.01804   0.01747   0.01582   0.01347   0.01358   0.01464   0.02388
           0.17453   0.02179   0.02110   0.01912   0.01628   0.01640   0.01769   0.02885
           0.19199   0.02462   0.02384   0.02160   0.01840   0.01853   0.01999   0.03260
           0.20944   0.02766   0.02678   0.02426   0.02066   0.02082   0.02245   0.03662
           0.22689   0.03051   0.02954   0.02676   0.02279   0.02296   0.02477   0.04039
           0.24435   0.03414   0.03306   0.02995   0.02550   0.02569   0.02771   0.04520
           0.26180   0.03817   0.03696   0.03349   0.02852   0.02873   0.03099   0.05054
           0.27925   0.04291   0.04155   0.03765   0.03206   0.03230   0.03484   0.05681
           0.29671   0.04722   0.04572   0.04143   0.03528   0.03554   0.03834   0.06252
           0.31416   0.05046   0.04886   0.04427   0.03769   0.03798   0.04096   0.06680
           0.33161   0.05242   0.05076   0.04599   0.03916   0.03945   0.04255   0.06940
           0.34907   0.05139   0.04977   0.04509   0.03840   0.03868   0.04172   0.06804
           0.36652   0.04440   0.04299   0.03895   0.03317   0.03342   0.03604   0.05878
           0.38397   0.03269   0.03166   0.02868   0.02443   0.02461   0.02654   0.04329
           0.40143   0.01908   0.01848   0.01674   0.01426   0.01436   0.01549   0.02527
           0.41888   0.00580   0.00561   0.00509   0.00433   0.00436   0.00471   0.00768
           0.43633  -0.00657  -0.00637  -0.00577  -0.00491  -0.00495  -0.00534  -0.00870
           0.45379  -0.01682  -0.01629  -0.01475  -0.01256  -0.01266  -0.01365  -0.02227
           0.47124  -0.02504  -0.02425  -0.02197  -0.01871  -0.01885  -0.02033  -0.03315
           0.48869  -0.03168  -0.03067  -0.02779  -0.02366  -0.02384  -0.02572  -0.04194
           0.50615  -0.03783  -0.03663  -0.03319  -0.02826  -0.02847  -0.03071  -0.05008
           0.52360  -0.04375  -0.04236  -0.03838  -0.03268  -0.03293  -0.03552  -0.05792
           0.55851  -0.05747  -0.05565  -0.05042  -0.04294  -0.04326  -0.04666  -0.07609
           0.61087  -0.08661  -0.08386  -0.07598  -0.06470  -0.06519  -0.07031  -0.11467
           0.66323  -0.12285  -0.11896  -0.10778  -0.09178  -0.09246  -0.09973  -0.16265
              </tableData>
            </table>
          </function>
        </fcs_function>
        <fcs_function name="fcs/fbw/moment-comp">
          <function>
            <product><property>fcs/fbw/moment-comp-aero</property>
              <quotient><property>fcs/fbw/md-aero</property><property>fcs/fbw/md-total</property></quotient></product>
          </function>
        </fcs_function>
        <!-- the gravity reference: the load factor that holds the flight path -->
        <fcs_function name="fcs/fbw/g-ref">
          <function>
            <product>
              <cos><property>attitude/theta-rad</property></cos>
              <cos><property>attitude/phi-rad</property></cos>
            </product>
          </function>
        </fcs_function>
        <!-- stick to load factor beyond the gravity reference, aft (negative) to n_max,
             no more than the lift at the angle-of-attack limits gives - beyond the
             gravity reference of the moment, so that full aft stick still reaches
             the limit in a steep climb or inverted - through a 0.2 s prefilter and
             a 12 g/s onset limit (a full pull at once pitches an agile airframe
             faster than its nose-down control can stop at the angle-of-attack
             limit) -->
        <fcs_function name="fcs/fbw/dn-stick">
          <function>
            <max>
              <min>
                <table>
                  <independentVar lookup="row">fcs/pitch-trim-sum</independentVar>
                  <tableData>
                    -1.0  8.000
                     0.0  0.0
                     1.0  -4.000
                  </tableData>
                </table>
                <difference><product><property>fcs/fbw/n-alpha</property><value>0.69813</value></product><property>fcs/fbw/g-ref</property></difference>
              </min>
              <difference><product><property>fcs/fbw/n-alpha</property><value>-0.17453</value></product><property>fcs/fbw/g-ref</property></difference>
            </max>
          </function>
        </fcs_function>
        <lag_filter name="fcs/fbw/dn-lag">
          <input>fcs/fbw/dn-stick</input>
          <c1>5.0</c1>
        </lag_filter>
        <actuator name="fcs/fbw/dn-cmd">
          <input>fcs/fbw/dn-lag</input>
          <rate_limit>12.0</rate_limit>
        </actuator>
        <!-- the response the command should produce (the short period's rise): the
             integrator trims away what differs from it, not the rise itself -->
        <lag_filter name="fcs/fbw/dn-model">
          <input>fcs/fbw/dn-cmd</input>
          <c1>2.5</c1>
        </lag_filter>
        <fcs_function name="fcs/fbw/dn">
          <function>
            <difference><property>accelerations/Nz</property><property>fcs/fbw/g-ref</property></difference>
          </function>
        </fcs_function>
        <!-- the angle of attack with its rise over the next 0.35 s counted as spent
             (the rise, not the pitch rate: in a steady pull the nose turns with the
             flight path and the angle of attack holds), and the load factor the
             angle of attack left to each limit gives -->
        <fcs_function name="fcs/fbw/alpha-ahead">
          <function>
            <sum>
              <property>aero/alpha-rad</property>
              <product><value>0.35</value><property>aero/alphadot-rad_sec</property></product>
            </sum>
          </function>
        </fcs_function>
        <fcs_function name="fcs/fbw/dn-room-up">
          <function>
            <product><property>fcs/fbw/n-alpha</property>
              <difference><value>0.69813</value><property>fcs/fbw/alpha-ahead</property></difference></product>
          </function>
        </fcs_function>
        <fcs_function name="fcs/fbw/dn-room-down">
          <function>
            <product><property>fcs/fbw/n-alpha</property>
              <difference><value>-0.17453</value><property>fcs/fbw/alpha-ahead</property></difference></product>
          </function>
        </fcs_function>
        <!-- the command limited to the load factor the aircraft pulls now plus what
             the angle of attack left gives: at a limit the feedforward asks for the
             load factor the airframe gives there, whatever elevator holds it - a
             steady pull on a stable airframe, a push on an unstable one (a
             feedforward faded out past the limit instead took about 10 deg of
             elevator per deg of alpha, on one side of it only: the actuator's rate
             limit could not follow, and the MiG-29A cycled between 24 and 29 deg) -->
        <fcs_function name="fcs/fbw/dn-limited">
          <function>
            <max>
              <min>
                <property>fcs/fbw/dn-cmd</property>
                <sum><property>fcs/fbw/dn</property><property>fcs/fbw/dn-room-up</property></sum>
              </min>
              <sum><property>fcs/fbw/dn</property><property>fcs/fbw/dn-room-down</property></sum>
            </max>
          </function>
        </fcs_function>
        <!-- the integrator's error: the load factor's departure from the model
             response, and at a limit the angle of attack left, counted five times -
             it trims what the airframe needs there beyond the linear design (vortex
             lift, the tail's power at high alpha) in a fraction of a second, not
             over the pull -->
        <fcs_function name="fcs/fbw/pitch-error">
          <function>
            <max>
              <min>
                <difference><property>fcs/fbw/dn-model</property><property>fcs/fbw/dn</property></difference>
                <product><value>5.0</value><property>fcs/fbw/dn-room-up</property></product>
              </min>
              <product><value>5.0</value><property>fcs/fbw/dn-room-down</property></product>
            </max>
          </function>
        </fcs_function>
        <fcs_function name="fcs/fbw/pitch-error-rate">
          <function><product><property>fcs/fbw/k-i</property><property>fcs/fbw/pitch-error</property></product></function>
        </fcs_function>
        <!-- the integrator: reset below 60 kt, held while the elevator is at a stop
             it would push further into (anti-windup) -->
        <switch name="fcs/fbw/pitch-hold">
          <default value="0"/>
          <test value="-1">
            velocities/vc-kts lt 60
          </test>
          <test logic="AND" value="1">
            fcs/fbw/elevator-raw gt 0.43633
            fcs/fbw/pitch-error-rate gt 0
          </test>
          <test logic="AND" value="1">
            fcs/fbw/elevator-raw lt -0.43633
            fcs/fbw/pitch-error-rate lt 0
          </test>
        </switch>
        <!-- held as a moment: the nozzles' share changes with thrust, the trim does not -->
        <fcs_function name="fcs/fbw/pitch-integral-moment-rate">
          <function><product><property>fcs/fbw/pitch-error-rate</property><property>fcs/fbw/md-total</property></product></function>
        </fcs_function>
        <fcs_function name="fcs/fbw/pitch-integral-limit">
          <function><product><value>-0.50000</value><property>fcs/fbw/md-total</property></product></function>
        </fcs_function>
        <integrator name="fcs/fbw/pitch-integral-moment">
          <input>fcs/fbw/pitch-integral-moment-rate</input>
          <c1>1.0</c1>
          <trigger>fcs/fbw/pitch-hold</trigger>
          <clipto> <min>-fcs/fbw/pitch-integral-limit</min> <max>fcs/fbw/pitch-integral-limit</max> </clipto>
        </integrator>
        <fcs_function name="fcs/fbw/pitch-integral">
          <function><quotient><property>fcs/fbw/pitch-integral-moment</property><property>fcs/fbw/md-total</property></quotient></function>
        </fcs_function>
        <!-- past an angle-of-attack limit (the next 0.35 s counted) a push back
             in proportion, all the travel 4 deg beyond: an unstable airframe
             pitching up fast needs it at once, not when an integrator winds -->
        <fcs_function name="fcs/fbw/alpha-push">
          <function>
            <difference>
              <product><value>6.25000</value>
                <max><value>0</value><difference><property>fcs/fbw/alpha-ahead</property><value>0.69813</value></difference></max></product>
              <product><value>6.25000</value>
                <max><value>0</value><difference><value>-0.17453</value><property>fcs/fbw/alpha-ahead</property></difference></max></product>
            </difference>
          </function>
        </fcs_function>
        <!-- the elevator: the push, the moment compensation, angle-of-attack and
             pitch-rate feedback, the feedforward of the limited command, the
             integrator -->
        <fcs_function name="fcs/fbw/elevator-raw">
          <function>
            <sum>
              <property>fcs/fbw/alpha-push</property>
              <property>fcs/fbw/moment-comp</property>
              <product><value>-1</value><property>fcs/fbw/k-alpha</property><property>aero/alpha-rad</property></product>
              <product><value>-1</value><property>fcs/fbw/k-q</property><property>velocities/q-rad_sec</property></product>
              <product><property>fcs/fbw/k-ff</property><property>fcs/fbw/dn-limited</property></product>
              <property>fcs/fbw/pitch-integral</property>
            </sum>
          </function>
        </fcs_function>
        <pure_gain name="fcs/fbw/elevator">
          <input>fcs/fbw/elevator-raw</input>
          <gain>1.0</gain>
          <clipto> <min>-0.43633</min> <max>0.43633</max> </clipto>
        </pure_gain>
        <!-- full travel in 0.83 s: 60 deg/s for a +-25 deg tail, faster for a
             canard's longer throw -->
        <actuator name="fcs/elevator-actuator">
          <input>fcs/fbw/elevator</input>
          <lag>40</lag>
          <rate_limit>1.051</rate_limit>
          <output>fcs/elevator-pos-rad</output>
        </actuator>
      </channel>
      <channel name="Roll (fly-by-wire)">
        <!-- hangar: roll-rate command about the flight path, limited to what the rudder can
             coordinate; bank hold at neutral stick -->
        <summer name="fcs/roll-trim-sum">
          <input>fcs/aileron-cmd-norm</input>
          <input>fcs/roll-trim-cmd-norm</input>
          <clipto> <min>-1</min> <max>1</max> </clipto>
        </summer>
        <fcs_function name="fcs/fbw/k-roll-m">
          <function>
            <table>
              <independentVar lookup="row">aero/qbar-psf</independentVar>
              <independentVar lookup="column">velocities/mach</independentVar>
              <tableData>
                       0.150     0.400     0.700     0.900     1.100     1.400     2.000
              10.0  4.843103e+00  4.939975e+00  4.963604e+00  4.969115e+00  4.977391e+00  4.981173e+00  4.991178e+00
              20.0  4.686206e+00  4.879949e+00  4.927208e+00  4.938230e+00  4.954783e+00  4.962346e+00  4.982356e+00
              40.0  4.372412e+00  4.759899e+00  4.854416e+00  4.876461e+00  4.909565e+00  4.924692e+00  4.964713e+00
              80.0  4.020345e+00  4.630879e+00  4.757973e+00  4.754938e+00  4.854956e+00  4.865165e+00  4.921561e+00
             150.0  2.163570e+00  3.914432e+00  4.341055e+00  4.440083e+00  4.590851e+00  4.658939e+00  4.843043e+00
             300.0  0.000000e+00  2.814993e+00  3.675066e+00  3.875709e+00  4.176988e+00  4.314630e+00  4.679289e+00
             600.0  0.000000e+00  6.349687e-01  2.353705e+00  2.755012e+00  3.356058e+00  3.631265e+00  4.357838e+00
            1200.0  0.000000e+00  0.000000e+00  0.000000e+00  5.168762e-01  1.717545e+00  2.266893e+00  3.718325e+00
            2400.0  0.000000e+00  0.000000e+00  0.000000e+00  0.000000e+00  0.000000e+00  0.000000e+00  2.439889e+00
              </tableData>
            </table>
          </function>
        </fcs_function>
        <fcs_function name="fcs/fbw/k-roll">
          <function>
            <quotient><property>fcs/fbw/k-roll-m</property><property>fcs/fbw/lda-total</property></quotient>
          </function>
          <clipto> <min>-1.50000</min> <max>1.50000</max> </clipto>
        </fcs_function>
        <fcs_function name="fcs/fbw/k-roll-ff-m">
          <function>
            <table>
              <independentVar lookup="row">aero/qbar-psf</independentVar>
              <independentVar lookup="column">velocities/mach</independentVar>
              <tableData>
                       0.150     0.400     0.700     0.900     1.100     1.400     2.000
              10.0  1.568971e-01  6.002527e-02  3.639607e-02  3.088485e-02  2.260867e-02  1.882694e-02  8.821771e-03
              20.0  3.137941e-01  1.200505e-01  7.279214e-02  6.176969e-02  4.521734e-02  3.765387e-02  1.764354e-02
              40.0  6.275882e-01  2.401011e-01  1.455843e-01  1.235394e-01  9.043467e-02  7.530775e-02  3.528708e-02
              80.0  9.796548e-01  3.691211e-01  2.420265e-01  2.450620e-01  1.450437e-01  1.348353e-01  7.843863e-02
             150.0  2.836430e+00  1.085568e+00  6.589448e-01  5.599169e-01  4.091485e-01  3.410608e-01  1.569570e-01
             300.0  5.711185e+00  2.185007e+00  1.324934e+00  1.124291e+00  8.230122e-01  6.853695e-01  3.207106e-01
             600.0  1.141018e+01  4.365031e+00  2.646295e+00  2.244988e+00  1.643942e+00  1.368735e+00  6.421617e-01
            1200.0  2.278138e+01  8.715334e+00  5.283958e+00  4.483124e+00  3.282455e+00  2.733107e+00  1.281675e+00
            2400.0  4.551630e+01  1.741315e+01  1.055777e+01  8.958356e+00  6.558475e+00  5.461141e+00  2.560111e+00
              </tableData>
            </table>
          </function>
        </fcs_function>
        <fcs_function name="fcs/fbw/k-roll-ff">
          <function>
            <quotient><property>fcs/fbw/k-roll-ff-m</property><property>fcs/fbw/lda-total</property></quotient>
          </function>
          <clipto> <min>-1.50000</min> <max>1.50000</max> </clipto>
        </fcs_function>
        <fcs_function name="fcs/fbw/k-roll-i-m">
          <function>
            <table>
              <independentVar lookup="row">aero/qbar-psf</independentVar>
              <independentVar lookup="column">velocities/mach</independentVar>
              <tableData>
                       0.150     0.400     0.700     0.900     1.100     1.400     2.000
              10.0  4.444444e-01  4.444444e-01  4.444444e-01  4.444444e-01  4.444444e-01  4.444444e-01  4.444444e-01
              20.0  4.444444e-01  4.444444e-01  4.444444e-01  4.444444e-01  4.444444e-01  4.444444e-01  4.444444e-01
              40.0  4.444444e-01  4.444444e-01  4.444444e-01  4.444444e-01  4.444444e-01  4.444444e-01  4.444444e-01
              80.0  4.444444e-01  4.444444e-01  4.444444e-01  4.444444e-01  4.444444e-01  4.444444e-01  4.444444e-01
             150.0  4.444444e-01  4.444444e-01  4.444444e-01  4.444444e-01  4.444444e-01  4.444444e-01  4.444444e-01
             300.0  4.444444e-01  4.444444e-01  4.444444e-01  4.444444e-01  4.444444e-01  4.444444e-01  4.444444e-01
             600.0  4.444444e-01  4.444444e-01  4.444444e-01  4.444444e-01  4.444444e-01  4.444444e-01  4.444444e-01
            1200.0  4.444444e-01  4.444444e-01  4.444444e-01  4.444444e-01  4.444444e-01  4.444444e-01  4.444444e-01
            2400.0  4.444444e-01  4.444444e-01  4.444444e-01  4.444444e-01  4.444444e-01  4.444444e-01  4.444444e-01
              </tableData>
            </table>
          </function>
        </fcs_function>
        <fcs_function name="fcs/fbw/k-roll-i">
          <function>
            <quotient><property>fcs/fbw/k-roll-i-m</property><property>fcs/fbw/lda-total</property></quotient>
          </function>
          <clipto> <min>-1.00000</min> <max>1.00000</max> </clipto>
        </fcs_function>
        <fcs_function name="fcs/fbw/p-per">
          <function>
            <table>
              <independentVar lookup="row">aero/qbar-psf</independentVar>
              <independentVar lookup="column">velocities/mach</independentVar>
              <tableData>
                       0.150     0.400     0.700     0.900     1.100     1.400     2.000
              10.0  2.669770e+00  6.978378e+00  1.150891e+01  1.356261e+01  1.852736e+01  2.224892e+01  4.748242e+01
              20.0  1.334885e+00  3.489189e+00  5.754454e+00  6.781303e+00  9.263682e+00  1.112446e+01  2.374121e+01
              40.0  6.674424e-01  1.744595e+00  2.877227e+00  3.390652e+00  4.631841e+00  5.562230e+00  1.187061e+01
              80.0  4.275782e-01  1.134801e+00  1.730715e+00  1.709278e+00  2.887950e+00  3.106598e+00  5.340213e+00
             150.0  1.476782e-01  3.858616e-01  6.356815e-01  7.481092e-01  1.023782e+00  1.228165e+00  2.668751e+00
             300.0  7.334363e-02  1.917060e-01  3.161509e-01  3.725718e-01  5.089585e-01  6.111725e-01  1.306097e+00
             600.0  3.671099e-02  9.596243e-02  1.582889e-01  1.865841e-01  2.548016e-01  3.060338e-01  6.522953e-01
            1200.0  1.838690e-02  4.806230e-02  7.927372e-02  9.343463e-02  1.276115e-01  1.532611e-01  3.268216e-01
            2400.0  9.202836e-03  2.405533e-02  3.967495e-02  4.675847e-02  6.386836e-02  7.670174e-02  1.636176e-01
              </tableData>
            </table>
          </function>
        </fcs_function>
        <fcs_function name="fcs/fbw/p-max">
          <function>
            <min>
              <value>4.18879</value>
              <product><property>fcs/fbw/p-per</property><property>fcs/fbw/lda-total</property></product>
            </min>
          </function>
        </fcs_function>
        <!-- the stick's rate halves towards alpha_max -->
        <fcs_function name="fcs/fbw/p-stick">
          <function>
            <product>
              <property>fcs/roll-trim-sum</property>
              <property>fcs/fbw/p-max</property>
              <table>
                <independentVar lookup="row">aero/alpha-rad</independentVar>
                <tableData>
                  0.27925 1.0
                  0.69813 0.5
                </tableData>
              </table>
            </product>
          </function>
        </fcs_function>
        <!-- the rudder's yaw acceleration at full travel (1/s^2), and the yaw damping (1/s) -->
        <fcs_function name="fcs/fbw/yaw-accel">
          <function>
            <table>
              <independentVar lookup="row">aero/qbar-psf</independentVar>
              <independentVar lookup="column">velocities/mach</independentVar>
              <tableData>
                       0.150     0.400     0.700     0.900     1.100     1.400     2.000
              10.0   0.02773   0.02817   0.02955   0.03181   0.02224   0.01366   0.00871
              20.0   0.05546   0.05634   0.05911   0.06362   0.04448   0.02733   0.01741
              40.0   0.11093   0.11268   0.11821   0.12725   0.08896   0.05466   0.03483
              80.0   0.28218   0.28732   0.30335   0.32865   0.22771   0.14065   0.08285
             150.0   0.54025   0.54863   0.57512   0.61823   0.43292   0.26580   0.16970
             300.0   1.06724   1.08369   1.13569   1.22053   0.85499   0.52478   0.33698
             600.0   2.11115   2.14398   2.24769   2.41697   1.69188   1.03882   0.66553
            1200.0   4.19432   4.26000   4.46739   4.80600   3.36231   2.06505   1.31988
            2400.0   8.35766   8.48905   8.90390   9.58155   6.70088   4.11630   2.62735
              </tableData>
            </table>
          </function>
        </fcs_function>
        <fcs_function name="fcs/fbw/yaw-damping">
          <function>
            <table>
              <independentVar lookup="row">aero/qbar-psf</independentVar>
              <independentVar lookup="column">velocities/mach</independentVar>
              <tableData>
                       0.150     0.400     0.700     0.900     1.100     1.400     2.000
              10.0   0.01717   0.00657   0.00398   0.00338   0.00247   0.00206   0.00097
              20.0   0.03434   0.01314   0.00797   0.00676   0.00495   0.00412   0.00193
              40.0   0.06868   0.02628   0.01593   0.01352   0.00990   0.00824   0.00386
              80.0   0.15730   0.06021   0.03676   0.03152   0.02277   0.01910   0.00819
             150.0   0.29142   0.11119   0.06691   0.05616   0.04169   0.03447   0.01693
             300.0   0.54060   0.20648   0.12462   0.10509   0.07756   0.06430   0.03122
             600.0   1.03902   0.39720   0.24032   0.20349   0.14941   0.12420   0.05917
            1200.0   2.04839   0.78346   0.47476   0.40286   0.29496   0.24558   0.11569
            2400.0   4.09271   1.56578   0.94939   0.80562   0.58975   0.49110   0.23013
              </tableData>
            </table>
          </function>
        </fcs_function>
        <!-- the rudder's share of the yaw a roll about the flight path needs, per unit of
             its roll acceleration: sin(alpha), less the ailerons' own yaw and what a
             principal axis inclined to the body axis gives -->
        <fcs_function name="fcs/fbw/roll-yaw-share">
          <function>
            <table>
              <independentVar lookup="row">aero/alpha-rad</independentVar>
              <tableData>
                   -0.34907  -0.40236
                   -0.26180  -0.34568
                   -0.17453  -0.27085
                   -0.08727  -0.17977
                    0.00000  -0.08456
                    0.08727   0.01119
                    0.17453   0.10240
                    0.26180   0.17617
                    0.34907   0.22972
                    0.43633   0.27091
                    0.52360   0.32952
                    0.61087   0.40651
                    0.69813   0.49849
                    0.78540   0.57255
                    0.87266   0.62109
              </tableData>
            </table>
          </function>
        </fcs_function>
        <!-- the yaw acceleration each rad/s of roll rate needs while the aircraft pitches
             under it: the pitch rate's inertia coupling, the angle of attack rising, and
             the yaw damping the roll's yaw rate meets -->
        <fcs_function name="fcs/fbw/p-yaw-need">
          <function>
            <abs>
              <sum>
                <product>
                  <sum>
                    <property>aero/alphadot-rad_sec</property>
                    <product><value>0.61209</value><property>velocities/q-rad_sec</property></product>
                  </sum>
                  <cos><property>aero/alpha-rad</property></cos>
                </product>
                <product><property>fcs/fbw/yaw-damping</property><sin><property>aero/alpha-rad</property></sin></product>
              </sum>
            </abs>
          </function>
        </fcs_function>
        <!-- no more roll rate than 0.5 of the rudder's yaw holds: a roll the rudder cannot
             follow turns the angle of attack into sideslip -->
        <fcs_function name="fcs/fbw/p-yaw-max">
          <function>
            <quotient>
              <product><value>0.5</value><property>fcs/fbw/yaw-accel</property></product>
              <max><value>0.001</value><property>fcs/fbw/p-yaw-need</property></max>
            </quotient>
          </function>
        </fcs_function>
        <fcs_function name="fcs/fbw/p-limited">
          <function>
            <max>
              <min><property>fcs/fbw/p-stick</property><property>fcs/fbw/p-yaw-max</property></min>
              <product><value>-1</value><property>fcs/fbw/p-yaw-max</property></product>
            </max>
          </function>
        </fcs_function>
        <!-- and while the rate grows, no faster roll acceleration than all of it
             coordinates, unless the roll asked for could not leave 2.0 deg of sideslip
             even uncoordinated: at worst c^2 p^2 / (8 Y), c the rudder's share, Y its yaw
             acceleration, p the rate asked for -->
        <fcs_function name="fcs/fbw/p-accel">
          <function>
            <product>
              <quotient>
                <property>fcs/fbw/yaw-accel</property>
                <max><value>0.01</value><abs><property>fcs/fbw/roll-yaw-share</property></abs></max>
              </quotient>
              <max>
                <value>1</value>
                <quotient>
                  <product><value>0.27925</value><property>fcs/fbw/yaw-accel</property></product>
                  <sum>
                    <value>1e-9</value>
                    <product>
                      <property>fcs/fbw/roll-yaw-share</property><property>fcs/fbw/roll-yaw-share</property>
                      <property>fcs/fbw/p-limited</property><property>fcs/fbw/p-limited</property>
                    </product>
                  </sum>
                </quotient>
              </max>
            </product>
          </function>
        </fcs_function>
        <!-- a roll is stopped as fast as the ailerons can -->
        <fcs_function name="fcs/fbw/p-accel-up">
          <function>
            <sum><property>fcs/fbw/p-accel</property>
              <product><value>1000</value><lt><property>fcs/fbw/p-cmd</property><value>0</value></lt></product></sum>
          </function>
        </fcs_function>
        <fcs_function name="fcs/fbw/p-accel-down">
          <function>
            <sum><property>fcs/fbw/p-accel</property>
              <product><value>1000</value><gt><property>fcs/fbw/p-cmd</property><value>0</value></gt></product></sum>
          </function>
        </fcs_function>
        <actuator name="fcs/fbw/p-cmd">
          <input>fcs/fbw/p-limited</input>
          <rate_limit sense="incr">fcs/fbw/p-accel-up</rate_limit>
          <rate_limit sense="decr">fcs/fbw/p-accel-down</rate_limit>
        </actuator>
        <fcs_function name="fcs/fbw/p-stability">
          <function>
            <sum>
              <product><property>velocities/p-rad_sec</property><cos><property>aero/alpha-rad</property></cos></product>
              <product><property>velocities/r-rad_sec</property><sin><property>aero/alpha-rad</property></sin></product>
            </sum>
          </function>
        </fcs_function>
        <fcs_function name="fcs/fbw/roll-error-rate">
          <function>
            <product><property>fcs/fbw/k-roll-i</property>
              <difference><property>fcs/fbw/p-cmd</property><property>fcs/fbw/p-stability</property></difference></product>
          </function>
        </fcs_function>
        <!-- held as a moment: the nozzles' share changes with thrust, the trim does not -->
        <fcs_function name="fcs/fbw/roll-integral-moment-rate">
          <function><product><property>fcs/fbw/roll-error-rate</property><property>fcs/fbw/lda-total</property></product></function>
        </fcs_function>
        <fcs_function name="fcs/fbw/roll-integral-limit">
          <function><product><value>0.26180</value><property>fcs/fbw/lda-total</property></product></function>
        </fcs_function>
        <integrator name="fcs/fbw/roll-integral-moment">
          <input>fcs/fbw/roll-integral-moment-rate</input>
          <c1>1.0</c1>
          <trigger>fcs/fbw/reset</trigger>
          <clipto> <min>-fcs/fbw/roll-integral-limit</min> <max>fcs/fbw/roll-integral-limit</max> </clipto>
        </integrator>
        <fcs_function name="fcs/fbw/roll-integral">
          <function><quotient><property>fcs/fbw/roll-integral-moment</property><property>fcs/fbw/lda-total</property></quotient></function>
        </fcs_function>
        <fcs_function name="fcs/fbw/aileron">
          <function>
            <sum>
              <product><property>fcs/fbw/k-roll-ff</property><property>fcs/fbw/p-cmd</property></product>
              <product><property>fcs/fbw/k-roll</property>
                <difference><property>fcs/fbw/p-cmd</property><property>fcs/fbw/p-stability</property></difference></product>
              <property>fcs/fbw/roll-integral</property>
            </sum>
          </function>
          <clipto> <min>-0.52360</min> <max>0.52360</max> </clipto>
        </fcs_function>
        <actuator name="fcs/left-aileron-actuator">
          <input>fcs/fbw/aileron</input>
          <lag>40</lag>
          <rate_limit>1.4</rate_limit>
          <output>fcs/left-aileron-pos-rad</output>
        </actuator>
        <pure_gain name="fcs/right-aileron">
          <input>fcs/left-aileron-pos-rad</input>
          <gain>-1</gain>
          <output>fcs/right-aileron-pos-rad</output>
        </pure_gain>
      </channel>
      <channel name="Yaw (fly-by-wire)">
        <!-- hangar: yaw damper, sideslip feedback, pedals command sideslip -->
        <summer name="fcs/yaw-trim-sum">
          <input>fcs/rudder-cmd-norm</input>
          <input>fcs/yaw-trim-cmd-norm</input>
          <clipto> <min>-1</min> <max>1</max> </clipto>
        </summer>
        <fcs_function name="fcs/fbw/k-yaw-r">
          <function>
            <table>
              <independentVar lookup="row">aero/qbar-psf</independentVar>
              <independentVar lookup="column">velocities/mach</independentVar>
              <tableData>
                       0.150     0.400     0.700     0.900     1.100     1.400     2.000
              10.0  -3.00000  -3.00000  -3.00000  -3.00000  -3.00000  -3.00000  -3.00000
              20.0  -3.00000  -3.00000  -3.00000  -3.00000  -3.00000  -3.00000  -3.00000
              40.0  -3.00000  -3.00000  -3.00000  -3.00000  -3.00000  -3.00000  -3.00000
              80.0  -2.39545  -2.58670  -2.50292  -2.32097  -3.00000  -3.00000  -3.00000
             150.0  -1.02625  -1.27102  -1.27371  -1.19920  -1.73191  -2.85379  -3.00000
             300.0  -0.31382  -0.56632  -0.60099  -0.57344  -0.83696  -1.39719  -2.25811
             600.0   0.00000  -0.20951  -0.25973  -0.25550  -0.38318  -0.65757  -1.10863
            1200.0   0.00000  -0.02773  -0.08617  -0.09397  -0.15257  -0.28189  -0.52394
            2400.0   0.00000   0.00000  -0.00833  -0.02280  -0.06332  -0.11153  -0.22768
              </tableData>
            </table>
          </function>
        </fcs_function>
        <fcs_function name="fcs/fbw/k-yaw-beta">
          <function>
            <table>
              <independentVar lookup="row">aero/qbar-psf</independentVar>
              <independentVar lookup="column">velocities/mach</independentVar>
              <tableData>
                       0.150     0.400     0.700     0.900     1.100     1.400     2.000
              10.0   3.00000   3.00000   3.00000   3.00000   3.00000   3.00000   3.00000
              20.0   3.00000   3.00000   3.00000   3.00000   3.00000   3.00000   3.00000
              40.0   3.00000   3.00000   3.00000   3.00000   3.00000   3.00000   3.00000
              80.0   0.88294   0.94080   1.14380   1.40117   0.48858   2.97212   2.66679
             150.0   1.14524   1.14607   1.14327   1.13108   1.20074   2.59627   3.00000
             300.0   0.66025   0.65346   0.63244   0.60250   0.70665   1.40856   2.23643
             600.0   0.28863   0.28380   0.26966   0.25232   0.27873   0.60184   1.10119
            1200.0   0.07785   0.07541   0.06882   0.06211   0.03182   0.16047   0.42656
            2400.0   0.00000   0.00000   0.00000   0.00000   0.00000   0.00000   0.07116
              </tableData>
            </table>
          </function>
        </fcs_function>
        <fcs_function name="fcs/fbw/k-pedal">
          <function>
            <table>
              <independentVar lookup="row">aero/qbar-psf</independentVar>
              <independentVar lookup="column">velocities/mach</independentVar>
              <tableData>
                       0.150     0.400     0.700     0.900     1.100     1.400     2.000
              10.0   0.00000   0.00000   0.00000   0.00000   0.00000   0.00000   0.00000
              20.0   0.00000   0.00000   0.00000   0.00000   0.00000   0.00000   0.00000
              40.0   0.00000   0.00000   0.00000   0.00000   0.00000   0.00000   0.00000
              80.0   0.00000   0.00000   0.00000   0.00000   0.00000   0.00000   0.00000
             150.0   0.00993   0.01083   0.01331   0.01615   0.01988   0.03139   0.00000
             300.0   0.02977   0.02995   0.03033   0.03023   0.04868   0.06544   0.05073
             600.0   0.03505   0.03498   0.03465   0.03344   0.05610   0.07376   0.07086
            1200.0   0.03485   0.03471   0.03412   0.03268   0.05545   0.07235   0.07320
            2400.0   0.03311   0.03294   0.03234   0.03111   0.05255   0.06870   0.07051
              </tableData>
            </table>
          </function>
        </fcs_function>
        <!-- the yaw damper damps the sideslip's rate, the stability-axis yaw rate less
             the one that coordinates the bank and the side force: in the dutch roll the
             yaw rate itself, and zero in a steady coordinated turn, in a roll about the
             flight path and in a steady sideslip - it coordinates those as long as they
             last (a damper on the washed-out yaw rate stopped coordinating a sustained
             roll, and at low speed the roll turned the angle of attack into sideslip) -->
        <fcs_function name="fcs/fbw/rudder">
          <function>
            <sum>
              <product><property>fcs/fbw/k-pedal</property><property>fcs/yaw-trim-sum</property></product>
              <product><value>-1</value><property>fcs/fbw/k-yaw-beta</property>
                <difference><property>aero/beta-rad</property>
                  <product><value>0.17453</value><property>fcs/yaw-trim-sum</property></product></difference></product>
              <product><property>fcs/fbw/k-yaw-r</property><property>aero/betadot-rad_sec</property></product>
            </sum>
          </function>
          <clipto> <min>-0.52360</min> <max>0.52360</max> </clipto>
        </fcs_function>
        <actuator name="fcs/rudder-actuator">
          <input>fcs/fbw/rudder</input>
          <lag>40</lag>
          <rate_limit>1.4</rate_limit>
          <output>fcs/rudder-pos-rad</output>
        </actuator>
        <!-- the nose wheel steers with the pedals (JSBSim steers from fcs/steer-cmd-norm,
             positive right; the rudder command is positive left) -->
        <pure_gain name="fcs/steer-from-rudder">
          <input>fcs/yaw-trim-sum</input>
          <gain>-1</gain>
          <output>fcs/steer-cmd-norm</output>
        </pure_gain>
      </channel>
      <channel name="Flaps">
        <kinematic name="fcs/flaps-control">
          <input>fcs/flap-cmd-norm</input>
          <traverse>
            <setting> <position>0.0</position> <time>0.0</time> </setting>
            <setting> <position>7.5</position> <time>2.0</time> </setting>
            <setting> <position>15.0</position> <time>2.0</time> </setting>
            <setting> <position>22.5</position> <time>2.0</time> </setting>
            <setting> <position>30.0</position> <time>2.0</time> </setting>
          </traverse>
          <output>fcs/flap-pos-deg</output>
        </kinematic>
      </channel>
      <channel name="Leading-Edge Flaps">
        <fcs_function name="fcs/lef-schedule">
          <function>
            <sum>
              <product> <value>1.38</value> <property>aero/alpha-deg</property> </product>
              <product> <value>-9.05</value>
                <quotient> <property>aero/qbar-psf</property> <property>atmosphere/P-psf</property> </quotient>
              </product>
              <value>1.45</value>
            </sum>
          </function>
          <clipto> <min>-3</min> <max>30</max> </clipto>
        </fcs_function>
        <actuator name="fcs/lef-actuator">
          <input>fcs/lef-schedule</input>
          <lag>7.35</lag>
          <rate_limit>25</rate_limit>
          <output>fcs/lef-pos-deg</output>
        </actuator>
      </channel>
      <channel name="Throttle 0">
        <fcs_function name="fcs/throttle-lever-0">
          <function>
            <table>
              <independentVar lookup="row">fcs/throttle-cmd-norm[0]</independentVar>
              <tableData>
                0.0  0.0
                0.8  1.0
                1.0  2.0
              </tableData>
            </table>
          </function>
          <output>fcs/throttle-pos-norm[0]</output>
        </fcs_function>
      </channel>
      <channel name="Throttle 1">
        <fcs_function name="fcs/throttle-lever-1">
          <function>
            <table>
              <independentVar lookup="row">fcs/throttle-cmd-norm[1]</independentVar>
              <tableData>
                0.0  0.0
                0.8  1.0
                1.0  2.0
              </tableData>
            </table>
          </function>
          <output>fcs/throttle-pos-norm[1]</output>
        </fcs_function>
      </channel>
      <channel name="Landing Gear">
        <kinematic name="fcs/gear-control">
          <input>gear/gear-cmd-norm</input>
          <traverse>
            <setting> <position>0</position> <time>0</time> </setting>
            <setting> <position>1</position> <time>5</time> </setting>
          </traverse>
          <output>gear/gear-pos-norm</output>
        </kinematic>
      </channel>
      <channel name="Thrust Vectoring">
        <!-- hangar: each nozzle turns with the surfaces (hangar/fcs.py): through its
             travel as the elevator goes through its own (a positive deflection
             pushes the tail up, nose down, as the elevator's does), differentially
             through half of it with the ailerons (the left nozzle's tail up rolls
             right) and, in a canted plane, with the rudder -->
        <fcs_function name="fcs/vectoring/nozzle-0-rad">
          <function>
            <sum>
              <product><value>0.800000</value><property>fcs/elevator-pos-rad</property></product>
              <product><value>0.333333</value><property>fcs/left-aileron-pos-rad</property></product>
            </sum>
          </function>
          <clipto> <min>-0.349066</min> <max>0.349066</max> </clipto>
        </fcs_function>
        <fcs_function name="fcs/vectoring/pitch-0-rad">
          <function>
            <sum><value>0.000000</value><product><value>1.000000</value><property>fcs/vectoring/nozzle-0-rad</property></product></sum>
          </function>
          <output>propulsion/engine[0]/pitch-angle-rad</output>
        </fcs_function>
        <fcs_function name="fcs/vectoring/nozzle-1-rad">
          <function>
            <sum>
              <product><value>0.800000</value><property>fcs/elevator-pos-rad</property></product>
              <product><value>-0.333333</value><property>fcs/left-aileron-pos-rad</property></product>
            </sum>
          </function>
          <clipto> <min>-0.349066</min> <max>0.349066</max> </clipto>
        </fcs_function>
        <fcs_function name="fcs/vectoring/pitch-1-rad">
          <function>
            <sum><value>0.000000</value><product><value>1.000000</value><property>fcs/vectoring/nozzle-1-rad</property></product></sum>
          </function>
          <output>propulsion/engine[1]/pitch-angle-rad</output>
        </fcs_function>
      </channel>
    </flight_control>
    <aerodynamics>
        <function name="aero/function/mach-lift">
          <description>lift, and damping, over its low-speed value (hangar: aero/mach.py)</description>
          <table>
            <independentVar lookup="row">velocities/mach</independentVar>
            <tableData>
                 0.000     1.000000
                 0.300     1.013699
                 0.500     1.040690
                 0.600     1.061696
                 0.700     1.089961
                 0.800     1.129210
                 0.850     1.155422
                 0.900     1.189177
                 0.950     1.178376
                 1.000     1.147336
                 1.050     1.105913
                 1.100     1.063962
                 1.200     1.017905
                 1.400     1.127629
                 1.600     0.961829
                 1.800     0.844030
                 2.000     0.754821
                 2.300     0.654163
                 2.600     0.578808
            </tableData>
          </table>
        </function>
        <function name="aero/function/mach-side">
          <description>side force, rolling and yawing moment over their low-speed values</description>
          <table>
            <independentVar lookup="row">velocities/mach</independentVar>
            <tableData>
                 0.000     1.000000
                 0.300     1.008189
                 0.500     1.023758
                 0.600     1.035321
                 0.700     1.050041
                 0.800     1.068664
                 0.850     1.079730
                 0.900     1.092032
                 0.950     1.127899
                 1.000     1.178874
                 1.050     1.233965
                 1.100     1.282178
                 1.200     1.314002
                 1.400     1.033105
                 1.600     0.861297
                 1.800     0.744337
                 2.000     0.658320
                 2.300     0.563697
                 2.600     0.494437
            </tableData>
          </table>
        </function>
        <function name="aero/function/mach-dCm-dCL">
          <description>pitching moment per unit low-speed lift: the neutral point's move</description>
          <table>
            <independentVar lookup="row">velocities/mach</independentVar>
            <tableData>
                 0.000     0.000000
                 0.300    -0.000427
                 0.500    -0.001312
                 0.600    -0.002040
                 0.700    -0.003067
                 0.800    -0.004646
                 0.850    -0.005880
                 0.900    -0.007883
                 0.950    -0.038052
                 1.000    -0.092093
                 1.050    -0.154986
                 1.100    -0.214289
                 1.200    -0.290148
                 1.400    -0.273387
                 1.600    -0.260236
                 1.800    -0.247168
                 2.000    -0.235492
                 2.300    -0.220662
                 2.600    -0.208507
            </tableData>
          </table>
        </function>
        <function name="aero/function/mach-dCD0">
          <description>zero-lift drag's change: friction and wave drag</description>
          <table>
            <independentVar lookup="row">velocities/mach</independentVar>
            <tableData>
                 0.000     0.000000
                 0.300    -0.000089
                 0.500    -0.000244
                 0.600    -0.000346
                 0.700    -0.000465
                 0.800    -0.000597
                 0.850    -0.000360
                 0.900     0.000622
                 0.950     0.006523
                 1.000     0.018587
                 1.050     0.025238
                 1.100     0.025155
                 1.200     0.024982
                 1.400     0.023692
                 1.600     0.022865
                 1.800     0.022124
                 2.000     0.021434
                 2.300     0.020471
                 2.600     0.019583
            </tableData>
          </table>
        </function>
        <function name="aero/function/mach-dK">
          <description>induced-drag factor's change (per CL^2)</description>
          <table>
            <independentVar lookup="row">velocities/mach</independentVar>
            <tableData>
                 0.000     0.000000
                 0.300     0.004943
                 0.500     0.014118
                 0.600     0.020780
                 0.700     0.029143
                 0.800     0.039731
                 0.850     0.046209
                 0.900     0.053929
                 0.950     0.051531
                 1.000     0.044258
                 1.050     0.038929
                 1.100     0.042805
                 1.200     0.079399
                 1.400     0.127938
                 1.600     0.120724
                 1.800     0.105914
                 2.000     0.084272
                 2.300     0.039854
                 2.600    -0.018274
            </tableData>
          </table>
        </function>
        <function name="aero/function/mach-aileron">
          <description>aileron power over its low-speed value</description>
          <table>
            <independentVar lookup="row">velocities/mach</independentVar>
            <tableData>
                 0.000     1.000000
                 0.300     1.016315
                 0.500     1.049295
                 0.600     1.075841
                 0.700     1.112989
                 0.800     1.167828
                 0.850     1.206908
                 0.900     1.260409
                 0.950     1.178684
                 1.000     1.036275
                 1.050     0.862120
                 1.100     0.685158
                 1.200     0.438563
                 1.400     0.517799
                 1.600     0.430211
                 1.800     0.371091
                 2.000     0.327808
                 2.300     0.280351
                 2.600     0.245705
            </tableData>
          </table>
        </function>
        <function name="aero/function/mach-elevator">
          <description>elevator power over its low-speed value</description>
          <table>
            <independentVar lookup="row">velocities/mach</independentVar>
            <tableData>
                 0.000     1.000000
                 0.300     1.021856
                 0.500     1.066110
                 0.600     1.101865
                 0.700     1.152296
                 0.800     1.227497
                 0.850     1.281164
                 0.900     1.353166
                 0.950     1.360475
                 1.000     1.359381
                 1.050     1.352668
                 1.100     1.343121
                 1.200     1.326669
                 1.400     1.245212
                 1.600     1.017527
                 1.800     0.869607
                 2.000     0.763542
                 2.300     0.649055
                 2.600     0.566511
            </tableData>
          </table>
        </function>
        <function name="aero/function/mach-flap">
          <description>flap power over its low-speed value</description>
          <table>
            <independentVar lookup="row">velocities/mach</independentVar>
            <tableData>
                 0.000     1.000000
                 0.300     1.025782
                 0.500     1.078986
                 0.600     1.122897
                 0.700     1.186051
                 0.800     1.283141
                 0.850     1.355296
                 0.900     1.458203
                 0.950     1.368572
                 1.000     1.192871
                 1.050     0.971865
                 1.100     0.746319
                 1.200     0.444667
                 1.400     0.525006
                 1.600     0.436199
                 1.800     0.376257
                 2.000     0.332371
                 2.300     0.284254
                 2.600     0.249125
            </tableData>
          </table>
        </function>
        <function name="aero/function/mach-rudder">
          <description>rudder power over its low-speed value</description>
          <table>
            <independentVar lookup="row">velocities/mach</independentVar>
            <tableData>
                 0.000     1.000000
                 0.300     1.010604
                 0.500     1.031759
                 0.600     1.048476
                 0.700     1.071313
                 0.800     1.103574
                 0.850     1.125308
                 0.900     1.153180
                 0.950     1.102222
                 1.000     1.018035
                 1.050     0.914671
                 1.100     0.806178
                 1.200     0.630006
                 1.400     0.495328
                 1.600     0.412954
                 1.800     0.356876
                 2.000     0.315635
                 2.300     0.270268
                 2.600     0.237060
            </tableData>
          </table>
        </function>
        <function name="aero/function/CL-base">
          <description>CL over alpha and beta at low speed</description>
          <table>
            <independentVar lookup="row">aero/alpha-deg</independentVar>
            <independentVar lookup="column">aero/beta-deg</independentVar>
            <tableData>
                        -90.00    -70.00    -50.00    -40.00    -30.00    -25.00    -20.00    -15.00    -10.00     -6.00     -3.00      0.00      3.00      6.00     10.00     15.00     20.00     25.00     30.00     40.00     50.00     70.00     90.00
             -180.00  -0.00000   0.00000   0.00000   0.00000   0.00000   0.00000   0.00000   0.00000   0.00000   0.00000   0.00000   0.00000   0.00000   0.00000   0.00000   0.00000   0.00000   0.00000   0.00000   0.00000   0.00000   0.00000  -0.00000
             -120.00   0.00000   0.10427   0.31380   0.43081   0.53856   0.58445   0.62815   0.65738   0.68111   0.69348   0.69874   0.70050   0.69874   0.69348   0.68111   0.65738   0.62815   0.58445   0.53856   0.43081   0.31380   0.10427   0.00000
              -70.00  -0.00000  -0.08435  -0.25807  -0.35556  -0.44518  -0.48419  -0.51784  -0.54470  -0.56449  -0.57482  -0.57921  -0.58068  -0.57921  -0.57482  -0.56449  -0.54470  -0.51784  -0.48419  -0.44518  -0.35556  -0.25807  -0.08435  -0.00000
              -46.00  -0.00000  -0.27496  -0.63884  -0.84135  -1.05277  -1.14352  -1.22557  -1.29753  -1.34660  -1.36699  -1.37737  -1.38087  -1.37737  -1.36699  -1.34660  -1.29753  -1.22557  -1.14352  -1.05277  -0.84135  -0.63884  -0.27496  -0.00000
              -32.00  -0.00000  -0.36978  -0.65810  -0.86040  -1.05967  -1.14449  -1.22380  -1.29459  -1.35494  -1.38119  -1.39236  -1.39610  -1.39236  -1.38119  -1.35494  -1.29459  -1.22380  -1.14449  -1.05967  -0.86040  -0.65810  -0.36978  -0.00000
              -22.00  -0.00000  -0.30064  -0.52256  -0.68827  -0.85478  -0.92584  -0.98121  -1.03395  -1.06775  -1.08507  -1.09254  -1.09506  -1.09254  -1.08507  -1.06775  -1.03395  -0.98121  -0.92584  -0.85478  -0.68827  -0.52256  -0.30064  -0.00000
              -17.00  -0.00000  -0.24270  -0.42389  -0.55553  -0.68721  -0.74391  -0.78775  -0.82801  -0.85277  -0.86531  -0.87056  -0.87241  -0.87056  -0.86531  -0.85277  -0.82801  -0.78775  -0.74391  -0.68721  -0.55553  -0.42389  -0.24270  -0.00000
              -13.00  -0.00000  -0.18809  -0.33241  -0.43258  -0.53646  -0.57472  -0.60831  -0.63847  -0.65710  -0.66669  -0.67074  -0.67209  -0.67074  -0.66669  -0.65710  -0.63847  -0.60831  -0.57472  -0.53646  -0.43258  -0.33241  -0.18809  -0.00000
               -9.00  -0.00000  -0.12862  -0.23507  -0.30164  -0.36966  -0.39170  -0.41626  -0.43152  -0.44222  -0.44768  -0.44997  -0.45073  -0.44997  -0.44768  -0.44222  -0.43152  -0.41626  -0.39170  -0.36966  -0.30164  -0.23507  -0.12862  -0.00000
               -5.00  -0.00000  -0.06548  -0.13368  -0.16473  -0.19708  -0.20213  -0.21418  -0.21884  -0.22193  -0.22339  -0.22395  -0.22413  -0.22395  -0.22339  -0.22193  -0.21884  -0.21418  -0.20213  -0.19708  -0.16473  -0.13368  -0.06548  -0.00000
               -1.00  -0.00000   0.00556  -0.02320  -0.02816  -0.02253  -0.01092  -0.01060  -0.00499  -0.00074   0.00153   0.00255   0.00292   0.00255   0.00153  -0.00074  -0.00499  -0.01060  -0.01092  -0.02253  -0.02816  -0.02320   0.00556  -0.00000
                3.00   0.00000   0.07741   0.09710   0.11418   0.15083   0.17150   0.19325   0.20922   0.22077   0.22668   0.22912   0.22991   0.22912   0.22668   0.22077   0.20922   0.19325   0.17150   0.15083   0.11418   0.09710   0.07741   0.00000
                7.00   0.00000   0.14775   0.20493   0.25890   0.32663   0.35320   0.39380   0.42044   0.43955   0.44940   0.45354   0.45492   0.45354   0.44940   0.43955   0.42044   0.39380   0.35320   0.32663   0.25890   0.20493   0.14775   0.00000
               11.00   0.00000   0.21342   0.30992   0.39711   0.50159   0.53867   0.58861   0.62721   0.65403   0.66795   0.67385   0.67582   0.67385   0.66795   0.65403   0.62721   0.58861   0.53867   0.50159   0.39711   0.30992   0.21342   0.00000
               15.00   0.00000   0.26909   0.41309   0.53353   0.67252   0.72168   0.78033   0.82437   0.85734   0.87452   0.88207   0.88457   0.88207   0.87452   0.85734   0.82437   0.78033   0.72168   0.67252   0.53353   0.41309   0.26909   0.00000
               19.00   0.00000   0.31592   0.50769   0.65459   0.81179   0.87412   0.94209   0.99746   1.03707   1.05775   1.06656   1.06953   1.06656   1.05775   1.03707   0.99746   0.94209   0.87412   0.81179   0.65459   0.50769   0.31592   0.00000
               23.00   0.00000   0.35421   0.58566   0.75422   0.93426   1.00948   1.08892   1.15092   1.20022   1.22431   1.23395   1.23719   1.23395   1.22431   1.20022   1.15092   1.08892   1.00948   0.93426   0.75422   0.58566   0.35421   0.00000
               27.00   0.00000   0.38410   0.64243   0.83409   1.04010   1.12620   1.21229   1.28075   1.33764   1.36364   1.37388   1.37731   1.37388   1.36364   1.33764   1.28075   1.21229   1.12620   1.04010   0.83409   0.64243   0.38410   0.00000
               32.00   0.00000   0.40450   0.69373   0.90646   1.13619   1.23390   1.32580   1.39767   1.45604   1.48943   1.50068   1.50427   1.50068   1.48943   1.45604   1.39767   1.32580   1.23390   1.13619   0.90646   0.69373   0.40450   0.00000
               46.00   0.00000   0.27832   0.68297   0.90905   1.14426   1.24496   1.33514   1.41355   1.47228   1.49585   1.50701   1.51077   1.50701   1.49585   1.47228   1.41355   1.33514   1.24496   1.14426   0.90905   0.68297   0.27832   0.00000
               70.00   0.00000   0.08443   0.25838   0.35597   0.44569   0.48476   0.51851   0.54539   0.56520   0.57554   0.57993   0.58140   0.57993   0.57554   0.56520   0.54539   0.51851   0.48476   0.44569   0.35597   0.25838   0.08443   0.00000
              120.00  -0.00000  -0.10427  -0.31380  -0.43081  -0.53856  -0.58445  -0.62815  -0.65738  -0.68111  -0.69348  -0.69874  -0.70050  -0.69874  -0.69348  -0.68111  -0.65738  -0.62815  -0.58445  -0.53856  -0.43081  -0.31380  -0.10427  -0.00000
              180.00   0.00000   0.00000   0.00000   0.00000   0.00000   0.00000   0.00000   0.00000   0.00000   0.00000   0.00000   0.00000   0.00000   0.00000   0.00000   0.00000   0.00000   0.00000   0.00000   0.00000   0.00000   0.00000   0.00000
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            </tableData>
          </table>
        </function>
      <axis name="DRAG">
        <function name="aero/coefficient/CD_base">
          <description>CD over alpha and beta (hangar)</description>
          <product>
            <property>aero/qbar-psf</property>
            <property>metrics/Sw-sqft</property>
          <table>
            <independentVar lookup="row">aero/alpha-deg</independentVar>
            <independentVar lookup="column">aero/beta-deg</independentVar>
            <tableData>
                        -90.00    -70.00    -50.00    -40.00    -30.00    -25.00    -20.00    -15.00    -10.00     -6.00     -3.00      0.00      3.00      6.00     10.00     15.00     20.00     25.00     30.00     40.00     50.00     70.00     90.00
             -180.00   0.29131   0.22343   0.12618   0.08347   0.05079   0.03879   0.02965   0.02259   0.01568   0.01627   0.01678   0.01696   0.01678   0.01627   0.01568   0.02259   0.02965   0.03879   0.05079   0.08347   0.12618   0.22343   0.29131
             -120.00   0.29131   0.30705   0.50878   0.68481   0.87880   0.97117   1.05396   1.12351   1.17578   1.20343   1.21527   1.21924   1.21527   1.20343   1.17578   1.12351   1.05396   0.97117   0.87880   0.68481   0.50878   0.30705   0.29131
              -70.00   0.29131   0.35030   0.64130   0.87704   1.13182   1.25189   1.35927   1.44873   1.51595   1.55146   1.56667   1.57176   1.56667   1.55146   1.51595   1.44873   1.35927   1.25189   1.13182   0.87704   0.64130   0.35030   0.29131
              -46.00   0.29131   0.36963   0.59127   0.75062   0.93809   1.02909   1.10988   1.17908   1.23141   1.25929   1.27134   1.27538   1.27134   1.25929   1.23141   1.17908   1.10988   1.02909   0.93809   0.75062   0.59127   0.36963   0.29131
              -32.00   0.29131   0.35585   0.43183   0.48889   0.56738   0.60809   0.64498   0.67949   0.70965   0.72351   0.72930   0.73124   0.72930   0.72351   0.70965   0.67949   0.64498   0.60809   0.56738   0.48889   0.43183   0.35585   0.29131
              -22.00   0.29131   0.32100   0.30293   0.29488   0.31183   0.31802   0.32232   0.32964   0.33174   0.33280   0.33331   0.33348   0.33331   0.33280   0.33174   0.32964   0.32232   0.31802   0.31183   0.29488   0.30293   0.32100   0.29131
              -17.00   0.29131   0.30576   0.25441   0.22140   0.21112   0.20573   0.20019   0.19874   0.19402   0.19132   0.19021   0.18987   0.19021   0.19132   0.19402   0.19874   0.20019   0.20573   0.21112   0.22140   0.25441   0.30576   0.29131
              -13.00   0.29131   0.29650   0.22575   0.17872   0.14947   0.14134   0.13014   0.12345   0.11533   0.11106   0.10924   0.10864   0.10924   0.11106   0.11533   0.12345   0.13014   0.14134   0.14947   0.17872   0.22575   0.29650   0.29131
               -9.00   0.29131   0.29036   0.20553   0.14909   0.10945   0.09761   0.08608   0.07253   0.06213   0.05673   0.05444   0.05368   0.05444   0.05673   0.06213   0.07253   0.08608   0.09761   0.10945   0.14909   0.20553   0.29036   0.29131
               -5.00   0.29131   0.28683   0.19289   0.13133   0.08618   0.07276   0.05936   0.04386   0.03235   0.02642   0.02393   0.02311   0.02393   0.02642   0.03235   0.04386   0.05936   0.07276   0.08618   0.13133   0.19289   0.28683   0.29131
               -1.00   0.29131   0.28578   0.18797   0.12444   0.07749   0.06373   0.05005   0.03399   0.02222   0.01620   0.01370   0.01288   0.01370   0.01620   0.02222   0.03399   0.05005   0.06373   0.07749   0.12444   0.18797   0.28578   0.29131
                3.00   0.29131   0.28632   0.19018   0.12793   0.08240   0.06550   0.05746   0.04220   0.03100   0.02527   0.02288   0.02209   0.02288   0.02527   0.03100   0.04220   0.05746   0.06550   0.08240   0.12793   0.19018   0.28632   0.29131
                7.00   0.29131   0.28913   0.19950   0.14223   0.10204   0.09024   0.08133   0.06831   0.05857   0.05355   0.05144   0.05074   0.05144   0.05355   0.05857   0.06831   0.08133   0.09024   0.10204   0.14223   0.19950   0.28913   0.29131
               11.00   0.29131   0.29513   0.21707   0.16760   0.13628   0.12792   0.11958   0.11288   0.10562   0.10186   0.10028   0.09975   0.10028   0.10186   0.10562   0.11288   0.11958   0.12792   0.13628   0.16760   0.21707   0.29513   0.29131
               15.00   0.29131   0.30401   0.24360   0.20606   0.18674   0.18302   0.17916   0.17790   0.17409   0.17209   0.17134   0.17109   0.17134   0.17209   0.17409   0.17790   0.17916   0.18302   0.18674   0.20606   0.24360   0.30401   0.29131
               19.00   0.29131   0.31558   0.27886   0.25655   0.25000   0.25285   0.25602   0.26178   0.26304   0.26348   0.26381   0.26393   0.26381   0.26348   0.26304   0.26178   0.25602   0.25285   0.25000   0.25655   0.27886   0.31558   0.29131
               23.00   0.29131   0.32909   0.32061   0.31724   0.32976   0.34209   0.35512   0.36666   0.37763   0.38186   0.38356   0.38412   0.38356   0.38186   0.37763   0.36666   0.35512   0.34209   0.32976   0.31724   0.32061   0.32909   0.29131
               27.00   0.29131   0.34366   0.36675   0.38861   0.42900   0.45391   0.47861   0.50044   0.51986   0.52823   0.53158   0.53269   0.53158   0.52823   0.51986   0.50044   0.47861   0.45391   0.42900   0.38861   0.36675   0.34366   0.29131
               32.00   0.29131   0.36153   0.43218   0.49082   0.57384   0.61871   0.66046   0.69483   0.72289   0.73919   0.74479   0.74665   0.74479   0.73919   0.72289   0.69483   0.66046   0.61871   0.57384   0.49082   0.43218   0.36153   0.29131
               46.00   0.29131   0.36914   0.60278   0.77502   0.97832   1.07657   1.16320   1.23644   1.29530   1.32497   1.33749   1.34170   1.33749   1.32497   1.29530   1.23644   1.16320   1.07657   0.97832   0.77502   0.60278   0.36914   0.29131
               70.00   0.29131   0.35030   0.64134   0.87708   1.13185   1.25192   1.35929   1.44874   1.51596   1.55146   1.56667   1.57176   1.56667   1.55146   1.51596   1.44874   1.35929   1.25192   1.13185   0.87708   0.64134   0.35030   0.29131
              120.00   0.29131   0.30705   0.50878   0.68481   0.87880   0.97117   1.05396   1.12351   1.17578   1.20343   1.21527   1.21924   1.21527   1.20343   1.17578   1.12351   1.05396   0.97117   0.87880   0.68481   0.50878   0.30705   0.29131
              180.00   0.29131   0.22343   0.12618   0.08347   0.05079   0.03879   0.02965   0.02259   0.01568   0.01627   0.01678   0.01696   0.01678   0.01627   0.01568   0.02259   0.02965   0.03879   0.05079   0.08347   0.12618   0.22343   0.29131
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            </tableData>
          </table>
          </product>
        </function>
        <function name="aero/coefficient/CD_mach">
          <description>zero-lift drag's change with Mach: friction, wave drag</description>
          <product>
            <property>aero/qbar-psf</property>
            <property>metrics/Sw-sqft</property>
            <property>aero/function/mach-dCD0</property>
          </product>
        </function>
        <function name="aero/coefficient/CD_induced_mach">
          <description>induced drag's change with Mach (leading-edge suction lost)</description>
          <product>
            <property>aero/qbar-psf</property>
            <property>metrics/Sw-sqft</property>
            <property>aero/cl-squared</property>
            <property>aero/function/mach-dK</property>
          </product>
        </function>
        <function name="aero/coefficient/CD_aileron">
          <description>CD increment from aileron (deg), over alpha</description>
          <product>
            <property>aero/qbar-psf</property>
            <property>metrics/Sw-sqft</property>
            <property>aero/function/mach-aileron</property>
          <table>
            <independentVar lookup="row">aero/alpha-deg</independentVar>
            <independentVar lookup="column">fcs/left-aileron-pos-deg</independentVar>
            <tableData>
                        -30.00    -25.00    -20.00    -15.00    -10.00     -5.00      0.00      5.00     10.00     15.00     20.00     25.00     30.00
             -180.00   0.01758   0.01320   0.00867   0.00499   0.00225   0.00057   0.00000   0.00057   0.00225   0.00499   0.00867   0.01320   0.01758
             -120.00   0.01375   0.01085   0.00713   0.00409   0.00184   0.00047   0.00000   0.00047   0.00184   0.00409   0.00713   0.01085   0.01375
              -70.00   0.01250   0.00998   0.00657   0.00378   0.00170   0.00043   0.00000   0.00043   0.00170   0.00378   0.00657   0.00998   0.01250
              -46.00   0.00650   0.00473   0.00251   0.00099   0.00023   0.00002   0.00000   0.00002   0.00023   0.00099   0.00251   0.00473   0.00650
              -32.00   0.01419   0.01056   0.00660   0.00346   0.00133   0.00027   0.00000   0.00027   0.00133   0.00346   0.00660   0.01056   0.01419
              -22.00   0.03016   0.02449   0.01797   0.01182   0.00606   0.00165   0.00000   0.00165   0.00606   0.01182   0.01797   0.02449   0.03016
              -17.00   0.03666   0.03082   0.02351   0.01618   0.00869   0.00246   0.00000   0.00246   0.00869   0.01618   0.02351   0.03082   0.03666
              -13.00   0.03523   0.02955   0.02231   0.01517   0.00806   0.00226   0.00000   0.00226   0.00806   0.01517   0.02231   0.02955   0.03523
               -9.00   0.03630   0.03024   0.02233   0.01477   0.00762   0.00210   0.00000   0.00210   0.00762   0.01477   0.02233   0.03024   0.03630
               -5.00   0.03646   0.03058   0.02273   0.01510   0.00778   0.00212   0.00000   0.00212   0.00778   0.01510   0.02273   0.03058   0.03646
               -1.00   0.03598   0.03027   0.02253   0.01499   0.00775   0.00212   0.00000   0.00212   0.00775   0.01499   0.02253   0.03027   0.03598
                3.00   0.03580   0.03012   0.02241   0.01491   0.00771   0.00211   0.00000   0.00211   0.00771   0.01491   0.02241   0.03012   0.03580
                7.00   0.03604   0.03045   0.02287   0.01536   0.00800   0.00220   0.00000   0.00220   0.00800   0.01536   0.02287   0.03045   0.03604
               11.00   0.04418   0.03798   0.02946   0.02037   0.01076   0.00294   0.00000   0.00294   0.01076   0.02037   0.02946   0.03798   0.04418
               15.00   0.05444   0.04775   0.03845   0.02797   0.01573   0.00455   0.00000   0.00455   0.01573   0.02797   0.03845   0.04775   0.05444
               19.00   0.06306   0.05587   0.04585   0.03418   0.01993   0.00606   0.00000   0.00606   0.01993   0.03418   0.04585   0.05587   0.06306
               23.00   0.05992   0.05251   0.04286   0.03193   0.01875   0.00572   0.00000   0.00572   0.01875   0.03193   0.04286   0.05251   0.05992
               27.00   0.04686   0.03955   0.03060   0.02129   0.01158   0.00335   0.00000   0.00335   0.01158   0.02129   0.03060   0.03955   0.04686
               32.00   0.02669   0.02113   0.01477   0.00889   0.00387   0.00083   0.00000   0.00083   0.00387   0.00889   0.01477   0.02113   0.02669
               46.00  -0.00092  -0.00268  -0.00410  -0.00433  -0.00305  -0.00099   0.00000  -0.00099  -0.00305  -0.00433  -0.00410  -0.00268  -0.00092
               70.00   0.01250   0.00997   0.00657   0.00378   0.00170   0.00043   0.00000   0.00043   0.00170   0.00378   0.00657   0.00997   0.01250
              120.00   0.01375   0.01085   0.00713   0.00409   0.00184   0.00047   0.00000   0.00047   0.00184   0.00409   0.00713   0.01085   0.01375
              180.00   0.01758   0.01320   0.00867   0.00499   0.00225   0.00057   0.00000   0.00057   0.00225   0.00499   0.00867   0.01320   0.01758
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            </tableData>
          </table>
          </product>
        </function>
        <function name="aero/coefficient/CD_elevator">
          <description>CD increment from elevator (deg), over alpha</description>
          <product>
            <property>aero/qbar-psf</property>
            <property>metrics/Sw-sqft</property>
            <property>aero/function/mach-elevator</property>
          <table>
            <independentVar lookup="row">aero/alpha-deg</independentVar>
            <independentVar lookup="column">fcs/elevator-pos-deg</independentVar>
            <tableData>
                        -25.00    -20.00    -15.00    -10.00     -5.00      0.00      5.00     10.00     15.00     20.00     25.00
             -180.00   0.03379   0.02198   0.01241   0.00251   0.00036   0.00000   0.00036   0.00251   0.01241   0.02198   0.03379
             -120.00  -0.08064  -0.06452  -0.04789  -0.03126  -0.01513   0.00000   0.01368   0.02548   0.03506   0.04211   0.04644
              -70.00   0.02095   0.02241   0.02095   0.01663   0.00958   0.00000  -0.01180  -0.02548  -0.04061   0.01183   0.10910
              -46.00   0.11042   0.09102   0.06994   0.04744   0.02398   0.00000  -0.02421  -0.04712  -0.06673  -0.08604  -0.10472
              -32.00   0.13571   0.10642   0.07719   0.04856   0.02231   0.00000  -0.02064  -0.04034  -0.05719  -0.06969  -0.07977
              -22.00   0.12566   0.09445   0.06563   0.04151   0.01977   0.00000  -0.01560  -0.02803  -0.03676  -0.04302  -0.04580
              -17.00   0.11322   0.08253   0.05647   0.03460   0.01494   0.00000  -0.01100  -0.01884  -0.02368  -0.02520  -0.02198
              -13.00   0.10427   0.07388   0.04889   0.02770   0.01132   0.00000  -0.00779  -0.01251  -0.01407  -0.01178  -0.00382
               -9.00   0.09336   0.06356   0.03926   0.02048   0.00791   0.00000  -0.00460  -0.00609  -0.00428   0.00201   0.01470
               -5.00   0.08038   0.05170   0.02937   0.01400   0.00491   0.00000  -0.00171  -0.00032   0.00460   0.01461   0.03146
               -1.00   0.06461   0.03861   0.01966   0.00800   0.00211   0.00000   0.00101   0.00513   0.01300   0.02636   0.04664
                3.00   0.04769   0.02520   0.01013   0.00218  -0.00063   0.00000   0.00368   0.01048   0.02132   0.03795   0.06133
                7.00   0.03019   0.01196   0.00094  -0.00345  -0.00333   0.00000   0.00629   0.01570   0.02935   0.04873   0.07413
               11.00   0.01212  -0.00143  -0.00830  -0.00916  -0.00609   0.00000   0.00892   0.02093   0.03723   0.05877   0.08483
               15.00  -0.00614  -0.01503  -0.01754  -0.01491  -0.00891   0.00000   0.01135   0.02590   0.04476   0.06761   0.09299
               19.00  -0.02450  -0.02878  -0.02692  -0.02074  -0.01043   0.00000   0.01399   0.03143   0.05284   0.07620   0.10158
               23.00  -0.04388  -0.04282  -0.03605  -0.02464  -0.01411   0.00000   0.01701   0.03770   0.06089   0.08505   0.11221
               27.00  -0.05992  -0.05306  -0.04143  -0.02835  -0.01695   0.00000   0.01990   0.04268   0.06579   0.09137   0.11955
               32.00  -0.07558  -0.06286  -0.04807  -0.03873  -0.02012   0.00000   0.02270   0.04497   0.06940   0.09612   0.12363
               46.00  -0.10869  -0.08800  -0.06602  -0.04505  -0.02321   0.00000   0.02308   0.04627   0.06900   0.09042   0.11017
               70.00   0.10852   0.01164  -0.04061  -0.02548  -0.01180   0.00000   0.00958   0.01663   0.02095   0.02241   0.02095
              120.00   0.04644   0.04211   0.03506   0.02548   0.01368   0.00000  -0.01513  -0.03126  -0.04789  -0.06452  -0.08064
              180.00   0.03379   0.02198   0.01241   0.00251   0.00036   0.00000   0.00036   0.00251   0.01241   0.02198   0.03379
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            </tableData>
          </table>
          </product>
        </function>
        <function name="aero/coefficient/CD_flap">
          <description>CD increment from flap (deg), over alpha</description>
          <product>
            <property>aero/qbar-psf</property>
            <property>metrics/Sw-sqft</property>
            <property>aero/function/mach-flap</property>
          <table>
            <independentVar lookup="row">aero/alpha-deg</independentVar>
            <independentVar lookup="column">fcs/flap-pos-deg</independentVar>
            <tableData>
                        -30.00    -25.00    -20.00    -15.00    -10.00     -5.00      0.00      5.00     10.00     15.00     20.00     25.00     30.00
             -180.00   0.01266   0.00904   0.00592   0.00339   0.00153   0.00038   0.00000   0.00038   0.00153   0.00339   0.00592   0.00904   0.01266
             -120.00   0.01265   0.00904   0.00592   0.00339   0.00153   0.00038   0.00000   0.00038   0.00153   0.00339   0.00592   0.00904   0.01265
              -70.00   0.01264   0.00903   0.00592   0.00339   0.00153   0.00038   0.00000   0.00038   0.00153   0.00339   0.00592   0.00903   0.01264
              -46.00   0.05809   0.05217   0.04590   0.03823   0.02795   0.01474   0.00000  -0.01458  -0.02703  -0.03549  -0.04004  -0.04208  -0.04290
              -32.00   0.06501   0.05769   0.05013   0.04095   0.02928   0.01516   0.00000  -0.01437  -0.02605  -0.03354  -0.03714  -0.03821  -0.03796
              -22.00   0.06590   0.05694   0.04785   0.03740   0.02492   0.01153   0.00000  -0.00858  -0.01433  -0.01736  -0.01817  -0.01749  -0.01601
              -17.00   0.07182   0.06217   0.05232   0.04119   0.02752   0.01259   0.00000  -0.00842  -0.01298  -0.01455  -0.01405  -0.01228  -0.00982
              -13.00   0.06319   0.05531   0.04706   0.03724   0.02513   0.01179   0.00000  -0.00850  -0.01330  -0.01475  -0.01382  -0.01138  -0.00800
               -9.00   0.04992   0.04312   0.03620   0.02832   0.01891   0.00877   0.00000  -0.00601  -0.00878  -0.00851  -0.00611  -0.00237   0.00230
               -5.00   0.03599   0.03020   0.02450   0.01842   0.01169   0.00504   0.00000  -0.00247  -0.00219   0.00027   0.00397   0.00847   0.01369
               -1.00   0.02355   0.01855   0.01384   0.00926   0.00487   0.00142   0.00000   0.00106   0.00426   0.00861   0.01334   0.01836   0.02389
                3.00   0.01175   0.00736   0.00351   0.00031  -0.00185  -0.00217   0.00000   0.00461   0.01078   0.01710   0.02289   0.02844   0.03425
                7.00   0.00090  -0.00282  -0.00584  -0.00784  -0.00809  -0.00561   0.00000   0.00817   0.01746   0.02595   0.03302   0.03928   0.04555
               11.00   0.00021  -0.00379  -0.00739  -0.01028  -0.01127  -0.00813   0.00000   0.01165   0.02433   0.03536   0.04405   0.05135   0.05838
               15.00   0.00524   0.00110  -0.00289  -0.00671  -0.00963  -0.00842   0.00000   0.01408   0.02974   0.04343   0.05397   0.06257   0.07063
               19.00   0.01098   0.00688   0.00291  -0.00113  -0.00524  -0.00675   0.00000   0.01644   0.03541   0.05092   0.06325   0.07314   0.08227
               23.00   0.01609   0.01255   0.00929   0.00623   0.00276  -0.00078   0.00000   0.01021   0.02849   0.05229   0.06227   0.06860   0.07734
               27.00   0.01385   0.01070   0.00792   0.00566   0.00357   0.00111   0.00000   0.00569   0.01869   0.03375   0.04732   0.06343   0.08285
               32.00   0.00219   0.00029  -0.00103  -0.00131  -0.00058   0.00009   0.00000   0.00241   0.01059   0.02145   0.03164   0.04082   0.04997
               46.00  -0.01511  -0.01613  -0.01626  -0.01466  -0.01074  -0.00522   0.00000   0.00389   0.00685   0.00979   0.01288   0.01613   0.01979
               70.00   0.01264   0.00903   0.00592   0.00339   0.00153   0.00038   0.00000   0.00038   0.00153   0.00339   0.00592   0.00903   0.01264
              120.00   0.01265   0.00904   0.00592   0.00339   0.00153   0.00038   0.00000   0.00038   0.00153   0.00339   0.00592   0.00904   0.01265
              180.00   0.01266   0.00904   0.00592   0.00339   0.00153   0.00038   0.00000   0.00038   0.00153   0.00339   0.00592   0.00904   0.01266
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            </tableData>
          </table>
          </product>
        </function>
        <function name="aero/coefficient/CD_rudder">
          <description>CD increment from rudder (deg), over alpha</description>
          <product>
            <property>aero/qbar-psf</property>
            <property>metrics/Sw-sqft</property>
            <property>aero/function/mach-rudder</property>
          <table>
            <independentVar lookup="row">aero/alpha-deg</independentVar>
            <independentVar lookup="column">fcs/rudder-pos-deg</independentVar>
            <tableData>
                        -30.00    -25.00    -20.00    -15.00    -10.00     -5.00      0.00      5.00     10.00     15.00     20.00     25.00     30.00
             -180.00   0.00580   0.00415   0.00272   0.00156   0.00070   0.00018   0.00000   0.00018   0.00070   0.00156   0.00272   0.00415   0.00580
              -35.00   0.00728   0.00566   0.00415   0.00272   0.00138   0.00038   0.00000   0.00038   0.00138   0.00272   0.00415   0.00566   0.00728
              -11.00   0.01146   0.00895   0.00661   0.00435   0.00223   0.00061   0.00000   0.00061   0.00223   0.00435   0.00661   0.00895   0.01146
                4.00   0.01210   0.00946   0.00700   0.00462   0.00237   0.00064   0.00000   0.00064   0.00237   0.00462   0.00700   0.00946   0.01210
               19.00   0.01068   0.00833   0.00615   0.00406   0.00208   0.00057   0.00000   0.00057   0.00208   0.00406   0.00615   0.00833   0.01068
               42.00   0.01378   0.01231   0.01072   0.00882   0.00641   0.00278   0.00000   0.00278   0.00641   0.00882   0.01072   0.01231   0.01378
              180.00   0.00580   0.00415   0.00272   0.00156   0.00070   0.00018   0.00000   0.00018   0.00070   0.00156   0.00272   0.00415   0.00580
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            </tableData>
          </table>
          </product>
        </function>
        <function name="aero/coefficient/CD_ground">
          <description>Induced drag change in ground effect</description>
          <product>
            <property>aero/qbar-psf</property>
            <property>metrics/Sw-sqft</property>
            <property>aero/cl-squared</property>
            <value>0.15847</value>
          <table>
            <independentVar lookup="row">aero/h_b-mac-ft</independentVar>
            <tableData>
                    0.00   -1.00000
                    0.10   -0.28090
                    0.20   -0.08897
                    0.40   -0.02383
                    0.60   -0.01073
                    0.80   -0.00607
                    1.00   -0.00389
                    1.10   -0.00322
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            </tableData>
          </table>
          </product>
        </function>
      </axis>
      <axis name="SIDE">
        <function name="aero/coefficient/CY_base">
          <description>CY over alpha and beta (hangar)</description>
          <product>
            <property>aero/qbar-psf</property>
            <property>metrics/Sw-sqft</property>
            <property>aero/function/mach-side</property>
          <table>
            <independentVar lookup="row">aero/alpha-deg</independentVar>
            <independentVar lookup="column">aero/beta-deg</independentVar>
            <tableData>
                        -90.00    -70.00    -50.00    -40.00    -30.00    -25.00    -20.00    -15.00    -10.00     -6.00     -3.00      0.00      3.00      6.00     10.00     15.00     20.00     25.00     30.00     40.00     50.00     70.00     90.00
             -180.00  -0.00000   0.08276   0.10149   0.08899   0.06695   0.05432   0.04155   0.03224   0.07172   0.06953   0.03611  -0.00000  -0.03611  -0.06953  -0.07172  -0.03224  -0.04155  -0.05432  -0.06695  -0.08899  -0.10149  -0.08276   0.00000
              -35.00   0.00000  -0.12592  -0.14511  -0.17371  -0.17594  -0.15851  -0.14490  -0.12239  -0.08957  -0.04419  -0.02221  -0.00000   0.02221   0.04419   0.08957   0.12239   0.14490   0.15851   0.17594   0.17371   0.14511   0.12592  -0.00000
              -11.00   0.00000   0.08688   0.13463   0.12491   0.11284   0.11775   0.10209   0.09245   0.06297   0.03813   0.01913  -0.00000  -0.01913  -0.03813  -0.06297  -0.09245  -0.10209  -0.11775  -0.11284  -0.12491  -0.13463  -0.08688  -0.00000
                4.00   0.00000   0.10632   0.15947   0.14814   0.12986   0.12047   0.13335   0.10298   0.06950   0.04177   0.02085  -0.00000  -0.02085  -0.04177  -0.06950  -0.10298  -0.13335  -0.12047  -0.12986  -0.14814  -0.15947  -0.10632  -0.00000
               19.00   0.00000   0.02536   0.06937   0.05477   0.03899   0.04988   0.04070   0.04321   0.03225   0.01885   0.00953  -0.00000  -0.00953  -0.01885  -0.03225  -0.04321  -0.04070  -0.04988  -0.03899  -0.05477  -0.06937  -0.02536  -0.00000
               42.00   0.00000  -0.17503  -0.24821  -0.28349  -0.28986  -0.25530  -0.23351  -0.20218  -0.15616  -0.10022  -0.05895  -0.00000   0.05895   0.10022   0.15616   0.20218   0.23351   0.25530   0.28986   0.28349   0.24821   0.17503  -0.00000
              180.00  -0.00000   0.08276   0.10149   0.08899   0.06695   0.05432   0.04155   0.03224   0.07172   0.06953   0.03611  -0.00000  -0.03611  -0.06953  -0.07172  -0.03224  -0.04155  -0.05432  -0.06695  -0.08899  -0.10149  -0.08276   0.00000
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            </tableData>
          </table>
          </product>
        </function>
        <function name="aero/coefficient/CY_aileron">
          <description>CY increment from aileron (deg), over alpha</description>
          <product>
            <property>aero/qbar-psf</property>
            <property>metrics/Sw-sqft</property>
            <property>aero/function/mach-aileron</property>
          <table>
            <independentVar lookup="row">aero/alpha-deg</independentVar>
            <independentVar lookup="column">fcs/left-aileron-pos-deg</independentVar>
            <tableData>
                        -30.00    -25.00    -20.00    -15.00    -10.00     -5.00      0.00      5.00     10.00     15.00     20.00     25.00     30.00
             -180.00   0.00092   0.00101   0.00092   0.00073   0.00049   0.00025   0.00000  -0.00025  -0.00049  -0.00073  -0.00092  -0.00101  -0.00092
              -35.00   0.01832   0.01678   0.01473   0.01221   0.00888   0.00468   0.00000  -0.00468  -0.00888  -0.01221  -0.01473  -0.01678  -0.01832
              -11.00   0.03513   0.03224   0.02835   0.02353   0.01713   0.00902   0.00000  -0.00902  -0.01713  -0.02353  -0.02835  -0.03224  -0.03513
                4.00   0.04252   0.03891   0.03413   0.02825   0.02051   0.01078   0.00000  -0.01078  -0.02051  -0.02825  -0.03413  -0.03891  -0.04252
               19.00   0.04478   0.04086   0.03580   0.02961   0.02151   0.01135   0.00000  -0.01135  -0.02151  -0.02961  -0.03580  -0.04086  -0.04478
               42.00  -0.00330  -0.00408  -0.00542  -0.00729  -0.00987   0.00012   0.00000  -0.00012   0.00987   0.00729   0.00542   0.00408   0.00330
              180.00   0.00092   0.00101   0.00092   0.00073   0.00049   0.00025   0.00000  -0.00025  -0.00049  -0.00073  -0.00092  -0.00101  -0.00092
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            </tableData>
          </table>
          </product>
        </function>
        <function name="aero/coefficient/CY_rudder">
          <description>CY increment from rudder (deg), over alpha</description>
          <product>
            <property>aero/qbar-psf</property>
            <property>metrics/Sw-sqft</property>
            <property>aero/function/mach-rudder</property>
          <table>
            <independentVar lookup="row">aero/alpha-deg</independentVar>
            <independentVar lookup="column">fcs/rudder-pos-deg</independentVar>
            <tableData>
                        -30.00    -25.00    -20.00    -15.00    -10.00     -5.00      0.00      5.00     10.00     15.00     20.00     25.00     30.00
             -180.00   0.00000  -0.00000  -0.00000   0.00000   0.00000   0.00000   0.00000   0.00000   0.00000   0.00000  -0.00000  -0.00000   0.00000
              -35.00  -0.02942  -0.02670  -0.02371  -0.01989  -0.01461  -0.00774   0.00000   0.00774   0.01461   0.01989   0.02371   0.02670   0.02942
              -11.00  -0.04207  -0.03879  -0.03492  -0.02962  -0.02192  -0.01165   0.00000   0.01165   0.02192   0.02962   0.03492   0.03879   0.04207
                4.00  -0.04637  -0.04273  -0.03845  -0.03259  -0.02410  -0.01281   0.00000   0.01281   0.02410   0.03259   0.03845   0.04273   0.04637
               19.00  -0.04341  -0.03981  -0.03563  -0.03007  -0.02234  -0.01195   0.00000   0.01195   0.02234   0.03007   0.03563   0.03981   0.04341
               42.00  -0.06030  -0.05512  -0.05007  -0.04385  -0.03596  -0.02240   0.00000   0.02240   0.03596   0.04385   0.05007   0.05512   0.06030
              180.00  -0.00000  -0.00000  -0.00000  -0.00000  -0.00000  -0.00000   0.00000  -0.00000  -0.00000  -0.00000  -0.00000  -0.00000  -0.00000
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            </tableData>
          </table>
          </product>
        </function>
        <function name="aero/coefficient/CYp">
          <description>CY per p (non-dimensional), over alpha</description>
          <product>
            <property>aero/qbar-psf</property>
            <property>metrics/Sw-sqft</property>
            <property>aero/bi2vel</property>
            <property>velocities/p-aero-rad_sec</property>
            <property>aero/function/mach-lift</property>
          <table>
            <independentVar lookup="row">aero/alpha-deg</independentVar>
            <tableData>
                 -180.00   -0.22629
                 -165.00   -0.06162
                  -32.00   -0.01605
                  -10.00   -0.00604
                    5.00    0.00587
                   20.00    0.00708
                   46.00   -0.00210
                  180.00   -0.22629
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            </tableData>
          </table>
          </product>
        </function>
        <function name="aero/coefficient/CYr">
          <description>CY per r (non-dimensional), over alpha</description>
          <product>
            <property>aero/qbar-psf</property>
            <property>metrics/Sw-sqft</property>
            <property>aero/bi2vel</property>
            <property>velocities/r-aero-rad_sec</property>
            <property>aero/function/mach-lift</property>
          <table>
            <independentVar lookup="row">aero/alpha-deg</independentVar>
            <tableData>
                 -180.00    0.46701
                 -165.00    0.17691
                  -32.00   -0.00112
                  -10.00    0.09766
                    5.00    0.12408
                   20.00    0.07074
                   46.00   -0.14571
                  180.00    0.46701
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            </tableData>
          </table>
          </product>
        </function>
      </axis>
      <axis name="LIFT">
        <function name="aero/coefficient/CL_base">
          <description>CL over alpha and beta, ground effect, compressibility (hangar)</description>
          <product>
            <property>aero/qbar-psf</property>
            <property>metrics/Sw-sqft</property>
            <property>aero/function/CL-base</property>
            <property>aero/function/mach-lift</property>
          <table>
            <independentVar lookup="row">aero/h_b-mac-ft</independentVar>
            <tableData>
                    0.00    1.20000
                    0.10    1.08692
                    0.20    1.03778
                    0.40    1.00713
                    0.60    1.00135
                    0.80    1.00025
                    1.00    1.00005
                    1.10    1.00000
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            </tableData>
          </table>
          </product>
        </function>
        <function name="aero/coefficient/CL_elevator">
          <description>CL increment from elevator (deg), over alpha</description>
          <product>
            <property>aero/qbar-psf</property>
            <property>metrics/Sw-sqft</property>
            <property>aero/function/mach-elevator</property>
          <table>
            <independentVar lookup="row">aero/alpha-deg</independentVar>
            <independentVar lookup="column">fcs/elevator-pos-deg</independentVar>
            <tableData>
                        -25.00    -20.00    -15.00    -10.00     -5.00      0.00      5.00     10.00     15.00     20.00     25.00
             -180.00  -0.07370  -0.06184  -0.04810  -0.06756  -0.06656   0.00000   0.06656   0.06756   0.04810   0.06184   0.07370
              -35.00  -0.04609  -0.04494  -0.03933  -0.02923  -0.01537   0.00000   0.01717   0.04096   0.07155   0.10341   0.12619
              -11.00  -0.18028  -0.15124  -0.11895  -0.08149  -0.04120   0.00000   0.04241   0.08584   0.13039   0.17711   0.22512
                4.00  -0.22055  -0.17586  -0.13007  -0.08518  -0.04217   0.00000   0.04166   0.08287   0.12463   0.16665   0.20685
               19.00  -0.21200  -0.16755  -0.12295  -0.08002  -0.03369   0.00000   0.03568   0.06975   0.10055   0.12459   0.14316
               42.00  -0.07578  -0.07494  -0.04906  -0.02811  -0.01287   0.00000   0.01108   0.01804   0.02120   0.02075   0.01681
              180.00  -0.07370  -0.06184  -0.04810  -0.06756  -0.06656   0.00000   0.06656   0.06756   0.04810   0.06184   0.07370
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            </tableData>
          </table>
          </product>
        </function>
        <function name="aero/coefficient/CL_flap">
          <description>CL increment from flap (deg), over alpha</description>
          <product>
            <property>aero/qbar-psf</property>
            <property>metrics/Sw-sqft</property>
            <property>aero/function/mach-flap</property>
          <table>
            <independentVar lookup="row">aero/alpha-deg</independentVar>
            <independentVar lookup="column">fcs/flap-pos-deg</independentVar>
            <tableData>
                        -30.00    -25.00    -20.00    -15.00    -10.00     -5.00      0.00      5.00     10.00     15.00     20.00     25.00     30.00
             -180.00  -0.00000  -0.00000  -0.00000  -0.00000  -0.00000   0.00000   0.00000   0.00000  -0.00000  -0.00000  -0.00000  -0.00000  -0.00000
              -35.00  -0.13302  -0.12498  -0.11427  -0.09813  -0.07304  -0.03866   0.00000   0.03785   0.07037   0.09399   0.10951   0.12031   0.12921
              -11.00  -0.14264  -0.13421  -0.12343  -0.10683  -0.08040  -0.04332   0.00000   0.04381   0.08213   0.10976   0.12735   0.13900   0.14837
                4.00  -0.13266  -0.12593  -0.11669  -0.10148  -0.07641  -0.04093   0.00000   0.04073   0.07560   0.09976   0.11395   0.12217   0.12790
               19.00  -0.14447  -0.13634  -0.12577  -0.10914  -0.08204  -0.04353   0.00000   0.04305   0.07485   0.09322   0.10512   0.11218   0.11710
               42.00  -0.11704  -0.10992  -0.10108  -0.08790  -0.06699  -0.03679   0.00000   0.03876   0.07321   0.09765   0.11279   0.12285   0.13139
              180.00   0.00000   0.00000   0.00000   0.00000   0.00000   0.00000   0.00000   0.00000   0.00000   0.00000   0.00000   0.00000   0.00000
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            </tableData>
          </table>
          <table>
            <independentVar lookup="row">aero/h_b-mac-ft</independentVar>
            <tableData>
                    0.00    1.20000
                    0.10    1.08692
                    0.20    1.03778
                    0.40    1.00713
                    0.60    1.00135
                    0.80    1.00025
                    1.00    1.00005
                    1.10    1.00000
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            </tableData>
          </table>
          </product>
        </function>
        <function name="aero/coefficient/CLq">
          <description>CL per q (non-dimensional), over alpha</description>
          <product>
            <property>aero/qbar-psf</property>
            <property>metrics/Sw-sqft</property>
            <property>aero/ci2vel</property>
            <property>velocities/q-aero-rad_sec</property>
            <property>aero/function/mach-lift</property>
          <table>
            <independentVar lookup="row">aero/alpha-deg</independentVar>
            <tableData>
                 -180.00   -1.50028
                 -165.00   -0.18195
                  -32.00    1.95872
                  -10.00    3.10953
                    5.00    3.17581
                   20.00    2.72921
                   46.00    1.37569
                  180.00   -1.50028
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            </tableData>
          </table>
          </product>
        </function>
        <function name="aero/coefficient/CLadot">
          <description>CL per alpha-dot (downwash lag at the tail)</description>
          <product>
            <property>aero/qbar-psf</property>
            <property>metrics/Sw-sqft</property>
            <property>aero/ci2vel</property>
            <property>aero/alphadot-rad_sec</property>
            <value>0.27231</value>
            <property>aero/function/mach-lift</property>
          </product>
        </function>
      </axis>
      <axis name="ROLL">
        <function name="aero/coefficient/Cl_base">
          <description>Cl over alpha and beta (hangar)</description>
          <product>
            <property>aero/qbar-psf</property>
            <property>metrics/Sw-sqft</property>
            <property>metrics/bw-ft</property>
            <property>aero/function/mach-side</property>
          <table>
            <independentVar lookup="row">aero/alpha-deg</independentVar>
            <independentVar lookup="column">aero/beta-deg</independentVar>
            <tableData>
                        -90.00    -70.00    -50.00    -40.00    -30.00    -25.00    -20.00    -15.00    -10.00     -6.00     -3.00      0.00      3.00      6.00     10.00     15.00     20.00     25.00     30.00     40.00     50.00     70.00     90.00
             -180.00   0.03092   0.02258   0.01113   0.00555   0.00259   0.00167   0.00103   0.00109   0.01004   0.01113   0.00590  -0.00000  -0.00590  -0.01113  -0.01004  -0.00109  -0.00103  -0.00167  -0.00259  -0.00555  -0.01113  -0.02258  -0.03092
              -35.00   0.03092   0.02721   0.02054   0.01206  -0.00283  -0.00716  -0.00911  -0.00810  -0.00600  -0.00235  -0.00111  -0.00000   0.00111   0.00235   0.00600   0.00810   0.00911   0.00716   0.00283  -0.01206  -0.02054  -0.02721  -0.03092
              -11.00   0.03092   0.01768   0.01212  -0.00093  -0.01700  -0.01931  -0.01648  -0.01169  -0.00802  -0.00489  -0.00246  -0.00000   0.00246   0.00489   0.00802   0.01169   0.01648   0.01931   0.01700   0.00093  -0.01212  -0.01768  -0.03092
                4.00   0.03092   0.01503   0.01219   0.01295   0.01850   0.01897   0.01798   0.01405   0.00958   0.00582   0.00292  -0.00000  -0.00292  -0.00582  -0.00958  -0.01405  -0.01798  -0.01897  -0.01850  -0.01295  -0.01219  -0.01503  -0.03092
               19.00   0.03092   0.01262   0.01153   0.02028   0.04709   0.05323   0.04636   0.03577   0.02592   0.01599   0.00807  -0.00000  -0.00807  -0.01599  -0.02592  -0.03577  -0.04636  -0.05323  -0.04709  -0.02028  -0.01153  -0.01262  -0.03092
               42.00   0.03092   0.02204   0.01297   0.01022   0.00672   0.00683   0.00445   0.00061  -0.00220  -0.00155  -0.00180  -0.00000   0.00180   0.00155   0.00220  -0.00061  -0.00445  -0.00683  -0.00672  -0.01022  -0.01297  -0.02204  -0.03092
              180.00   0.03092   0.02258   0.01113   0.00555   0.00259   0.00167   0.00103   0.00109   0.01004   0.01113   0.00590  -0.00000  -0.00590  -0.01113  -0.01004  -0.00109  -0.00103  -0.00167  -0.00259  -0.00555  -0.01113  -0.02258  -0.03092
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            </tableData>
          </table>
          </product>
        </function>
        <function name="aero/coefficient/Cl_aileron">
          <description>Cl increment from aileron (deg), over alpha</description>
          <product>
            <property>aero/qbar-psf</property>
            <property>metrics/Sw-sqft</property>
            <property>metrics/bw-ft</property>
            <property>aero/function/mach-aileron</property>
          <table>
            <independentVar lookup="row">aero/alpha-deg</independentVar>
            <independentVar lookup="column">fcs/left-aileron-pos-deg</independentVar>
            <tableData>
                        -30.00    -25.00    -20.00    -15.00    -10.00     -5.00      0.00      5.00     10.00     15.00     20.00     25.00     30.00
             -180.00   0.01700   0.01869   0.01711   0.01350   0.00916   0.00460   0.00000  -0.00460  -0.00916  -0.01350  -0.01711  -0.01869  -0.01700
              -35.00  -0.03927  -0.03676  -0.03269  -0.02740  -0.02009  -0.01062   0.00000   0.01062   0.02009   0.02740   0.03269   0.03676   0.03927
              -11.00  -0.05648  -0.05283  -0.04648  -0.03858  -0.02809  -0.01481   0.00000   0.01481   0.02809   0.03858   0.04648   0.05283   0.05648
                4.00  -0.05502  -0.05176  -0.04560  -0.03791  -0.02762  -0.01456   0.00000   0.01456   0.02762   0.03791   0.04560   0.05176   0.05502
               19.00  -0.05355  -0.05029  -0.04439  -0.03692  -0.02690  -0.01428   0.00000   0.01428   0.02690   0.03692   0.04439   0.05029   0.05355
               42.00  -0.03273  -0.03062  -0.02750  -0.02345  -0.01777  -0.00859   0.00000   0.00859   0.01777   0.02345   0.02750   0.03062   0.03273
              180.00   0.01700   0.01869   0.01711   0.01350   0.00916   0.00460   0.00000  -0.00460  -0.00916  -0.01350  -0.01711  -0.01869  -0.01700
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            </tableData>
          </table>
          </product>
        </function>
        <function name="aero/coefficient/Cl_rudder">
          <description>Cl increment from rudder (deg), over alpha</description>
          <product>
            <property>aero/qbar-psf</property>
            <property>metrics/Sw-sqft</property>
            <property>metrics/bw-ft</property>
            <property>aero/function/mach-rudder</property>
          <table>
            <independentVar lookup="row">aero/alpha-deg</independentVar>
            <independentVar lookup="column">fcs/rudder-pos-deg</independentVar>
            <tableData>
                        -30.00    -25.00    -20.00    -15.00    -10.00     -5.00      0.00      5.00     10.00     15.00     20.00     25.00     30.00
             -180.00  -0.00000  -0.00000  -0.00000  -0.00000  -0.00000  -0.00000   0.00000  -0.00000  -0.00000  -0.00000  -0.00000  -0.00000  -0.00000
              -35.00  -0.00356  -0.00311  -0.00263  -0.00211  -0.00149  -0.00077   0.00000   0.00077   0.00149   0.00211   0.00263   0.00311   0.00356
              -11.00  -0.00343  -0.00303  -0.00260  -0.00210  -0.00150  -0.00078   0.00000   0.00078   0.00150   0.00210   0.00260   0.00303   0.00343
                4.00  -0.00410  -0.00367  -0.00319  -0.00263  -0.00189  -0.00099   0.00000   0.00099   0.00189   0.00263   0.00319   0.00367   0.00410
               19.00  -0.00434  -0.00389  -0.00340  -0.00282  -0.00209  -0.00112   0.00000   0.00112   0.00209   0.00282   0.00340   0.00389   0.00434
               42.00  -0.00608  -0.00531  -0.00458  -0.00378  -0.00295  -0.00169   0.00000   0.00169   0.00295   0.00378   0.00458   0.00531   0.00608
              180.00  -0.00000  -0.00000  -0.00000  -0.00000  -0.00000  -0.00000   0.00000  -0.00000  -0.00000  -0.00000  -0.00000  -0.00000  -0.00000
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            </tableData>
          </table>
          </product>
        </function>
        <function name="aero/coefficient/Clp">
          <description>Cl per p (non-dimensional), over alpha</description>
          <product>
            <property>aero/qbar-psf</property>
            <property>metrics/Sw-sqft</property>
            <property>metrics/bw-ft</property>
            <property>aero/bi2vel</property>
            <property>velocities/p-aero-rad_sec</property>
            <property>aero/function/mach-lift</property>
          <table>
            <independentVar lookup="row">aero/alpha-deg</independentVar>
            <tableData>
                 -180.00   -0.66632
                 -165.00   -0.15454
                  -32.00   -0.20698
                  -10.00   -0.22266
                    5.00   -0.22586
                   20.00   -0.18940
                   46.00   -0.15010
                  180.00   -0.66632
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            </tableData>
          </table>
          </product>
        </function>
        <function name="aero/coefficient/Clr">
          <description>Cl per r (non-dimensional), over alpha</description>
          <product>
            <property>aero/qbar-psf</property>
            <property>metrics/Sw-sqft</property>
            <property>metrics/bw-ft</property>
            <property>aero/bi2vel</property>
            <property>velocities/r-aero-rad_sec</property>
            <property>aero/function/mach-lift</property>
          <table>
            <independentVar lookup="row">aero/alpha-deg</independentVar>
            <tableData>
                 -180.00    0.07163
                 -165.00    0.06247
                  -32.00   -0.18469
                  -10.00   -0.04486
                    5.00    0.06388
                   20.00    0.16804
                   46.00    0.34104
                  180.00    0.07163
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            </tableData>
          </table>
          </product>
        </function>
      </axis>
      <axis name="PITCH">
        <function name="aero/coefficient/Cm_base">
          <description>Cm over alpha and beta (hangar)</description>
          <product>
            <property>aero/qbar-psf</property>
            <property>metrics/Sw-sqft</property>
            <property>metrics/cbarw-ft</property>
          <table>
            <independentVar lookup="row">aero/alpha-deg</independentVar>
            <independentVar lookup="column">aero/beta-deg</independentVar>
            <tableData>
                        -90.00    -70.00    -50.00    -40.00    -30.00    -25.00    -20.00    -15.00    -10.00     -6.00     -3.00      0.00      3.00      6.00     10.00     15.00     20.00     25.00     30.00     40.00     50.00     70.00     90.00
             -180.00  -0.00000  -0.00003  -0.00007  -0.00009  -0.00008  -0.00008  -0.00008   0.00021   0.00259   0.00144   0.00023  -0.00020   0.00023   0.00144   0.00259   0.00021  -0.00008  -0.00008  -0.00008  -0.00009  -0.00007  -0.00003  -0.00000
              -35.00  -0.00000   0.01498  -0.04843  -0.08910  -0.11868  -0.12913  -0.13834  -0.14539  -0.15077  -0.15445  -0.15537  -0.15566  -0.15537  -0.15445  -0.15077  -0.14539  -0.13834  -0.12913  -0.11868  -0.08910  -0.04843   0.01498  -0.00000
              -11.00  -0.00000   0.00233  -0.01202  -0.03247  -0.04837  -0.05167  -0.05417  -0.05938  -0.06011  -0.06037  -0.06044  -0.06046  -0.06044  -0.06037  -0.06011  -0.05938  -0.05417  -0.05167  -0.04837  -0.03247  -0.01202   0.00233  -0.00000
                4.00   0.00000  -0.00480   0.01871   0.02139   0.01720   0.01633   0.01610   0.01729   0.01803   0.01827   0.01830   0.01829   0.01830   0.01827   0.01803   0.01729   0.01610   0.01633   0.01720   0.02139   0.01871  -0.00480   0.00000
               19.00   0.00000  -0.01166   0.03054   0.04658   0.06088   0.07300   0.08276   0.09221   0.09574   0.09708   0.09784   0.09807   0.09784   0.09708   0.09574   0.09221   0.08276   0.07300   0.06088   0.04658   0.03054  -0.01166   0.00000
               42.00   0.00000  -0.03073   0.04708   0.07687   0.10085   0.11068   0.11895   0.12290   0.12382   0.12747   0.12831   0.13028   0.12831   0.12747   0.12382   0.12290   0.11895   0.11068   0.10085   0.07687   0.04708  -0.03073   0.00000
              180.00  -0.00000  -0.00003  -0.00007  -0.00009  -0.00008  -0.00008  -0.00008   0.00021   0.00259   0.00144   0.00023  -0.00020   0.00023   0.00144   0.00259   0.00021  -0.00008  -0.00008  -0.00008  -0.00009  -0.00007  -0.00003  -0.00000
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            </tableData>
          </table>
          </product>
        </function>
        <function name="aero/coefficient/Cm_mach">
          <description>Cm from the neutral point's move with Mach</description>
          <product>
            <property>aero/qbar-psf</property>
            <property>metrics/Sw-sqft</property>
            <property>metrics/cbarw-ft</property>
            <property>aero/function/CL-base</property>
            <property>aero/function/mach-dCm-dCL</property>
          </product>
        </function>
        <function name="aero/coefficient/Cm_elevator">
          <description>Cm increment from elevator (deg), over alpha</description>
          <product>
            <property>aero/qbar-psf</property>
            <property>metrics/Sw-sqft</property>
            <property>metrics/cbarw-ft</property>
            <property>aero/function/mach-elevator</property>
          <table>
            <independentVar lookup="row">aero/alpha-deg</independentVar>
            <independentVar lookup="column">fcs/elevator-pos-deg</independentVar>
            <tableData>
                        -25.00    -20.00    -15.00    -10.00     -5.00      0.00      5.00     10.00     15.00     20.00     25.00
             -180.00  -0.07416  -0.06218  -0.04835  -0.06770  -0.06678   0.00000   0.06678   0.06769   0.04830   0.06210   0.07403
              -35.00   0.07232   0.06230   0.04954   0.03419   0.01701   0.00000  -0.01656  -0.03651  -0.05934  -0.08115  -0.09524
              -11.00   0.12759   0.10542   0.08190   0.05543   0.02766   0.00000  -0.02800  -0.05625  -0.08484  -0.11441  -0.14395
                4.00   0.14305   0.11473   0.08517   0.05590   0.02774   0.00000  -0.02754  -0.05497  -0.08309  -0.11171  -0.13926
               19.00   0.13991   0.11285   0.08398   0.05519   0.02280   0.00000  -0.02546  -0.05083  -0.07483  -0.09446  -0.11121
               42.00   0.06848   0.06823   0.04855   0.03032   0.01503   0.00000  -0.01574  -0.02953  -0.04127  -0.05076  -0.05790
              180.00  -0.07416  -0.06218  -0.04835  -0.06770  -0.06678   0.00000   0.06678   0.06769   0.04830   0.06210   0.07403
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            </tableData>
          </table>
          </product>
        </function>
        <function name="aero/coefficient/Cm_flap">
          <description>Cm increment from flap (deg), over alpha</description>
          <product>
            <property>aero/qbar-psf</property>
            <property>metrics/Sw-sqft</property>
            <property>metrics/cbarw-ft</property>
            <property>aero/function/mach-flap</property>
          <table>
            <independentVar lookup="row">aero/alpha-deg</independentVar>
            <independentVar lookup="column">fcs/flap-pos-deg</independentVar>
            <tableData>
                        -30.00    -25.00    -20.00    -15.00    -10.00     -5.00      0.00      5.00     10.00     15.00     20.00     25.00     30.00
             -180.00   0.00018   0.00013   0.00008   0.00005   0.00002   0.00001   0.00000   0.00001   0.00002   0.00005   0.00008   0.00013   0.00018
              -35.00   0.02604   0.02513   0.02341   0.02042   0.01533   0.00809   0.00000  -0.00790  -0.01473  -0.01946  -0.02208  -0.02343  -0.02423
              -11.00  -0.01514  -0.01158  -0.00817  -0.00518  -0.00286  -0.00117   0.00000   0.00097   0.00223   0.00429   0.00714   0.01050   0.01403
                4.00  -0.02505  -0.01993  -0.01507  -0.01061  -0.00667  -0.00322   0.00000   0.00318   0.00657   0.01052   0.01503   0.01993   0.02506
               19.00  -0.00908  -0.00650  -0.00413  -0.00223  -0.00099  -0.00034   0.00000  -0.00156  -0.00114   0.00188   0.00352   0.00531   0.00716
               42.00   0.02615   0.02458   0.02255   0.01937   0.01434   0.00754   0.00000  -0.00753  -0.01443  -0.01978  -0.02352  -0.02638  -0.02920
              180.00   0.00018   0.00013   0.00008   0.00005   0.00002   0.00001   0.00000   0.00001   0.00002   0.00005   0.00008   0.00013   0.00018
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            </tableData>
          </table>
          </product>
        </function>
        <function name="aero/coefficient/Cmq">
          <description>Cm per q (non-dimensional), over alpha</description>
          <product>
            <property>aero/qbar-psf</property>
            <property>metrics/Sw-sqft</property>
            <property>metrics/cbarw-ft</property>
            <property>aero/ci2vel</property>
            <property>velocities/q-aero-rad_sec</property>
            <property>aero/function/mach-lift</property>
          <table>
            <independentVar lookup="row">aero/alpha-deg</independentVar>
            <tableData>
                 -180.00   -1.33675
                 -165.00   -0.11336
                  -32.00   -1.08765
                  -10.00   -0.88373
                    5.00   -0.79764
                   20.00   -1.10916
                   46.00   -1.19306
                  180.00   -1.33675
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            </tableData>
          </table>
          </product>
        </function>
        <function name="aero/coefficient/Cmadot">
          <description>Cm per alpha-dot (downwash lag at the tail)</description>
          <product>
            <property>aero/qbar-psf</property>
            <property>metrics/Sw-sqft</property>
            <property>metrics/cbarw-ft</property>
            <property>aero/ci2vel</property>
            <property>aero/alphadot-rad_sec</property>
            <value>-0.18235</value>
            <property>aero/function/mach-lift</property>
          </product>
        </function>
      </axis>
      <axis name="YAW">
        <function name="aero/coefficient/Cn_base">
          <description>Cn over alpha and beta (hangar)</description>
          <product>
            <property>aero/qbar-psf</property>
            <property>metrics/Sw-sqft</property>
            <property>metrics/bw-ft</property>
            <property>aero/function/mach-side</property>
          <table>
            <independentVar lookup="row">aero/alpha-deg</independentVar>
            <independentVar lookup="column">aero/beta-deg</independentVar>
            <tableData>
                        -90.00    -70.00    -50.00    -40.00    -30.00    -25.00    -20.00    -15.00    -10.00     -6.00     -3.00      0.00      3.00      6.00     10.00     15.00     20.00     25.00     30.00     40.00     50.00     70.00     90.00
             -180.00   0.00748  -0.01733  -0.03971  -0.04466  -0.04326  -0.03998  -0.03499  -0.02931  -0.03877  -0.03364  -0.01766  -0.00000   0.01766   0.03364   0.03877   0.02931   0.03499   0.03998   0.04326   0.04466   0.03971   0.01733  -0.00748
              -35.00   0.00748   0.02191   0.03073   0.03369   0.03062   0.02592   0.02239   0.01803   0.01276   0.00506   0.00250  -0.00000  -0.00250  -0.00506  -0.01276  -0.01803  -0.02239  -0.02592  -0.03062  -0.03369  -0.03073  -0.02191  -0.00748
              -11.00   0.00748   0.02345   0.03208   0.03340   0.02649   0.01863   0.01294   0.00579   0.00337   0.00185   0.00089  -0.00000  -0.00089  -0.00185  -0.00337  -0.00579  -0.01294  -0.01863  -0.02649  -0.03340  -0.03208  -0.02345  -0.00748
                4.00   0.00748   0.02142   0.02778   0.02746   0.01922   0.01311   0.00204   0.00013  -0.00074  -0.00079  -0.00049  -0.00000   0.00049   0.00079   0.00074  -0.00013  -0.00204  -0.01311  -0.01922  -0.02746  -0.02778  -0.02142  -0.00748
               19.00   0.00748   0.02199   0.02712   0.02933   0.02641   0.01879   0.01485   0.00879   0.00478   0.00291   0.00141  -0.00000  -0.00141  -0.00291  -0.00478  -0.00879  -0.01485  -0.01879  -0.02641  -0.02933  -0.02712  -0.02199  -0.00748
               42.00   0.00748   0.02137   0.03025   0.03054   0.02739   0.02111   0.01999   0.01880   0.01538   0.00989   0.00620  -0.00000  -0.00620  -0.00989  -0.01538  -0.01880  -0.01999  -0.02111  -0.02739  -0.03054  -0.03025  -0.02137  -0.00748
              180.00   0.00748  -0.01733  -0.03971  -0.04466  -0.04326  -0.03998  -0.03499  -0.02931  -0.03877  -0.03364  -0.01766  -0.00000   0.01766   0.03364   0.03877   0.02931   0.03499   0.03998   0.04326   0.04466   0.03971   0.01733  -0.00748
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            </tableData>
          </table>
          </product>
        </function>
        <function name="aero/coefficient/Cn_aileron">
          <description>Cn increment from aileron (deg), over alpha</description>
          <product>
            <property>aero/qbar-psf</property>
            <property>metrics/Sw-sqft</property>
            <property>metrics/bw-ft</property>
            <property>aero/function/mach-aileron</property>
          <table>
            <independentVar lookup="row">aero/alpha-deg</independentVar>
            <independentVar lookup="column">fcs/left-aileron-pos-deg</independentVar>
            <tableData>
                        -30.00    -25.00    -20.00    -15.00    -10.00     -5.00      0.00      5.00     10.00     15.00     20.00     25.00     30.00
             -180.00  -0.00046  -0.00050  -0.00046  -0.00036  -0.00025  -0.00012   0.00000   0.00012   0.00025   0.00036   0.00046   0.00050   0.00046
              -35.00   0.00232   0.00289   0.00310   0.00304   0.00251   0.00141   0.00000  -0.00141  -0.00251  -0.00304  -0.00310  -0.00289  -0.00232
              -11.00  -0.01084  -0.00997  -0.00878  -0.00723  -0.00515  -0.00264   0.00000   0.00264   0.00515   0.00723   0.00878   0.00997   0.01084
                4.00  -0.00573  -0.00505  -0.00429  -0.00343  -0.00242  -0.00126   0.00000   0.00126   0.00242   0.00343   0.00429   0.00505   0.00573
               19.00  -0.01169  -0.01114  -0.01040  -0.00927  -0.00728  -0.00404   0.00000   0.00404   0.00728   0.00927   0.01040   0.01114   0.01169
               42.00  -0.02034  -0.02017  -0.01886  -0.01645  -0.01216  -0.00752   0.00000   0.00752   0.01216   0.01645   0.01886   0.02017   0.02034
              180.00  -0.00046  -0.00050  -0.00046  -0.00036  -0.00025  -0.00012   0.00000   0.00012   0.00025   0.00036   0.00046   0.00050   0.00046
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            </tableData>
          </table>
          </product>
        </function>
        <function name="aero/coefficient/Cn_rudder">
          <description>Cn increment from rudder (deg), over alpha</description>
          <product>
            <property>aero/qbar-psf</property>
            <property>metrics/Sw-sqft</property>
            <property>metrics/bw-ft</property>
            <property>aero/function/mach-rudder</property>
          <table>
            <independentVar lookup="row">aero/alpha-deg</independentVar>
            <independentVar lookup="column">fcs/rudder-pos-deg</independentVar>
            <tableData>
                        -30.00    -25.00    -20.00    -15.00    -10.00     -5.00      0.00      5.00     10.00     15.00     20.00     25.00     30.00
             -180.00   0.00000   0.00000   0.00000   0.00000   0.00000   0.00000   0.00000   0.00000   0.00000   0.00000   0.00000   0.00000   0.00000
              -35.00   0.01166   0.01066   0.00952   0.00802   0.00591   0.00313   0.00000  -0.00313  -0.00591  -0.00802  -0.00952  -0.01066  -0.01166
              -11.00   0.01664   0.01530   0.01374   0.01163   0.00858   0.00456   0.00000  -0.00456  -0.00858  -0.01163  -0.01374  -0.01530  -0.01664
                4.00   0.01849   0.01707   0.01539   0.01307   0.00968   0.00515   0.00000  -0.00515  -0.00968  -0.01307  -0.01539  -0.01707  -0.01849
               19.00   0.01792   0.01652   0.01487   0.01262   0.00938   0.00500   0.00000  -0.00500  -0.00938  -0.01262  -0.01487  -0.01652  -0.01792
               42.00   0.01526   0.01380   0.01232   0.01050   0.00812   0.00436   0.00000  -0.00436  -0.00812  -0.01050  -0.01232  -0.01380  -0.01526
              180.00   0.00000   0.00000   0.00000   0.00000   0.00000   0.00000   0.00000   0.00000   0.00000   0.00000   0.00000   0.00000   0.00000
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            </tableData>
          </table>
          </product>
        </function>
        <function name="aero/coefficient/Cnp">
          <description>Cn per p (non-dimensional), over alpha</description>
          <product>
            <property>aero/qbar-psf</property>
            <property>metrics/Sw-sqft</property>
            <property>metrics/bw-ft</property>
            <property>aero/bi2vel</property>
            <property>velocities/p-aero-rad_sec</property>
            <property>aero/function/mach-lift</property>
          <table>
            <independentVar lookup="row">aero/alpha-deg</independentVar>
            <tableData>
                 -180.00    0.08841
                 -165.00    0.02164
                  -32.00    0.02043
                  -10.00    0.04082
                    5.00   -0.01063
                   20.00   -0.01867
                   46.00   -0.00053
                  180.00    0.08841
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            </tableData>
          </table>
          </product>
        </function>
        <function name="aero/coefficient/Cnr">
          <description>Cn per r (non-dimensional), over alpha</description>
          <product>
            <property>aero/qbar-psf</property>
            <property>metrics/Sw-sqft</property>
            <property>metrics/bw-ft</property>
            <property>aero/bi2vel</property>
            <property>velocities/r-aero-rad_sec</property>
            <property>aero/function/mach-lift</property>
          <table>
            <independentVar lookup="row">aero/alpha-deg</independentVar>
            <tableData>
                 -180.00   -0.09345
                 -165.00   -0.01803
                  -32.00   -0.11007
                  -10.00   -0.11019
                    5.00   -0.11341
                   20.00   -0.11780
                   46.00   -0.09317
                  180.00   -0.09345
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            </tableData>
          </table>
          </product>
        </function>
      </axis>
    </aerodynamics>
</fdm_config>
