<?xml version="1.0"?>
<?xml-stylesheet type="text/xsl" href="http://jsbsim.sourceforge.net/JSBSim.xsl"?>
<!-- Generated by hangar 0.1.0 from kc135r.toml on 2026-09-26. Edit the design and rebuild; changes
     made here are overwritten.  -->
<fdm_config name="kc135r" version="2.0" release="ALPHA"
            xmlns:xsi="http://www.w3.org/2001/XMLSchema-instance"
            xsi:noNamespaceSchemaLocation="http://jsbsim.sourceforge.net/JSBSim.xsd">
    <fileheader>
      <author>hangar</author>
      <filecreationdate>2026-09-26</filecreationdate>
      <version>0.1.0</version>
      <description>Boeing KC-135R Stratotanker (hangar build)</description>
      <note>Aerodynamics: vortex lattice with viscous section polars, full-envelope
        strip model, slender-body fuselage (hangar). Mass: Raymer component
        weights on the geometry. Propeller: blade-element momentum theory.</note>
    </fileheader>
    <metrics>
      <wingarea unit="M2"> 227.6896 </wingarea>
      <wingspan unit="M"> 39.8800 </wingspan>
      <chord unit="M"> 6.1571 </chord>
      <htailarea unit="M2"> 47.6998 </htailarea>
      <htailarm unit="M"> 18.7561 </htailarm>
      <vtailarea unit="M2"> 31.6735 </vtailarea>
      <vtailarm unit="M"> 17.5583 </vtailarm>
      <location name="AERORP" unit="M">
        <x> 18.2196 </x>
        <y> 0.0000 </y>
        <z> 1.0164 </z>
      </location>
      <location name="EYEPOINT" unit="M">
        <x> 2.9000 </x>
        <y> -0.5000 </y>
        <z> 2.4000 </z>
      </location>
      <location name="VRP" unit="M">
        <x> 18.9000 </x>
        <y> -0.0000 </y>
        <z> 0.8000 </z>
      </location>
    </metrics>
    <mass_balance negated_crossproduct_inertia="false">
      <ixx unit="KG*M2"> 2837618.13 </ixx>
      <iyy unit="KG*M2"> 3700328.73 </iyy>
      <izz unit="KG*M2"> 6316889.89 </izz>
      <ixy unit="KG*M2"> -0.161 </ixy>
      <ixz unit="KG*M2"> 234919.004 </ixz>
      <iyz unit="KG*M2"> 1.692 </iyz>
      <emptywt unit="KG"> 54080.00 </emptywt>
      <location name="CG" unit="M">
        <x> 18.9000 </x>
        <y> -0.0000 </y>
        <z> 0.8000 </z>
      </location>
      <pointmass name="pilot">
        <weight unit="KG"> 100.00 </weight>
        <location unit="M">
          <x> 2.9000 </x>
          <y> -0.5000 </y>
          <z> 1.7000 </z>
        </location>
      </pointmass>
      <pointmass name="co-pilot">
        <weight unit="KG"> 100.00 </weight>
        <location unit="M">
          <x> 2.9000 </x>
          <y> 0.5000 </y>
          <z> 1.7000 </z>
        </location>
      </pointmass>
      <pointmass name="boom operator">
        <weight unit="KG"> 100.00 </weight>
        <location unit="M">
          <x> 29.5000 </x>
          <y> 0.0000 </y>
          <z> 0.1000 </z>
        </location>
      </pointmass>
    </mass_balance>
    <ground_reactions>
      <contact type="BOGEY" name="Nose Gear">
        <location unit="M">
          <x> 5.4800 </x>
          <y> 0.0000 </y>
          <z> -2.2300 </z>
        </location>
        <static_friction> 0.8 </static_friction>
        <dynamic_friction> 0.5 </dynamic_friction>
        <rolling_friction> 0.02 </rolling_friction>
        <spring_coeff unit="N/M"> 633249 </spring_coeff>
        <damping_coeff unit="N/M/SEC"> 70049 </damping_coeff>
        <damping_coeff_rebound unit="N/M/SEC"> 140099 </damping_coeff_rebound>
        <max_steer unit="DEG"> 60.0 </max_steer>
        <brake_group> NONE </brake_group>
        <retractable> 1 </retractable>
      </contact>
      <contact type="BOGEY" name="Left Main Gear">
        <location unit="M">
          <x> 19.3800 </x>
          <y> -3.3660 </y>
          <z> -2.2600 </z>
        </location>
        <static_friction> 0.8 </static_friction>
        <dynamic_friction> 0.5 </dynamic_friction>
        <rolling_friction> 0.02 </rolling_friction>
        <spring_coeff unit="N/M"> 3007052 </spring_coeff>
        <damping_coeff unit="N/M/SEC"> 371900 </damping_coeff>
        <damping_coeff_rebound unit="N/M/SEC"> 743800 </damping_coeff_rebound>
        <max_steer unit="DEG"> 0.0 </max_steer>
        <brake_group> LEFT </brake_group>
        <retractable> 1 </retractable>
      </contact>
      <contact type="BOGEY" name="Right Main Gear">
        <location unit="M">
          <x> 19.3800 </x>
          <y> 3.3660 </y>
          <z> -2.2600 </z>
        </location>
        <static_friction> 0.8 </static_friction>
        <dynamic_friction> 0.5 </dynamic_friction>
        <rolling_friction> 0.02 </rolling_friction>
        <spring_coeff unit="N/M"> 3007052 </spring_coeff>
        <damping_coeff unit="N/M/SEC"> 371900 </damping_coeff>
        <damping_coeff_rebound unit="N/M/SEC"> 743800 </damping_coeff_rebound>
        <max_steer unit="DEG"> 0.0 </max_steer>
        <brake_group> RIGHT </brake_group>
        <retractable> 1 </retractable>
      </contact>
      <contact type="STRUCTURE" name="boom rear">
        <location unit="M">
          <x> 41.2500 </x>
          <y> 0.0000 </y>
          <z> 1.9400 </z>
        </location>
        <static_friction> 0.8 </static_friction>
        <dynamic_friction> 0.6 </dynamic_friction>
        <spring_coeff unit="N/M"> 5850370 </spring_coeff>
        <damping_coeff unit="N/M/SEC"> 195012 </damping_coeff>
        <damping_coeff_rebound unit="N/M/SEC"> 195012 </damping_coeff_rebound>
      </contact>
      <contact type="STRUCTURE" name="boom pod rear">
        <location unit="M">
          <x> 28.0858 </x>
          <y> -0.0000 </y>
          <z> -0.5670 </z>
        </location>
        <static_friction> 0.8 </static_friction>
        <dynamic_friction> 0.6 </dynamic_friction>
        <spring_coeff unit="N/M"> 21531483 </spring_coeff>
        <damping_coeff unit="N/M/SEC"> 717716 </damping_coeff>
        <damping_coeff_rebound unit="N/M/SEC"> 717716 </damping_coeff_rebound>
      </contact>
      <contact type="STRUCTURE" name="fin rear">
        <location unit="M">
          <x> 40.0090 </x>
          <y> 0.0000 </y>
          <z> 10.4900 </z>
        </location>
        <static_friction> 0.8 </static_friction>
        <dynamic_friction> 0.6 </dynamic_friction>
        <spring_coeff unit="N/M"> 5478278 </spring_coeff>
        <damping_coeff unit="N/M/SEC"> 182609 </damping_coeff>
        <damping_coeff_rebound unit="N/M/SEC"> 182609 </damping_coeff_rebound>
      </contact>
      <contact type="STRUCTURE" name="fuselage front">
        <location unit="M">
          <x> 0.0000 </x>
          <y> 0.0000 </y>
          <z> 0.8300 </z>
        </location>
        <static_friction> 0.8 </static_friction>
        <dynamic_friction> 0.6 </dynamic_friction>
        <spring_coeff unit="N/M"> 3912158 </spring_coeff>
        <damping_coeff unit="N/M/SEC"> 130405 </damping_coeff>
        <damping_coeff_rebound unit="N/M/SEC"> 130405 </damping_coeff_rebound>
      </contact>
      <contact type="STRUCTURE" name="fuselage front 2">
        <location unit="M">
          <x> 3.3243 </x>
          <y> -0.0000 </y>
          <z> -0.6142 </z>
        </location>
        <static_friction> 0.8 </static_friction>
        <dynamic_friction> 0.6 </dynamic_friction>
        <spring_coeff unit="N/M"> 2659752 </spring_coeff>
        <damping_coeff unit="N/M/SEC"> 88658 </damping_coeff>
        <damping_coeff_rebound unit="N/M/SEC"> 88658 </damping_coeff_rebound>
      </contact>
      <contact type="STRUCTURE" name="fuselage front 3">
        <location unit="M">
          <x> 4.0000 </x>
          <y> 0.0000 </y>
          <z> 2.9502 </z>
        </location>
        <static_friction> 0.8 </static_friction>
        <dynamic_friction> 0.6 </dynamic_friction>
        <spring_coeff unit="N/M"> 5643485 </spring_coeff>
        <damping_coeff unit="N/M/SEC"> 188116 </damping_coeff>
        <damping_coeff_rebound unit="N/M/SEC"> 188116 </damping_coeff_rebound>
      </contact>
      <contact type="STRUCTURE" name="htail left rear">
        <location unit="M">
          <x> 41.1930 </x>
          <y> -6.0241 </y>
          <z> 2.9619 </z>
        </location>
        <static_friction> 0.8 </static_friction>
        <dynamic_friction> 0.6 </dynamic_friction>
        <spring_coeff unit="N/M"> 5391617 </spring_coeff>
        <damping_coeff unit="N/M/SEC"> 179721 </damping_coeff>
        <damping_coeff_rebound unit="N/M/SEC"> 179721 </damping_coeff_rebound>
      </contact>
      <contact type="STRUCTURE" name="htail right rear">
        <location unit="M">
          <x> 41.1930 </x>
          <y> 6.0241 </y>
          <z> 2.9619 </z>
        </location>
        <static_friction> 0.8 </static_friction>
        <dynamic_friction> 0.6 </dynamic_friction>
        <spring_coeff unit="N/M"> 5391615 </spring_coeff>
        <damping_coeff unit="N/M/SEC"> 179720 </damping_coeff>
        <damping_coeff_rebound unit="N/M/SEC"> 179720 </damping_coeff_rebound>
      </contact>
      <contact type="STRUCTURE" name="outboard nacelle left bottom">
        <location unit="M">
          <x> 18.2000 </x>
          <y> -14.7619 </y>
          <z> -0.3173 </z>
        </location>
        <static_friction> 0.8 </static_friction>
        <dynamic_friction> 0.6 </dynamic_friction>
        <spring_coeff unit="N/M"> 9347617 </spring_coeff>
        <damping_coeff unit="N/M/SEC"> 311587 </damping_coeff>
        <damping_coeff_rebound unit="N/M/SEC"> 311587 </damping_coeff_rebound>
      </contact>
      <contact type="STRUCTURE" name="outboard nacelle right bottom">
        <location unit="M">
          <x> 18.2000 </x>
          <y> 14.7619 </y>
          <z> -0.3173 </z>
        </location>
        <static_friction> 0.8 </static_friction>
        <dynamic_friction> 0.6 </dynamic_friction>
        <spring_coeff unit="N/M"> 9347599 </spring_coeff>
        <damping_coeff unit="N/M/SEC"> 311587 </damping_coeff>
        <damping_coeff_rebound unit="N/M/SEC"> 311587 </damping_coeff_rebound>
      </contact>
      <contact type="STRUCTURE" name="wing left rear">
        <location unit="M">
          <x> 25.7830 </x>
          <y> -19.9400 </y>
          <z> 2.4480 </z>
        </location>
        <static_friction> 0.8 </static_friction>
        <dynamic_friction> 0.6 </dynamic_friction>
        <spring_coeff unit="N/M"> 2600541 </spring_coeff>
        <damping_coeff unit="N/M/SEC"> 86685 </damping_coeff>
        <damping_coeff_rebound unit="N/M/SEC"> 86685 </damping_coeff_rebound>
      </contact>
      <contact type="STRUCTURE" name="wing left rear 2">
        <location unit="M">
          <x> 28.5626 </x>
          <y> -19.9342 </y>
          <z> 2.4956 </z>
        </location>
        <static_friction> 0.8 </static_friction>
        <dynamic_friction> 0.6 </dynamic_friction>
        <spring_coeff unit="N/M"> 2427177 </spring_coeff>
        <damping_coeff unit="N/M/SEC"> 80906 </damping_coeff>
        <damping_coeff_rebound unit="N/M/SEC"> 80906 </damping_coeff_rebound>
      </contact>
      <contact type="STRUCTURE" name="wing right rear">
        <location unit="M">
          <x> 28.5626 </x>
          <y> 19.9342 </y>
          <z> 2.4956 </z>
        </location>
        <static_friction> 0.8 </static_friction>
        <dynamic_friction> 0.6 </dynamic_friction>
        <spring_coeff unit="N/M"> 2427174 </spring_coeff>
        <damping_coeff unit="N/M/SEC"> 80906 </damping_coeff>
        <damping_coeff_rebound unit="N/M/SEC"> 80906 </damping_coeff_rebound>
      </contact>
      <contact type="STRUCTURE" name="wing right rear 2">
        <location unit="M">
          <x> 25.7830 </x>
          <y> 19.9400 </y>
          <z> 2.4480 </z>
        </location>
        <static_friction> 0.8 </static_friction>
        <dynamic_friction> 0.6 </dynamic_friction>
        <spring_coeff unit="N/M"> 2600538 </spring_coeff>
        <damping_coeff unit="N/M/SEC"> 86685 </damping_coeff>
        <damping_coeff_rebound unit="N/M/SEC"> 86685 </damping_coeff_rebound>
      </contact>
    </ground_reactions>
    <propulsion>
      <engine file="kc135r_engine0">
        <location unit="M">
          <x> 15.7000 </x>
          <y> -8.2800 </y>
          <z> -0.3500 </z>
        </location>
        <feed>0</feed>
        <feed>1</feed>
        <feed>2</feed>
        <feed>3</feed>
        <feed>4</feed>
        <feed>5</feed>
        <feed>6</feed>
        <feed>7</feed>
        <feed>8</feed>
        <feed>9</feed>
        <thruster file="kc135r_nozzle0">
          <location unit="M">
            <x> 17.4000 </x>
            <y> -8.2800 </y>
            <z> -0.3500 </z>
          </location>
          <orient unit="DEG"> <roll>0.00</roll> <pitch>0.00</pitch> <yaw>0.00</yaw> </orient>

        </thruster>
      </engine>
      <engine file="kc135r_engine0">
        <location unit="M">
          <x> 15.7000 </x>
          <y> 8.2800 </y>
          <z> -0.3500 </z>
        </location>
        <feed>0</feed>
        <feed>1</feed>
        <feed>2</feed>
        <feed>3</feed>
        <feed>4</feed>
        <feed>5</feed>
        <feed>6</feed>
        <feed>7</feed>
        <feed>8</feed>
        <feed>9</feed>
        <thruster file="kc135r_nozzle0">
          <location unit="M">
            <x> 17.4000 </x>
            <y> 8.2800 </y>
            <z> -0.3500 </z>
          </location>
          <orient unit="DEG"> <roll>0.00</roll> <pitch>0.00</pitch> <yaw>0.00</yaw> </orient>

        </thruster>
      </engine>
      <engine file="kc135r_engine1">
        <location unit="M">
          <x> 20.2000 </x>
          <y> -14.0500 </y>
          <z> 0.2000 </z>
        </location>
        <feed>0</feed>
        <feed>1</feed>
        <feed>2</feed>
        <feed>3</feed>
        <feed>4</feed>
        <feed>5</feed>
        <feed>6</feed>
        <feed>7</feed>
        <feed>8</feed>
        <feed>9</feed>
        <thruster file="kc135r_nozzle1">
          <location unit="M">
            <x> 21.9000 </x>
            <y> -14.0500 </y>
            <z> 0.2000 </z>
          </location>
          <orient unit="DEG"> <roll>0.00</roll> <pitch>0.00</pitch> <yaw>0.00</yaw> </orient>

        </thruster>
      </engine>
      <engine file="kc135r_engine1">
        <location unit="M">
          <x> 20.2000 </x>
          <y> 14.0500 </y>
          <z> 0.2000 </z>
        </location>
        <feed>0</feed>
        <feed>1</feed>
        <feed>2</feed>
        <feed>3</feed>
        <feed>4</feed>
        <feed>5</feed>
        <feed>6</feed>
        <feed>7</feed>
        <feed>8</feed>
        <feed>9</feed>
        <thruster file="kc135r_nozzle1">
          <location unit="M">
            <x> 21.9000 </x>
            <y> 14.0500 </y>
            <z> 0.2000 </z>
          </location>
          <orient unit="DEG"> <roll>0.00</roll> <pitch>0.00</pitch> <yaw>0.00</yaw> </orient>

        </thruster>
      </engine>
      <tank type="FUEL">
        <location unit="M">
          <x> 16.9600 </x>
          <y> -5.0000 </y>
          <z> 0.5500 </z>
        </location>
        <capacity unit="KG"> 5900.00 </capacity>
        <contents unit="KG"> 2950.00 </contents>
      </tank>
      <tank type="FUEL">
        <location unit="M">
          <x> 16.9600 </x>
          <y> 5.0000 </y>
          <z> 0.5500 </z>
        </location>
        <capacity unit="KG"> 5900.00 </capacity>
        <contents unit="KG"> 2950.00 </contents>
      </tank>
      <tank type="FUEL">
        <location unit="M">
          <x> 20.9400 </x>
          <y> -11.0000 </y>
          <z> 1.3000 </z>
        </location>
        <capacity unit="KG"> 4540.00 </capacity>
        <contents unit="KG"> 2270.00 </contents>
      </tank>
      <tank type="FUEL">
        <location unit="M">
          <x> 20.9400 </x>
          <y> 11.0000 </y>
          <z> 1.3000 </z>
        </location>
        <capacity unit="KG"> 4540.00 </capacity>
        <contents unit="KG"> 2270.00 </contents>
      </tank>
      <tank type="FUEL">
        <location unit="M">
          <x> 24.2500 </x>
          <y> -16.0000 </y>
          <z> 1.9000 </z>
        </location>
        <capacity unit="KG"> 900.00 </capacity>
        <contents unit="KG"> 450.00 </contents>
      </tank>
      <tank type="FUEL">
        <location unit="M">
          <x> 24.2500 </x>
          <y> 16.0000 </y>
          <z> 1.9000 </z>
        </location>
        <capacity unit="KG"> 900.00 </capacity>
        <contents unit="KG"> 450.00 </contents>
      </tank>
      <tank type="FUEL">
        <location unit="M">
          <x> 14.5000 </x>
          <y> 0.0000 </y>
          <z> -0.2500 </z>
        </location>
        <capacity unit="KG"> 22226.00 </capacity>
        <contents unit="KG"> 11113.00 </contents>
      </tank>
      <tank type="FUEL">
        <location unit="M">
          <x> 8.9000 </x>
          <y> 0.0000 </y>
          <z> -0.3500 </z>
        </location>
        <capacity unit="KG"> 19050.00 </capacity>
        <contents unit="KG"> 9525.00 </contents>
      </tank>
      <tank type="FUEL">
        <location unit="M">
          <x> 23.7000 </x>
          <y> 0.0000 </y>
          <z> -0.3000 </z>
        </location>
        <capacity unit="KG"> 19368.00 </capacity>
        <contents unit="KG"> 9684.00 </contents>
      </tank>
      <tank type="FUEL">
        <location unit="M">
          <x> 29.0000 </x>
          <y> 0.0000 </y>
          <z> 2.0000 </z>
        </location>
        <capacity unit="KG"> 7394.00 </capacity>
        <contents unit="KG"> 3697.00 </contents>
      </tank>
    </propulsion>
    <flight_control name="kc135r">
      <!-- the aircraft's profile for the platform (docs/control-architecture.md, section 7): what
           hangar knows of it - its design, its flight tests, its identified responses -->
      <property value="1">fsim/identity/version</property>
      <property value="1">fsim/identity/provenance</property>
      <property value="5">fsim/identity/class</property>
      <property value="1">fsim/identity/family</property>
      <property value="1">fsim/effectors/version</property>
      <property value="1">fsim/effectors/provenance</property>
      <property value="1">fsim/effectors/flaps</property>
      <property value="8">fsim/effectors/flaps_transit_s</property>
      <property value="0.0">fsim/effectors/neutral</property>
      <property value="0.0">fsim/effectors/pitch</property>
      <property value="1">fsim/effectors/pitch_trim</property>
      <property value="1">fsim/effectors/retractable_gear</property>
      <property value="0.0">fsim/effectors/roll</property>
      <property value="0.0">fsim/effectors/speedbrake</property>
      <property value="1">fsim/effectors/wheel_brakes</property>
      <property value="0.0">fsim/effectors/yaw</property>
      <property value="1">fsim/envelope/version</property>
      <property value="1">fsim/envelope/provenance</property>
      <property value="18.7455">fsim/envelope/clean/alpha_max_deg</property>
      <property value="70.5898">fsim/envelope/clean/cas_min_ms</property>
      <property value="1">fsim/propulsion/version</property>
      <property value="1">fsim/propulsion/provenance</property>
      <property value="0.0">fsim/propulsion/afterburner</property>
      <property value="4">fsim/propulsion/engines</property>
      <property value="0.324558">fsim/propulsion/spool_s</property>
      <property value="2">fsim/propulsion/type</property>
      <property value="1">fsim/plant/version</property>
      <property value="1">fsim/plant/provenance</property>
      <property value="-2.29629">fsim/plant/alpha_zero_lift_deg</property>
      <property value="3000">fsim/plant/altitude_m</property>
      <property value="142.85">fsim/plant/eas_ms</property>
      <property value="0.226">fsim/plant/elevator_trim</property>
      <property value="-0.349043">fsim/plant/elevator_trim_lift</property>
      <property value="2.87043">fsim/plant/pitch/gain</property>
      <property value="0.568127">fsim/plant/pitch/tau_s</property>
      <property value="0.848837">fsim/plant/roll/gain</property>
      <property value="0.425595">fsim/plant/roll/tau_s</property>
      <property value="2.46238">fsim/plant/speed/gain</property>
      <property value="0.324558">fsim/plant/speed/tau_s</property>
      <property value="164.31">fsim/plant/tas_ms</property>
      <property value="0.396078">fsim/plant/yaw/gain</property>
      <property value="1">fsim/performance/version</property>
      <property value="1">fsim/performance/provenance</property>
      <property value="12449.9">fsim/performance/ceiling_m</property>
      <property value="294.972">fsim/performance/max_tas_ms</property>
      <property value="70.5898">fsim/performance/stall_cas_ms</property>
      <!-- the platform's built-in control loops, tuned for this aircraft (hangar autopilot):
           every vehicle of the type takes these as its controllers' parameters -->
      <property value="0.0">fsim/control/pid_acceleration/load_factor/eas_exponent</property>
      <property value="0.0">fsim/control/pid_acceleration/load_factor/feedforward</property>
      <property value="0.3">fsim/control/pid_acceleration/load_factor/integral_limit</property>
      <property value="0.642133">fsim/control/pid_acceleration/load_factor/kd</property>
      <property value="0.183962">fsim/control/pid_acceleration/load_factor/ki</property>
      <property value="0.034838">fsim/control/pid_acceleration/load_factor/kp</property>
      <property value="0.0">fsim/control/pid_acceleration/load_factor/path_hold</property>
      <property value="1">fsim/control/pid_acceleration/load_factor/tas_exponent</property>
      <property value="0.406112">fsim/control/pid_acceleration/longitudinal/ki</property>
      <property value="0.131807">fsim/control/pid_acceleration/longitudinal/kp</property>
      <property value="0.226">fsim/control/pid_acceleration/pitch/trim</property>
      <property value="-0.349043">fsim/control/pid_acceleration/pitch/trim_lift</property>
      <property value="-2">fsim/control/pid_acceleration/roll_rate/eas_exponent</property>
      <property value="0.942465">fsim/control/pid_acceleration/roll_rate/feedforward</property>
      <property value="0.830424">fsim/control/pid_acceleration/roll_rate/ki</property>
      <property value="0.117808">fsim/control/pid_acceleration/roll_rate/kp</property>
      <property value="2">fsim/control/pid_acceleration/roll_rate/tas_exponent</property>
      <property value="-1.26238">fsim/control/pid_acceleration/rudder/beta_gain</property>
      <property value="142.855">fsim/control/pid_acceleration/schedule/eas_ms</property>
      <property value="164.308">fsim/control/pid_acceleration/schedule/tas_ms</property>
      <property value="0.515624">fsim/control/pid_acceleration/throttle/feedforward</property>
      <property value="0.025382">fsim/control/pid_attitude/airspeed/ki</property>
      <property value="0.18275">fsim/control/pid_attitude/airspeed/kp</property>
      <property value="3.35095">fsim/control/pid_attitude/heading/gain</property>
      <property value="0.0">fsim/control/pid_attitude/pitch/eas_exponent</property>
      <property value="0.5">fsim/control/pid_attitude/pitch/integral_limit</property>
      <property value="0.642133">fsim/control/pid_attitude/pitch/kd</property>
      <property value="0.678158">fsim/control/pid_attitude/pitch/ki</property>
      <property value="2.56853">fsim/control/pid_attitude/pitch/kp</property>
      <property value="0.0">fsim/control/pid_attitude/pitch/tas_exponent</property>
      <property value="0.226">fsim/control/pid_attitude/pitch/trim</property>
      <property value="-0.349043">fsim/control/pid_attitude/pitch/trim_lift</property>
      <property value="-2">fsim/control/pid_attitude/roll/eas_exponent</property>
      <property value="0.173005">fsim/control/pid_attitude/roll/kd</property>
      <property value="0.0">fsim/control/pid_attitude/roll/ki</property>
      <property value="0.69202">fsim/control/pid_attitude/roll/kp</property>
      <property value="0.424419">fsim/control/pid_attitude/roll/max_rate</property>
      <property value="2">fsim/control/pid_attitude/roll/tas_exponent</property>
      <property value="-1.26238">fsim/control/pid_attitude/rudder/beta_gain</property>
      <property value="142.855">fsim/control/pid_attitude/schedule/eas_ms</property>
      <property value="164.308">fsim/control/pid_attitude/schedule/tas_ms</property>
      <property value="0.515624">fsim/control/pid_attitude/throttle/feedforward</property>
      <property value="0.0880085">fsim/control/pid_position/altitude/gain</property>
      <property value="16.4308">fsim/control/pid_position/max_vertical_speed</property>
      <property value="0.523599">fsim/control/pid_velocity/max_bank</property>
      <property value="164.308">fsim/control/pid_velocity/schedule/tas_ms</property>
      <property value="-0.0400779">fsim/control/pid_velocity/vertical_speed/alpha_zero_lift</property>
      <property value="0.946878">fsim/control/pid_velocity/vertical_speed/command_lag</property>
      <property value="1">fsim/control/pid_velocity/vertical_speed/feedforward</property>
      <property value="0.000141421">fsim/control/pid_velocity/vertical_speed/ki</property>
      <property value="0.0016069">fsim/control/pid_velocity/vertical_speed/kp</property>
      <channel name="Pitch">
        <summer name="fcs/pitch-trim-sum">
          <input>fcs/elevator-cmd-norm</input>
          <input>fcs/pitch-trim-cmd-norm</input>
          <clipto> <min>-1</min> <max>1</max> </clipto>
        </summer>
        <aerosurface_scale name="fcs/elevator-control">
          <input>fcs/pitch-trim-sum</input>
          <range> <min>-30.00</min> <max>20.00</max> </range>
          <gain>0.0174533</gain>
        </aerosurface_scale>
        <actuator name="fcs/elevator-actuator">
          <input>fcs/elevator-control</input>
          <rate_limit>2.0</rate_limit>
          <output>fcs/elevator-pos-rad</output>
        </actuator>
      </channel>
      <channel name="Roll">
        <summer name="fcs/roll-trim-sum">
          <input>fcs/aileron-cmd-norm</input>
          <input>fcs/roll-trim-cmd-norm</input>
          <clipto> <min>-1</min> <max>1</max> </clipto>
        </summer>
        <aerosurface_scale name="fcs/left-aileron-control">
          <input>fcs/roll-trim-sum</input>
          <range> <min>-20.00</min> <max>20.00</max> </range>
          <gain>0.0174533</gain>
        </aerosurface_scale>
        <actuator name="fcs/left-aileron-actuator">
          <input>fcs/left-aileron-control</input>
          <rate_limit>2.0</rate_limit>
          <output>fcs/left-aileron-pos-rad</output>
        </actuator>
        <pure_gain name="fcs/right-aileron">
          <input>fcs/left-aileron-pos-rad</input>
          <gain>-1</gain>
          <output>fcs/right-aileron-pos-rad</output>
        </pure_gain>
      </channel>
      <channel name="Yaw">
        <summer name="fcs/yaw-trim-sum">
          <input>fcs/rudder-cmd-norm</input>
          <input>fcs/yaw-trim-cmd-norm</input>
          <clipto> <min>-1</min> <max>1</max> </clipto>
        </summer>
        <aerosurface_scale name="fcs/rudder-control">
          <input>fcs/yaw-trim-sum</input>
          <range> <min>-25.00</min> <max>25.00</max> </range>
          <gain>0.0174533</gain>
        </aerosurface_scale>
        <!-- the yaw damper (hangar/fcs.py yaw_damper): the yaw rate, washed out so a
             steady turn's is left alone, against itself through the rudder - the
             dutch roll damped to 0.30 at 1 g across the speed range -->
        <washout_filter name="fcs/yaw-damper-washout">
          <input>velocities/r-rad_sec</input>
          <c1>0.500</c1>
        </washout_filter>
        <fcs_function name="fcs/yaw-damper">
          <function>
            <product>
              <value>-1</value>
              <table>
                <independentVar lookup="row">aero/qbar-psf</independentVar>
                <tableData>
                  10.0   -3.00000
                  20.0   -3.00000
                  40.0   -3.00000
                  80.0   -3.00000
                 150.0   -1.60000
                 300.0   -0.30952
                 600.0   -0.12266
                1200.0   -0.07392
                2400.0   -0.06634
                </tableData>
              </table>
              <property>fcs/yaw-damper-washout</property>
            </product>
          </function>
          <clipto> <min>-0.21817</min> <max>0.21817</max> </clipto>
        </fcs_function>
        <summer name="fcs/rudder-sum">
          <input>fcs/rudder-control</input>
          <input>fcs/yaw-damper</input>
          <clipto> <min>-0.43633</min> <max>0.43633</max> </clipto>
        </summer>
        <actuator name="fcs/rudder-actuator">
          <input>fcs/rudder-sum</input>
          <rate_limit>2.0</rate_limit>
          <output>fcs/rudder-pos-rad</output>
        </actuator>
        <!-- the nose or tail wheel steers with the rudder pedals (JSBSim steers from
             fcs/steer-cmd-norm, positive right; the rudder command is positive left) -->
        <pure_gain name="fcs/steer-from-rudder">
          <input>fcs/yaw-trim-sum</input>
          <gain>-1</gain>
          <output>fcs/steer-cmd-norm</output>
        </pure_gain>
      </channel>
      <channel name="Flaps">
        <kinematic name="fcs/flaps-control">
          <input>fcs/flap-cmd-norm</input>
          <traverse>
            <setting> <position>0.0</position> <time>0.0</time> </setting>
            <setting> <position>12.5</position> <time>2.0</time> </setting>
            <setting> <position>25.0</position> <time>2.0</time> </setting>
            <setting> <position>37.5</position> <time>2.0</time> </setting>
            <setting> <position>50.0</position> <time>2.0</time> </setting>
          </traverse>
          <output>fcs/flap-pos-deg</output>
        </kinematic>
      </channel>
      <channel name="Landing Gear">
        <kinematic name="fcs/gear-control">
          <input>gear/gear-cmd-norm</input>
          <traverse>
            <setting> <position>0</position> <time>0</time> </setting>
            <setting> <position>1</position> <time>5</time> </setting>
          </traverse>
          <output>gear/gear-pos-norm</output>
        </kinematic>
      </channel>
    </flight_control>
    <aerodynamics>
        <function name="aero/function/mach-lift">
          <description>lift, and damping, over its low-speed value (hangar: aero/mach.py)</description>
          <table>
            <independentVar lookup="row">velocities/mach</independentVar>
            <tableData>
                 0.000     1.000000
                 0.300     1.025194
                 0.500     1.076403
                 0.600     1.117741
                 0.700     1.175458
                 0.800     1.259433
                 0.850     1.317434
                 0.900     1.392259
                 0.950     1.394419
                 1.000     1.393771
                 1.050     1.391381
                 1.100     1.388314
                 1.200     1.384415
            </tableData>
          </table>
        </function>
        <function name="aero/function/mach-side">
          <description>side force, rolling and yawing moment over their low-speed values</description>
          <table>
            <independentVar lookup="row">velocities/mach</independentVar>
            <tableData>
                 0.000     1.000000
                 0.300     1.016335
                 0.500     1.048781
                 0.600     1.074288
                 0.700     1.108960
                 0.800     1.157578
                 0.850     1.189911
                 0.900     1.229898
                 0.950     1.212189
                 1.000     1.172385
                 1.050     1.117850
                 1.100     1.055949
                 1.200     0.939513
            </tableData>
          </table>
        </function>
        <function name="aero/function/mach-dCm-dCL">
          <description>pitching moment per unit low-speed lift: the neutral point's move</description>
          <table>
            <independentVar lookup="row">velocities/mach</independentVar>
            <tableData>
                 0.000     0.000000
                 0.300    -0.014908
                 0.500    -0.046533
                 0.600    -0.073511
                 0.700    -0.113675
                 0.800    -0.178296
                 0.850    -0.228053
                 0.900    -0.299656
                 0.950    -0.329877
                 1.000    -0.355416
                 1.050    -0.377791
                 1.100    -0.398612
                 1.200    -0.442358
            </tableData>
          </table>
        </function>
        <function name="aero/function/mach-dCD0">
          <description>zero-lift drag's change: friction and wave drag</description>
          <table>
            <independentVar lookup="row">velocities/mach</independentVar>
            <tableData>
                 0.000     0.000000
                 0.300    -0.000113
                 0.500    -0.000308
                 0.600    -0.000438
                 0.700    -0.000587
                 0.800    -0.000656
                 0.850     0.000148
                 0.900     0.014700
                 0.950     0.081719
                 1.000     0.159604
                 1.050     0.196925
                 1.100     0.196819
                 1.200     0.196600
            </tableData>
          </table>
        </function>
        <function name="aero/function/mach-dK">
          <description>induced-drag factor's change (per CL^2)</description>
          <table>
            <independentVar lookup="row">velocities/mach</independentVar>
            <tableData>
                 0.000     0.000000
                 0.300     0.002494
                 0.500     0.007034
                 0.600     0.010254
                 0.700     0.014193
                 0.800     0.018986
                 0.850     0.021775
                 0.900     0.024871
                 0.950     0.024953
                 1.000     0.024929
                 1.050     0.034546
                 1.100     0.058076
                 1.200     0.113508
            </tableData>
          </table>
        </function>
        <function name="aero/function/mach-aileron">
          <description>aileron power over its low-speed value</description>
          <table>
            <independentVar lookup="row">velocities/mach</independentVar>
            <tableData>
                 0.000     1.000000
                 0.300     1.022893
                 0.500     1.068804
                 0.600     1.105210
                 0.700     1.154950
                 0.800     1.224770
                 0.850     1.271090
                 0.900     1.328765
                 0.950     1.259882
                 1.000     1.142531
                 1.050     0.992868
                 1.100     0.827049
                 1.200     0.511566
            </tableData>
          </table>
        </function>
        <function name="aero/function/mach-elevator">
          <description>elevator power over its low-speed value</description>
          <table>
            <independentVar lookup="row">velocities/mach</independentVar>
            <tableData>
                 0.000     1.000000
                 0.300     1.024420
                 0.500     1.074616
                 0.600     1.115781
                 0.700     1.174438
                 0.800     1.263028
                 0.850     1.327460
                 0.900     1.417374
                 0.950     1.356797
                 1.000     1.238585
                 1.050     1.081950
                 1.100     0.906103
                 1.200     0.573621
            </tableData>
          </table>
        </function>
        <function name="aero/function/mach-flap">
          <description>flap power over its low-speed value</description>
          <table>
            <independentVar lookup="row">velocities/mach</independentVar>
            <tableData>
                 0.000     1.000000
                 0.300     1.029364
                 0.500     1.089653
                 0.600     1.138889
                 0.700     1.208429
                 0.800     1.311173
                 0.850     1.383308
                 0.900     1.478589
                 0.950     1.417201
                 1.000     1.295812
                 1.050     1.134421
                 1.100     0.953030
                 1.200     0.610249
            </tableData>
          </table>
        </function>
        <function name="aero/function/mach-rudder">
          <description>rudder power over its low-speed value</description>
          <table>
            <independentVar lookup="row">velocities/mach</independentVar>
            <tableData>
                 0.000     1.000000
                 0.300     1.020817
                 0.500     1.063237
                 0.600     1.097675
                 0.700     1.146226
                 0.800     1.218384
                 0.850     1.269893
                 0.900     1.340036
                 0.950     1.280328
                 1.000     1.170890
                 1.050     1.028299
                 1.100     0.869131
                 1.200     0.567372
            </tableData>
          </table>
        </function>
        <function name="aero/function/CL-base">
          <description>CL over alpha and beta at low speed</description>
          <table>
            <independentVar lookup="row">aero/alpha-deg</independentVar>
            <independentVar lookup="column">aero/beta-deg</independentVar>
            <tableData>
                        -90.00    -70.00    -50.00    -40.00    -30.00    -25.00    -20.00    -15.00    -10.00     -6.00     -3.00      0.00      3.00      6.00     10.00     15.00     20.00     25.00     30.00     40.00     50.00     70.00     90.00
             -180.00  -0.00000  -0.00009  -0.00774   0.00457   0.00559   0.00226  -0.00080  -0.00271  -0.00406  -0.00472  -0.00500  -0.00509  -0.00500  -0.00472  -0.00406  -0.00271  -0.00080   0.00226   0.00559   0.00457  -0.00774  -0.00009  -0.00000
             -120.00  -0.00000   0.14672   0.37713   0.49968   0.61040   0.65777   0.69817   0.73064   0.75440   0.76746   0.77332   0.77365   0.77332   0.76746   0.75440   0.73064   0.69817   0.65777   0.61040   0.49968   0.37713   0.14672  -0.00000
              -70.00  -0.00000  -0.11389  -0.29960  -0.39975  -0.49093  -0.53014  -0.56369  -0.59071  -0.61052  -0.62086  -0.62462  -0.62392  -0.62462  -0.62086  -0.61052  -0.59071  -0.56369  -0.53014  -0.49093  -0.39975  -0.29960  -0.11389  -0.00000
              -46.00  -0.00000  -0.19541  -0.51314  -0.68291  -0.83227  -0.89497  -0.94803  -0.99052  -1.02105  -1.03135  -1.03576  -1.03721  -1.03576  -1.03135  -1.02105  -0.99052  -0.94803  -0.89497  -0.83227  -0.68291  -0.51314  -0.19541  -0.00000
              -32.00  -0.00000  -0.21102  -0.54413  -0.72024  -0.90474  -0.98338  -1.04678  -1.07602  -1.09275  -1.10127  -1.10485  -1.10604  -1.10485  -1.10127  -1.09275  -1.07602  -1.04678  -0.98338  -0.90474  -0.72024  -0.54413  -0.21102  -0.00000
              -22.00  -0.00000  -0.14344  -0.56722  -0.75062  -0.96131  -1.06357  -1.16395  -1.23252  -1.33613  -1.37361  -1.38744  -1.37766  -1.38744  -1.37361  -1.33613  -1.23252  -1.16395  -1.06357  -0.96131  -0.75062  -0.56722  -0.14344  -0.00000
              -17.00  -0.00000  -0.09702  -0.48293  -0.70355  -0.90246  -0.99066  -1.10188  -1.17047  -1.21903  -1.24379  -1.25417  -1.25761  -1.25417  -1.24379  -1.21903  -1.17047  -1.10188  -0.99066  -0.90246  -0.70355  -0.48293  -0.09702  -0.00000
              -13.00  -0.00000  -0.05655  -0.41712  -0.60134  -0.68792  -0.76319  -0.83587  -0.88610  -0.92188  -0.93990  -0.94737  -0.94982  -0.94737  -0.93990  -0.92188  -0.88610  -0.83587  -0.76319  -0.68792  -0.60134  -0.41712  -0.05655  -0.00000
               -9.00  -0.00000  -0.01411  -0.33784  -0.39341  -0.44554  -0.49829  -0.54743  -0.58321  -0.60838  -0.62075  -0.62573  -0.62734  -0.62573  -0.62075  -0.60838  -0.58321  -0.54743  -0.49829  -0.44554  -0.39341  -0.33784  -0.01411  -0.00000
               -5.00  -0.00000   0.00410  -0.17371  -0.16368  -0.19660  -0.22560  -0.25438  -0.27622  -0.29136  -0.29853  -0.30119  -0.30196  -0.30119  -0.29853  -0.29136  -0.27622  -0.25438  -0.22560  -0.19660  -0.16368  -0.17371   0.00410  -0.00000
               -1.00  -0.00000   0.00069   0.02151   0.05021   0.05655   0.05074   0.03978   0.03133   0.02540   0.02257   0.02158   0.02140   0.02158   0.02257   0.02540   0.03133   0.03978   0.05074   0.05655   0.05021   0.02151   0.00069  -0.00000
                3.00   0.00000   0.00036   0.20931   0.27157   0.31542   0.33057   0.33641   0.34090   0.34362   0.34453   0.34457   0.34443   0.34457   0.34453   0.34362   0.34090   0.33641   0.33057   0.31542   0.27157   0.20931   0.00036   0.00000
                7.00   0.00000   0.02569   0.40970   0.52885   0.59547   0.62702   0.64763   0.66532   0.67724   0.68274   0.68480   0.68542   0.68480   0.68274   0.67724   0.66532   0.64763   0.62702   0.59547   0.52885   0.40970   0.02569   0.00000
               11.00   0.00000   0.05979   0.43027   0.75928   0.85559   0.90505   0.93754   0.96811   0.98949   1.00006   1.00437   1.00579   1.00437   1.00006   0.98949   0.96811   0.93754   0.90505   0.85559   0.75928   0.43027   0.05979   0.00000
               15.00   0.00000   0.09853   0.51594   0.77698   1.06802   1.13442   1.18037   1.22729   1.26041   1.27708   1.28402   1.28632   1.28402   1.27708   1.26041   1.22729   1.18037   1.13442   1.06802   0.77698   0.51594   0.09853   0.00000
               19.00   0.00000   0.13642   0.59947   0.85101   1.00346   1.08594   1.17312   1.36047   1.41610   1.44369   1.45519   1.45901   1.45519   1.44369   1.41610   1.36047   1.17312   1.08594   1.00346   0.85101   0.59947   0.13642   0.00000
               23.00   0.00000   0.17125   0.62895   0.83813   1.00810   1.05834   1.10044   1.16084   1.20163   1.22185   1.22854   1.21684   1.22854   1.22185   1.20163   1.16084   1.10044   1.05834   1.00810   0.83813   0.62895   0.17125   0.00000
               27.00   0.00000   0.20272   0.57619   0.77146   0.91738   1.01810   1.05931   1.11392   1.15707   1.17943   1.18889   1.19205   1.18889   1.17943   1.15707   1.11392   1.05931   1.01810   0.91738   0.77146   0.57619   0.20272   0.00000
               32.00   0.00000   0.22793   0.55405   0.73421   0.86714   0.92463   0.98081   1.03359   1.07634   1.09848   1.10784   1.11097   1.10784   1.09848   1.07634   1.03359   0.98081   0.92463   0.86714   0.73421   0.55405   0.22793   0.00000
               46.00   0.00000   0.19688   0.51780   0.68943   0.83986   0.90267   0.95566   1.00032   1.02591   1.03751   1.04246   1.04409   1.04246   1.03751   1.02591   1.00032   0.95566   0.90267   0.83986   0.68943   0.51780   0.19688   0.00000
               70.00   0.00000   0.11423   0.30076   0.40138   0.49301   0.53241   0.56613   0.59329   0.61320   0.62359   0.62737   0.62668   0.62737   0.62359   0.61320   0.59329   0.56613   0.53241   0.49301   0.40138   0.30076   0.11423   0.00000
              120.00   0.00000  -0.14662  -0.37681  -0.49923  -0.60984  -0.65714  -0.69751  -0.72994  -0.75367  -0.76671  -0.77257  -0.77290  -0.77257  -0.76671  -0.75367  -0.72994  -0.69751  -0.65714  -0.60984  -0.49923  -0.37681  -0.14662   0.00000
              180.00  -0.00000  -0.00009  -0.00774   0.00457   0.00559   0.00226  -0.00080  -0.00271  -0.00406  -0.00472  -0.00500  -0.00509  -0.00500  -0.00472  -0.00406  -0.00271  -0.00080   0.00226   0.00559   0.00457  -0.00774  -0.00009  -0.00000
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            </tableData>
          </table>
        </function>
      <axis name="DRAG">
        <function name="aero/coefficient/CD_base">
          <description>CD over alpha and beta (hangar)</description>
          <product>
            <property>aero/qbar-psf</property>
            <property>metrics/Sw-sqft</property>
          <table>
            <independentVar lookup="row">aero/alpha-deg</independentVar>
            <independentVar lookup="column">aero/beta-deg</independentVar>
            <tableData>
                        -90.00    -70.00    -50.00    -40.00    -30.00    -25.00    -20.00    -15.00    -10.00     -6.00     -3.00      0.00      3.00      6.00     10.00     15.00     20.00     25.00     30.00     40.00     50.00     70.00     90.00
             -180.00   0.61134   0.51345   0.29437   0.18743   0.10364   0.07276   0.04955   0.03356   0.02180   0.01896   0.01857   0.01850   0.01857   0.01896   0.02180   0.03356   0.04955   0.07276   0.10364   0.18743   0.29437   0.51345   0.61134
             -120.00   0.61134   0.61765   0.75236   0.88830   1.04785   1.12668   1.19900   1.26053   1.30751   1.33241   1.34325   1.34704   1.34325   1.33241   1.30751   1.26053   1.19900   1.12668   1.04785   0.88830   0.75236   0.61765   0.61134
              -70.00   0.61134   0.64307   0.84946   1.03548   1.24683   1.34974   1.44356   1.52306   1.58361   1.61589   1.62967   1.63445   1.62967   1.61589   1.58361   1.52306   1.44356   1.34974   1.24683   1.03548   0.84946   0.64307   0.61134
              -46.00   0.61134   0.59716   0.62840   0.68654   0.76412   0.80514   0.84403   0.87905   0.90657   0.91398   0.91700   0.91796   0.91700   0.91398   0.90657   0.87905   0.84403   0.80514   0.76412   0.68654   0.62840   0.59716   0.61134
              -32.00   0.61134   0.56590   0.48539   0.46641   0.48038   0.49601   0.51690   0.50907   0.50272   0.49950   0.49814   0.49769   0.49814   0.49950   0.50272   0.50907   0.51690   0.49601   0.48038   0.46641   0.48539   0.56590   0.61134
              -22.00   0.61134   0.54798   0.39768   0.33507   0.30370   0.31020   0.28726   0.26161   0.23336   0.22145   0.21678   0.21403   0.21678   0.22145   0.23336   0.26161   0.28726   0.31020   0.30370   0.33507   0.39768   0.54798   0.61134
              -17.00   0.61134   0.54075   0.36469   0.27892   0.20926   0.19024   0.17016   0.14910   0.13251   0.12372   0.11997   0.11871   0.11997   0.12372   0.13251   0.14910   0.17016   0.19024   0.20926   0.27892   0.36469   0.54075   0.61134
              -13.00   0.61134   0.53591   0.34208   0.23363   0.17501   0.15013   0.12455   0.10340   0.08823   0.08049   0.07725   0.07617   0.07725   0.08049   0.08823   0.10340   0.12455   0.15013   0.17501   0.23363   0.34208   0.53591   0.61134
               -9.00   0.61134   0.53200   0.32106   0.20850   0.14849   0.11416   0.08870   0.06905   0.05527   0.04843   0.04562   0.04469   0.04562   0.04843   0.05527   0.06905   0.08870   0.11416   0.14849   0.20850   0.32106   0.53200   0.61134
               -5.00   0.61134   0.52978   0.31483   0.19683   0.13311   0.09201   0.06659   0.04753   0.03448   0.02821   0.02572   0.02492   0.02572   0.02821   0.03448   0.04753   0.06659   0.09201   0.13311   0.19683   0.31483   0.52978   0.61134
               -1.00   0.61134   0.52910   0.31172   0.19181   0.12814   0.08468   0.05875   0.03939   0.02629   0.02015   0.01781   0.01709   0.01781   0.02015   0.02629   0.03939   0.05875   0.08468   0.12814   0.19181   0.31172   0.52910   0.61134
                3.00   0.61134   0.52884   0.31565   0.20117   0.13582   0.09310   0.06579   0.04530   0.03122   0.02457   0.02193   0.02108   0.02193   0.02457   0.03122   0.04530   0.06579   0.09310   0.13582   0.20117   0.31565   0.52884   0.61134
                7.00   0.61134   0.53063   0.32973   0.24102   0.16854   0.12291   0.09597   0.07130   0.05431   0.04659   0.04272   0.04007   0.04272   0.04659   0.05431   0.07130   0.09597   0.12291   0.16854   0.24102   0.32973   0.53063   0.61134
               11.00   0.61134   0.53382   0.34461   0.27651   0.21675   0.17297   0.14036   0.11065   0.08908   0.07776   0.07276   0.07067   0.07276   0.07776   0.08908   0.11065   0.14036   0.17297   0.21675   0.27651   0.34461   0.53382   0.61134
               15.00   0.61134   0.53817   0.36195   0.30894   0.28318   0.23413   0.19298   0.15751   0.13073   0.11618   0.10967   0.10740   0.10967   0.11618   0.13073   0.15751   0.19298   0.23413   0.28318   0.30894   0.36195   0.53817   0.61134
               19.00   0.61134   0.54345   0.38056   0.33912   0.33333   0.30491   0.27266   0.24917   0.20095   0.17452   0.16231   0.15856   0.16231   0.17452   0.20095   0.24917   0.27266   0.30491   0.33333   0.33912   0.38056   0.54345   0.61134
               23.00   0.61134   0.54954   0.40620   0.36617   0.37025   0.34004   0.30955   0.28678   0.27045   0.26349   0.26223   0.25536   0.26223   0.26349   0.27045   0.28678   0.30955   0.34004   0.37025   0.36617   0.40620   0.54954   0.61134
               27.00   0.61134   0.55633   0.44011   0.40849   0.39628   0.39950   0.37173   0.35808   0.34972   0.34484   0.34274   0.34214   0.34274   0.34484   0.34972   0.35808   0.37173   0.39950   0.39628   0.40849   0.44011   0.55633   0.61134
               32.00   0.61134   0.56584   0.48509   0.46822   0.46639   0.47541   0.46655   0.46509   0.46683   0.46818   0.46886   0.46912   0.46886   0.46818   0.46683   0.46509   0.46655   0.47541   0.46639   0.46822   0.48509   0.56584   0.61134
               46.00   0.61134   0.59709   0.62800   0.68581   0.76231   0.80218   0.83964   0.87667   0.89542   0.90398   0.90748   0.90857   0.90748   0.90398   0.89542   0.87667   0.83964   0.80218   0.76231   0.68581   0.62800   0.59709   0.61134
               70.00   0.61134   0.64303   0.84920   1.03505   1.24621   1.34903   1.44277   1.52220   1.58270   1.61495   1.62872   1.63350   1.62872   1.61495   1.58270   1.52220   1.44277   1.34903   1.24621   1.03505   0.84920   0.64303   0.61134
              120.00   0.61134   0.61771   0.75270   0.88888   1.04868   1.12764   1.20006   1.26169   1.30873   1.33367   1.34453   1.34832   1.34453   1.33367   1.30873   1.26169   1.20006   1.12764   1.04868   0.88888   0.75270   0.61771   0.61134
              180.00   0.61134   0.51345   0.29437   0.18743   0.10364   0.07276   0.04955   0.03356   0.02180   0.01896   0.01857   0.01850   0.01857   0.01896   0.02180   0.03356   0.04955   0.07276   0.10364   0.18743   0.29437   0.51345   0.61134
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            </tableData>
          </table>
          </product>
        </function>
        <function name="aero/coefficient/CD_mach">
          <description>zero-lift drag's change with Mach: friction, wave drag</description>
          <product>
            <property>aero/qbar-psf</property>
            <property>metrics/Sw-sqft</property>
            <property>aero/function/mach-dCD0</property>
          </product>
        </function>
        <function name="aero/coefficient/CD_induced_mach">
          <description>induced drag's change with Mach (leading-edge suction lost)</description>
          <product>
            <property>aero/qbar-psf</property>
            <property>metrics/Sw-sqft</property>
            <property>aero/cl-squared</property>
            <property>aero/function/mach-dK</property>
          </product>
        </function>
        <function name="aero/coefficient/CD_aileron">
          <description>CD increment from aileron (deg), over alpha</description>
          <product>
            <property>aero/qbar-psf</property>
            <property>metrics/Sw-sqft</property>
            <property>aero/function/mach-aileron</property>
          <table>
            <independentVar lookup="row">aero/alpha-deg</independentVar>
            <independentVar lookup="column">fcs/left-aileron-pos-deg</independentVar>
            <tableData>
                        -20.00    -15.00    -10.00     -5.00      0.00      5.00     10.00     15.00     20.00
             -180.00   0.00305   0.00175   0.00079   0.00020   0.00000   0.00020   0.00079   0.00175   0.00305
             -120.00   0.00300   0.00172   0.00077   0.00020   0.00000   0.00020   0.00077   0.00172   0.00300
              -70.00   0.00299   0.00172   0.00077   0.00019   0.00000   0.00019   0.00077   0.00172   0.00299
              -46.00   0.00718   0.00467   0.00240   0.00064   0.00000   0.00064   0.00240   0.00467   0.00718
              -32.00   0.01464   0.01007   0.00535   0.00149   0.00000   0.00149   0.00535   0.01007   0.01464
              -22.00   0.03469   0.02476   0.01407   0.00506   0.00000   0.00506   0.01407   0.02476   0.03469
              -17.00   0.00586   0.00362   0.00172   0.00043   0.00000   0.00043   0.00172   0.00362   0.00586
              -13.00   0.00704   0.00453   0.00228   0.00061   0.00000   0.00061   0.00228   0.00453   0.00704
               -9.00   0.00752   0.00486   0.00245   0.00066   0.00000   0.00066   0.00245   0.00486   0.00752
               -5.00   0.00775   0.00503   0.00254   0.00069   0.00000   0.00069   0.00254   0.00503   0.00775
               -1.00   0.00776   0.00503   0.00255   0.00069   0.00000   0.00069   0.00255   0.00503   0.00776
                3.00   0.00752   0.00487   0.00246   0.00067   0.00000   0.00067   0.00246   0.00487   0.00752
                7.00   0.00710   0.00458   0.00231   0.00062   0.00000   0.00062   0.00231   0.00458   0.00710
               11.00   0.00661   0.00423   0.00212   0.00057   0.00000   0.00057   0.00212   0.00423   0.00661
               15.00   0.01966   0.01070   0.00403   0.00082   0.00000   0.00082   0.00403   0.01070   0.01966
               19.00   0.08171   0.06349   0.03763   0.01133   0.00000   0.01133   0.03763   0.06349   0.08171
               23.00   0.06121   0.03884   0.02343   0.01424   0.00000   0.01424   0.02343   0.03884   0.06121
               27.00   0.02818   0.01938   0.01035   0.00289   0.00000   0.00289   0.01035   0.01938   0.02818
               32.00   0.01971   0.01362   0.00733   0.00205   0.00000   0.00205   0.00733   0.01362   0.01971
               46.00   0.00824   0.00539   0.00284   0.00077   0.00000   0.00077   0.00284   0.00539   0.00824
               70.00   0.00299   0.00172   0.00077   0.00019   0.00000   0.00019   0.00077   0.00172   0.00299
              120.00   0.00300   0.00172   0.00077   0.00020   0.00000   0.00020   0.00077   0.00172   0.00300
              180.00   0.00305   0.00175   0.00079   0.00020   0.00000   0.00020   0.00079   0.00175   0.00305
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            </tableData>
          </table>
          </product>
        </function>
        <function name="aero/coefficient/CD_elevator">
          <description>CD increment from elevator (deg), over alpha</description>
          <product>
            <property>aero/qbar-psf</property>
            <property>metrics/Sw-sqft</property>
            <property>aero/function/mach-elevator</property>
          <table>
            <independentVar lookup="row">aero/alpha-deg</independentVar>
            <independentVar lookup="column">fcs/elevator-pos-deg</independentVar>
            <tableData>
                        -30.00    -25.00    -20.00    -15.00    -10.00     -5.00      0.00      5.00     10.00     15.00     20.00
             -180.00   0.00689   0.00492   0.00323   0.00185   0.00083   0.00021   0.00000   0.00021   0.00083   0.00185   0.00323
             -120.00   0.00678   0.00484   0.00317   0.00182   0.00082   0.00021   0.00000   0.00021   0.00082   0.00182   0.00317
              -70.00   0.00676   0.00483   0.00316   0.00181   0.00082   0.00021   0.00000   0.00021   0.00082   0.00181   0.00316
              -46.00  -0.00370  -0.00419  -0.00441  -0.00427  -0.00363  -0.00226   0.00000   0.00320   0.00718   0.01156   0.01613
              -32.00  -0.00600  -0.00581  -0.00540  -0.00478  -0.00391  -0.00252   0.00000   0.00412   0.00978   0.01639   0.02341
              -22.00   0.01662   0.01414   0.01194   0.00978   0.00700   0.00337   0.00000  -0.00163  -0.00064   0.00287   0.00789
              -17.00   0.03168   0.02821   0.02446   0.01993   0.01411   0.00716   0.00000  -0.00623  -0.01073  -0.01307  -0.01364
              -13.00   0.03128   0.02745   0.02350   0.01894   0.01324   0.00656   0.00000  -0.00541  -0.00903  -0.01064  -0.01069
               -9.00   0.02869   0.02493   0.02111   0.01677   0.01149   0.00553   0.00000  -0.00423  -0.00671  -0.00743  -0.00686
               -5.00   0.02483   0.02122   0.01762   0.01367   0.00908   0.00419   0.00000  -0.00278  -0.00392  -0.00362  -0.00237
               -1.00   0.01991   0.01654   0.01328   0.00987   0.00618   0.00261   0.00000  -0.00114  -0.00079   0.00060   0.00256
                3.00   0.01418   0.01115   0.00832   0.00558   0.00294   0.00086   0.00000   0.00063   0.00252   0.00502   0.00769
                7.00   0.00867   0.00596   0.00353   0.00143  -0.00018  -0.00081   0.00000   0.00227   0.00555   0.00901   0.01223
               11.00   0.00386   0.00150  -0.00050  -0.00201  -0.00272  -0.00214   0.00000   0.00354   0.00784   0.01198   0.01561
               15.00  -0.00090  -0.00286  -0.00440  -0.00528  -0.00509  -0.00336   0.00000   0.00465   0.00983   0.01454   0.01850
               19.00  -0.00752  -0.00908  -0.01008  -0.01013  -0.00866  -0.00522   0.00000   0.00640   0.01301   0.01873   0.02334
               23.00  -0.01319  -0.01440  -0.01489  -0.01416  -0.01154  -0.00667   0.00000   0.00769   0.01538   0.02202   0.02758
               27.00   0.02049   0.01377   0.00202  -0.00952  -0.01144  -0.00713   0.00000   0.00813   0.01609   0.02302   0.02882
               32.00   0.02767   0.02109   0.01484   0.00886   0.00352   0.00006   0.00000   0.00418   0.01202   0.02255   0.03209
               46.00   0.02219   0.01724   0.01267   0.00843   0.00464   0.00169   0.00000  -0.00036   0.00030   0.00145   0.00277
               70.00   0.00676   0.00483   0.00316   0.00181   0.00082   0.00021   0.00000   0.00021   0.00082   0.00181   0.00316
              120.00   0.00678   0.00484   0.00317   0.00182   0.00082   0.00021   0.00000   0.00021   0.00082   0.00182   0.00317
              180.00   0.00689   0.00492   0.00323   0.00185   0.00083   0.00021   0.00000   0.00021   0.00083   0.00185   0.00323
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            </tableData>
          </table>
          </product>
        </function>
        <function name="aero/coefficient/CD_flap">
          <description>CD increment from flap (deg), over alpha</description>
          <product>
            <property>aero/qbar-psf</property>
            <property>metrics/Sw-sqft</property>
            <property>aero/function/mach-flap</property>
          <table>
            <independentVar lookup="row">aero/alpha-deg</independentVar>
            <independentVar lookup="column">fcs/flap-pos-deg</independentVar>
            <tableData>
                          0.00      5.00     10.00     15.00     20.00     25.00     30.00     35.00     40.00     45.00     50.00
             -180.00   0.00000   0.00032   0.00126   0.00281   0.00490   0.00749   0.01048   0.01379   0.01732   0.02096   0.02460
             -120.00   0.00000   0.00031   0.00124   0.00276   0.00482   0.00736   0.01031   0.01356   0.01703   0.02061   0.02419
              -70.00   0.00000   0.00031   0.00124   0.00275   0.00481   0.00734   0.01027   0.01352   0.01698   0.02055   0.02412
              -46.00   0.00000   0.01251   0.02780   0.04534   0.06435   0.08427   0.10491   0.12639   0.14832   0.16841   0.18913
              -32.00   0.00000   0.02154   0.04996   0.08357   0.11984   0.15679   0.19363   0.22929   0.26436   0.29527   0.32418
              -22.00   0.00000  -0.01817  -0.03061  -0.04276  -0.05235  -0.05811  -0.06023  -0.05956  -0.05666  -0.05213  -0.04656
              -17.00   0.00000  -0.00895  -0.01503  -0.01820  -0.01871  -0.01705  -0.01371  -0.00888  -0.00165   0.00660   0.01536
              -13.00   0.00000  -0.00602  -0.00932  -0.00978  -0.00769  -0.00357   0.00214   0.00918   0.01745   0.02619   0.03576
               -9.00   0.00000  -0.00329  -0.00376  -0.00149   0.00309   0.00941   0.01707   0.02589   0.03585   0.04596   0.05687
               -5.00   0.00000  -0.00046   0.00191   0.00684   0.01375   0.02206   0.03142   0.04175   0.05310   0.06429   0.07620
               -1.00   0.00000   0.00238   0.00750   0.01492   0.02394   0.03396   0.04474   0.05626   0.06864   0.08057   0.09313
                3.00   0.00000   0.00524   0.01306   0.02283   0.03377   0.04530   0.05726   0.06971   0.08284   0.09519   0.10798
                7.00   0.00000   0.00899   0.02044   0.03352   0.04728   0.06111   0.07483   0.08837   0.10185   0.11432   0.12803
               11.00   0.00000   0.01194   0.02609   0.04125   0.05599   0.07030   0.08589   0.10500   0.12928   0.15425   0.18193
               15.00   0.00000   0.01318   0.02806   0.04654   0.07312   0.10636   0.14113   0.17474   0.20668   0.23221   0.25675
               19.00   0.00000   0.01963   0.05847   0.10352   0.14338   0.17678   0.20668   0.23500   0.26294   0.28611   0.30942
               23.00   0.00000   0.00181   0.03867   0.08144   0.12487   0.16841   0.20894   0.24639   0.28102   0.30739   0.33188
               27.00   0.00000  -0.00847  -0.00347   0.01430   0.04447   0.09659   0.15649   0.19793   0.22889   0.25830   0.28938
               32.00   0.00000  -0.01623  -0.02311  -0.02172  -0.01440  -0.00330   0.01047   0.02674   0.04590   0.06898   0.10628
               46.00   0.00000  -0.01047  -0.01771  -0.02198  -0.02387  -0.02405  -0.02300  -0.02099  -0.01817  -0.01522  -0.01186
               70.00   0.00000   0.00031   0.00124   0.00275   0.00481   0.00734   0.01027   0.01352   0.01698   0.02055   0.02412
              120.00   0.00000   0.00031   0.00124   0.00276   0.00482   0.00736   0.01031   0.01356   0.01703   0.02061   0.02419
              180.00   0.00000   0.00032   0.00126   0.00281   0.00490   0.00749   0.01048   0.01379   0.01732   0.02096   0.02460
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            </tableData>
          </table>
          </product>
        </function>
        <function name="aero/coefficient/CD_rudder">
          <description>CD increment from rudder (deg), over alpha</description>
          <product>
            <property>aero/qbar-psf</property>
            <property>metrics/Sw-sqft</property>
            <property>aero/function/mach-rudder</property>
          <table>
            <independentVar lookup="row">aero/alpha-deg</independentVar>
            <independentVar lookup="column">fcs/rudder-pos-deg</independentVar>
            <tableData>
                        -25.00    -20.00    -15.00    -10.00     -5.00      0.00      5.00     10.00     15.00     20.00     25.00
             -180.00   0.00544   0.00357   0.00204   0.00092   0.00023   0.00000   0.00023   0.00092   0.00204   0.00357   0.00544
             -120.00   0.00068   0.00045   0.00026   0.00011   0.00003   0.00000   0.00003   0.00011   0.00026   0.00045   0.00068
              -70.00   0.00023   0.00015   0.00009   0.00004   0.00001   0.00000   0.00001   0.00004   0.00009   0.00015   0.00023
              -46.00   0.00967   0.00757   0.00528   0.00282   0.00078   0.00000   0.00078   0.00282   0.00528   0.00757   0.00967
              -32.00   0.01149   0.00876   0.00597   0.00314   0.00087   0.00000   0.00087   0.00314   0.00597   0.00876   0.01149
              -22.00   0.01600   0.01259   0.00907   0.00545   0.00247   0.00000   0.00247   0.00545   0.00907   0.01259   0.01600
              -17.00   0.01347   0.01014   0.00683   0.00356   0.00098   0.00000   0.00098   0.00356   0.00683   0.01014   0.01347
              -13.00   0.01387   0.01041   0.00698   0.00363   0.00100   0.00000   0.00100   0.00363   0.00698   0.01041   0.01387
               -9.00   0.01406   0.01053   0.00704   0.00365   0.00100   0.00000   0.00100   0.00365   0.00704   0.01053   0.01406
               -5.00   0.01407   0.01052   0.00703   0.00364   0.00100   0.00000   0.00100   0.00364   0.00703   0.01052   0.01407
               -1.00   0.01392   0.01039   0.00692   0.00358   0.00098   0.00000   0.00098   0.00358   0.00692   0.01039   0.01392
                3.00   0.01359   0.01013   0.00674   0.00348   0.00095   0.00000   0.00095   0.00348   0.00674   0.01013   0.01359
                7.00   0.01311   0.00976   0.00649   0.00335   0.00092   0.00000   0.00092   0.00335   0.00649   0.00976   0.01311
               11.00   0.01249   0.00928   0.00616   0.00318   0.00087   0.00000   0.00087   0.00318   0.00616   0.00928   0.01249
               15.00   0.01174   0.00872   0.00578   0.00298   0.00081   0.00000   0.00081   0.00298   0.00578   0.00872   0.01174
               19.00   0.01090   0.00809   0.00536   0.00276   0.00075   0.00000   0.00075   0.00276   0.00536   0.00809   0.01090
               23.00   0.01005   0.00746   0.00494   0.00254   0.00070   0.00000   0.00070   0.00254   0.00494   0.00746   0.01005
               27.00   0.00899   0.00666   0.00440   0.00226   0.00062   0.00000   0.00062   0.00226   0.00440   0.00666   0.00899
               32.00   0.00776   0.00576   0.00381   0.00196   0.00054   0.00000   0.00054   0.00196   0.00381   0.00576   0.00776
               46.00   0.00870   0.00674   0.00465   0.00246   0.00069   0.00000   0.00069   0.00246   0.00465   0.00674   0.00870
               70.00   0.00023   0.00015   0.00009   0.00004   0.00001   0.00000   0.00001   0.00004   0.00009   0.00015   0.00023
              120.00   0.00068   0.00045   0.00026   0.00011   0.00003   0.00000   0.00003   0.00011   0.00026   0.00045   0.00068
              180.00   0.00544   0.00357   0.00204   0.00092   0.00023   0.00000   0.00023   0.00092   0.00204   0.00357   0.00544
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            </tableData>
          </table>
          </product>
        </function>
        <function name="aero/coefficient/CD_ground">
          <description>Induced drag change in ground effect</description>
          <product>
            <property>aero/qbar-psf</property>
            <property>metrics/Sw-sqft</property>
            <property>aero/cl-squared</property>
            <value>0.05361</value>
          <table>
            <independentVar lookup="row">aero/h_b-mac-ft</independentVar>
            <tableData>
                    0.00   -1.00000
                    0.10   -0.28090
                    0.15   -0.14793
                    0.20   -0.08897
                    0.30   -0.04160
                    0.40   -0.02383
                    0.50   -0.01538
                    0.60   -0.01073
                    0.70   -0.00791
                    0.80   -0.00607
                    0.90   -0.00480
                    1.00   -0.00389
                    1.10   -0.00322
            </tableData>
          </table>
          </product>
        </function>
      </axis>
      <axis name="SIDE">
        <function name="aero/coefficient/CY_base">
          <description>CY over alpha and beta (hangar)</description>
          <product>
            <property>aero/qbar-psf</property>
            <property>metrics/Sw-sqft</property>
            <property>aero/function/mach-side</property>
          <table>
            <independentVar lookup="row">aero/alpha-deg</independentVar>
            <independentVar lookup="column">aero/beta-deg</independentVar>
            <tableData>
                        -90.00    -70.00    -50.00    -40.00    -30.00    -25.00    -20.00    -15.00    -10.00     -6.00     -3.00      0.00      3.00      6.00     10.00     15.00     20.00     25.00     30.00     40.00     50.00     70.00     90.00
             -180.00  -0.00000   0.18451   0.27252   0.25077   0.19103   0.15459   0.11724   0.08126   0.07590   0.07646   0.03988  -0.00000  -0.03988  -0.07646  -0.07590  -0.08126  -0.11724  -0.15459  -0.19103  -0.25077  -0.27252  -0.18451   0.00000
             -120.00  -0.00000  -0.04692  -0.22556  -0.29443  -0.31010  -0.29310  -0.25925  -0.20994  -0.14775  -0.08871  -0.03354  -0.00000   0.03354   0.08871   0.14775   0.20994   0.25925   0.29310   0.31010   0.29443   0.22556   0.04692   0.00000
              -70.00   0.00000  -0.08841  -0.31464  -0.39442  -0.40590  -0.38050  -0.33410  -0.26820  -0.18536  -0.10814  -0.04670  -0.00000   0.04670   0.10814   0.18536   0.26820   0.33410   0.38050   0.40590   0.39442   0.31464   0.08841  -0.00000
              -46.00   0.00000   0.02432  -0.06832  -0.11609  -0.13407  -0.12684  -0.10720  -0.07261  -0.02264  -0.01552  -0.00794  -0.00000   0.00794   0.01552   0.02264   0.07261   0.10720   0.12684   0.13407   0.11609   0.06832  -0.02432  -0.00000
              -32.00   0.00000   0.09364   0.08304   0.04969   0.01343   0.00756   0.04373   0.02926   0.01671   0.00919   0.00445  -0.00000  -0.00445  -0.00919  -0.01671  -0.02926  -0.04373  -0.00756  -0.01343  -0.04969  -0.08304  -0.09364  -0.00000
              -22.00   0.00000   0.15339   0.16742   0.13690   0.08798   0.09466   0.08486   0.05800   0.03651   0.02129   0.01074  -0.00000  -0.01074  -0.02129  -0.03651  -0.05800  -0.08486  -0.09466  -0.08798  -0.13690  -0.16742  -0.15339  -0.00000
              -17.00   0.00000   0.18261   0.21151   0.17974   0.12927   0.14641   0.11651   0.08368   0.05318   0.03087   0.01518  -0.00000  -0.01518  -0.03087  -0.05318  -0.08368  -0.11651  -0.14641  -0.12927  -0.17974  -0.21151  -0.18261  -0.00000
              -13.00   0.00000   0.20452   0.24968   0.21001   0.16337   0.17616   0.14223   0.10363   0.06654   0.03880   0.01911  -0.00000  -0.01911  -0.03880  -0.06654  -0.10363  -0.14223  -0.17616  -0.16337  -0.21001  -0.24968  -0.20452  -0.00000
               -9.00   0.00000   0.22470   0.28308   0.23055   0.19216   0.20039   0.16210   0.11860   0.07623   0.04435   0.02178  -0.00000  -0.02178  -0.04435  -0.07623  -0.11860  -0.16210  -0.20039  -0.19216  -0.23055  -0.28308  -0.22470  -0.00000
               -5.00   0.00000   0.23154   0.29882   0.24632   0.21449   0.21769   0.17607   0.12900   0.08274   0.04782   0.02331  -0.00000  -0.02331  -0.04782  -0.08274  -0.12900  -0.17607  -0.21769  -0.21449  -0.24632  -0.29882  -0.23154  -0.00000
               -1.00   0.00000   0.22952   0.30037   0.25182   0.23067   0.22820   0.18446   0.13532   0.08669   0.04978   0.02396  -0.00000  -0.02396  -0.04978  -0.08669  -0.13532  -0.18446  -0.22820  -0.23067  -0.25182  -0.30037  -0.22952  -0.00000
                3.00   0.00000   0.23177   0.30070   0.25239   0.24024   0.23258   0.18809   0.13842   0.08907   0.05145   0.02496  -0.00000  -0.02496  -0.05145  -0.08907  -0.13842  -0.18809  -0.23258  -0.24024  -0.25239  -0.30070  -0.23177  -0.00000
                7.00   0.00000   0.22251   0.29060   0.25145   0.24616   0.23451   0.19049   0.14132   0.09216   0.05416   0.02673  -0.00000  -0.02673  -0.05416  -0.09216  -0.14132  -0.19049  -0.23451  -0.24616  -0.25145  -0.29060  -0.22251  -0.00000
               11.00   0.00000   0.20701   0.25440   0.24150   0.24623   0.23406   0.19168   0.14339   0.09458   0.05617   0.02792  -0.00000  -0.02792  -0.05617  -0.09458  -0.14339  -0.19168  -0.23406  -0.24623  -0.24150  -0.25440  -0.20701  -0.00000
               15.00   0.00000   0.18685   0.22009   0.20399   0.21857   0.22453   0.18606   0.13962   0.09246   0.05510   0.02746  -0.00000  -0.02746  -0.05510  -0.09246  -0.13962  -0.18606  -0.22453  -0.21857  -0.20399  -0.22009  -0.18685  -0.00000
               19.00   0.00000   0.16449   0.17837   0.15678   0.16156   0.15241   0.13889   0.12111   0.08001   0.04764   0.02376  -0.00000  -0.02376  -0.04764  -0.08001  -0.12111  -0.13889  -0.15241  -0.16156  -0.15678  -0.17837  -0.16449  -0.00000
               23.00   0.00000   0.14097   0.14639   0.11667   0.12791   0.11786   0.09710   0.07569   0.04882   0.02453   0.00723  -0.00000  -0.00723  -0.02453  -0.04882  -0.07569  -0.09710  -0.11786  -0.12791  -0.11667  -0.14639  -0.14097  -0.00000
               27.00   0.00000   0.11658   0.12384   0.09448   0.08946   0.11383   0.09764   0.07251   0.04694   0.02753   0.01338  -0.00000  -0.01338  -0.02753  -0.04694  -0.07251  -0.09764  -0.11383  -0.08946  -0.09448  -0.12384  -0.11658  -0.00000
               32.00   0.00000   0.08809   0.08264   0.05026   0.04170   0.05192   0.06613   0.04325   0.02515   0.01391   0.00653  -0.00000  -0.00653  -0.01391  -0.02515  -0.04325  -0.06613  -0.05192  -0.04170  -0.05026  -0.08264  -0.08809  -0.00000
               46.00   0.00000   0.02429  -0.06799  -0.11574  -0.13349  -0.12561  -0.10484  -0.05745  -0.03130  -0.02067  -0.01024  -0.00000   0.01024   0.02067   0.03130   0.05745   0.10484   0.12561   0.13349   0.11574   0.06799  -0.02429  -0.00000
               70.00   0.00000  -0.08832  -0.31435  -0.39407  -0.40555  -0.38018  -0.33382  -0.26798  -0.18520  -0.10805  -0.04665  -0.00000   0.04665   0.10805   0.18520   0.26798   0.33382   0.38018   0.40555   0.39407   0.31435   0.08832  -0.00000
              120.00  -0.00000  -0.04707  -0.22597  -0.29491  -0.31058  -0.29354  -0.25964  -0.21025  -0.14796  -0.08884  -0.03361  -0.00000   0.03361   0.08884   0.14796   0.21025   0.25964   0.29354   0.31058   0.29491   0.22597   0.04707   0.00000
              180.00  -0.00000   0.18451   0.27252   0.25077   0.19103   0.15459   0.11724   0.08126   0.07590   0.07646   0.03988  -0.00000  -0.03988  -0.07646  -0.07590  -0.08126  -0.11724  -0.15459  -0.19103  -0.25077  -0.27252  -0.18451   0.00000
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            </tableData>
          </table>
          </product>
        </function>
        <function name="aero/coefficient/CY_aileron">
          <description>CY increment from aileron (deg), over alpha</description>
          <product>
            <property>aero/qbar-psf</property>
            <property>metrics/Sw-sqft</property>
            <property>aero/function/mach-aileron</property>
          <table>
            <independentVar lookup="row">aero/alpha-deg</independentVar>
            <independentVar lookup="column">fcs/left-aileron-pos-deg</independentVar>
            <tableData>
                        -20.00    -15.00    -10.00     -5.00      0.00      5.00     10.00     15.00     20.00
             -180.00   0.00000   0.00000   0.00000   0.00000   0.00000   0.00000   0.00000   0.00000   0.00000
             -120.00   0.00175   0.00148   0.00110   0.00058   0.00000  -0.00058  -0.00110  -0.00148  -0.00175
              -70.00  -0.00054  -0.00046  -0.00034  -0.00018   0.00000   0.00018   0.00034   0.00046   0.00054
              -46.00  -0.00162  -0.00153  -0.00122  -0.00068   0.00000   0.00068   0.00122   0.00153   0.00162
              -32.00  -0.00453  -0.00409  -0.00319  -0.00175   0.00000   0.00175   0.00319   0.00409   0.00453
              -22.00  -0.00851  -0.00715  -0.00515  -0.00245   0.00000   0.00245   0.00515   0.00715   0.00851
              -17.00  -0.00991  -0.00849  -0.00633  -0.00339   0.00000   0.00339   0.00633   0.00849   0.00991
              -13.00  -0.01043  -0.00892  -0.00664  -0.00354   0.00000   0.00354   0.00664   0.00892   0.01043
               -9.00  -0.01045  -0.00893  -0.00665  -0.00354   0.00000   0.00354   0.00665   0.00893   0.01045
               -5.00  -0.01041  -0.00890  -0.00662  -0.00353   0.00000   0.00353   0.00662   0.00890   0.01041
               -1.00  -0.01037  -0.00886  -0.00659  -0.00351   0.00000   0.00351   0.00659   0.00886   0.01037
                3.00  -0.01030  -0.00879  -0.00653  -0.00348   0.00000   0.00348   0.00653   0.00879   0.01030
                7.00  -0.01037  -0.00883  -0.00656  -0.00349   0.00000   0.00349   0.00656   0.00883   0.01037
               11.00  -0.01092  -0.00932  -0.00693  -0.00369   0.00000   0.00369   0.00693   0.00932   0.01092
               15.00  -0.01247  -0.01058  -0.00782  -0.00414   0.00000   0.00414   0.00782   0.01058   0.01247
               19.00  -0.01828  -0.01597  -0.01221  -0.00672   0.00000   0.00672   0.01221   0.01597   0.01828
               23.00  -0.05386  -0.04494  -0.03523  -0.02439   0.00000   0.02439   0.03523   0.04494   0.05386
               27.00  -0.03701  -0.03071  -0.02269  -0.01210   0.00000   0.01210   0.02269   0.03071   0.03701
               32.00  -0.02556  -0.02179  -0.01630  -0.00878   0.00000   0.00878   0.01630   0.02179   0.02556
               46.00  -0.00451  -0.00394  -0.00297  -0.00160   0.00000   0.00160   0.00297   0.00394   0.00451
               70.00  -0.00062  -0.00052  -0.00039  -0.00021   0.00000   0.00021   0.00039   0.00052   0.00062
              120.00   0.00176   0.00150   0.00111   0.00059   0.00000  -0.00059  -0.00111  -0.00150  -0.00176
              180.00   0.00000   0.00000   0.00000   0.00000   0.00000   0.00000   0.00000   0.00000   0.00000
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            </tableData>
          </table>
          </product>
        </function>
        <function name="aero/coefficient/CY_rudder">
          <description>CY increment from rudder (deg), over alpha</description>
          <product>
            <property>aero/qbar-psf</property>
            <property>metrics/Sw-sqft</property>
            <property>aero/function/mach-rudder</property>
          <table>
            <independentVar lookup="row">aero/alpha-deg</independentVar>
            <independentVar lookup="column">fcs/rudder-pos-deg</independentVar>
            <tableData>
                        -25.00    -20.00    -15.00    -10.00     -5.00      0.00      5.00     10.00     15.00     20.00     25.00
             -180.00   0.00000   0.00000   0.00000   0.00000   0.00000   0.00000   0.00000   0.00000   0.00000   0.00000   0.00000
             -120.00   0.00000   0.00000   0.00000   0.00000   0.00000   0.00000   0.00000   0.00000   0.00000   0.00000   0.00000
              -70.00  -0.01797  -0.01621  -0.01378  -0.01021  -0.00543   0.00000   0.00543   0.01021   0.01378   0.01620   0.01795
              -46.00  -0.05729  -0.05173  -0.04400  -0.03241  -0.01716   0.00000   0.01716   0.03241   0.04400   0.05173   0.05729
              -32.00  -0.05506  -0.04975  -0.04234  -0.03143  -0.01673   0.00000   0.01673   0.03143   0.04234   0.04975   0.05506
              -22.00  -0.06414  -0.05789  -0.04916  -0.03650  -0.01925   0.00000   0.01925   0.03650   0.04916   0.05789   0.06414
              -17.00  -0.06847  -0.06189  -0.05269  -0.03909  -0.02081   0.00000   0.02081   0.03909   0.05269   0.06189   0.06847
              -13.00  -0.07080  -0.06399  -0.05447  -0.04041  -0.02150   0.00000   0.02150   0.04041   0.05447   0.06399   0.07080
               -9.00  -0.07240  -0.06542  -0.05568  -0.04131  -0.02198   0.00000   0.02198   0.04131   0.05568   0.06542   0.07240
               -5.00  -0.07321  -0.06615  -0.05630  -0.04177  -0.02223   0.00000   0.02223   0.04177   0.05630   0.06615   0.07321
               -1.00  -0.07321  -0.06615  -0.05630  -0.04177  -0.02223   0.00000   0.02223   0.04177   0.05630   0.06615   0.07321
                3.00  -0.07249  -0.06550  -0.05575  -0.04136  -0.02201   0.00000   0.02201   0.04136   0.05575   0.06550   0.07249
                7.00  -0.07116  -0.06432  -0.05476  -0.04064  -0.02163   0.00000   0.02163   0.04064   0.05476   0.06432   0.07116
               11.00  -0.06901  -0.06240  -0.05314  -0.03944  -0.02099   0.00000   0.02099   0.03944   0.05314   0.06240   0.06901
               15.00  -0.06603  -0.05971  -0.05085  -0.03774  -0.02009   0.00000   0.02009   0.03774   0.05085   0.05971   0.06603
               19.00  -0.06247  -0.05650  -0.04813  -0.03573  -0.01902   0.00000   0.01902   0.03573   0.04813   0.05650   0.06247
               23.00  -0.05903  -0.05346  -0.04559  -0.03386  -0.01803   0.00000   0.01803   0.03386   0.04559   0.05346   0.05903
               27.00  -0.05377  -0.04868  -0.04149  -0.03082  -0.01641   0.00000   0.01641   0.03082   0.04149   0.04868   0.05377
               32.00  -0.04780  -0.04323  -0.03683  -0.02735  -0.01456   0.00000   0.01456   0.02735   0.03683   0.04323   0.04780
               46.00  -0.05357  -0.04849  -0.04112  -0.03008  -0.01594   0.00000   0.01594   0.03008   0.04111   0.04849   0.05357
               70.00  -0.01797  -0.01621  -0.01378  -0.01021  -0.00543   0.00000   0.00543   0.01021   0.01378   0.01620   0.01795
              120.00   0.00000   0.00000   0.00000   0.00000   0.00000   0.00000   0.00000   0.00000   0.00000   0.00000   0.00000
              180.00   0.00000   0.00000   0.00000   0.00000   0.00000   0.00000   0.00000   0.00000   0.00000   0.00000   0.00000
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            </tableData>
          </table>
          </product>
        </function>
        <function name="aero/coefficient/CYp">
          <description>CY per p (non-dimensional), over alpha</description>
          <product>
            <property>aero/qbar-psf</property>
            <property>metrics/Sw-sqft</property>
            <property>aero/bi2vel</property>
            <property>velocities/p-aero-rad_sec</property>
            <property>aero/function/mach-lift</property>
          <table>
            <independentVar lookup="row">aero/alpha-deg</independentVar>
            <tableData>
                 -180.00   -0.44686
                 -165.00   -0.22288
                 -105.00   -0.17454
                  -60.00   -0.23088
                  -42.00   -0.20229
                  -30.00   -0.15361
                  -20.00   -0.16616
                  -16.00   -0.22221
                  -12.00   -0.22672
                   -8.00   -0.22478
                   -4.00   -0.22156
                    0.00   -0.21647
                    4.00   -0.20615
                    8.00   -0.20220
                   12.00   -0.21458
                   16.00   -0.22651
                   20.00    0.01160
                   24.00    0.37216
                   28.00    0.08640
                   35.00   -0.04760
                   50.00   -0.20161
                   80.00   -0.17113
                  135.00   -0.22647
                  180.00   -0.44686
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            </tableData>
          </table>
          </product>
        </function>
        <function name="aero/coefficient/CYr">
          <description>CY per r (non-dimensional), over alpha</description>
          <product>
            <property>aero/qbar-psf</property>
            <property>metrics/Sw-sqft</property>
            <property>aero/bi2vel</property>
            <property>velocities/r-aero-rad_sec</property>
            <property>aero/function/mach-lift</property>
          <table>
            <independentVar lookup="row">aero/alpha-deg</independentVar>
            <tableData>
                 -180.00    0.63480
                 -165.00    0.61747
                 -105.00    0.17992
                  -60.00    0.35465
                  -42.00    0.32300
                  -30.00    0.27001
                  -20.00    0.26492
                  -16.00    0.30462
                  -12.00    0.33346
                   -8.00    0.35792
                   -4.00    0.37942
                    0.00    0.39590
                    4.00    0.40983
                    8.00    0.43739
                   12.00    0.44746
                   16.00    0.45241
                   20.00    0.53070
                   24.00    0.63754
                   28.00    0.51273
                   35.00    0.42136
                   50.00    0.44766
                   80.00    0.15946
                  135.00    0.41685
                  180.00    0.63480
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            </tableData>
          </table>
          </product>
        </function>
      </axis>
      <axis name="LIFT">
        <function name="aero/coefficient/CL_base">
          <description>CL over alpha and beta, ground effect, compressibility (hangar)</description>
          <product>
            <property>aero/qbar-psf</property>
            <property>metrics/Sw-sqft</property>
            <property>aero/function/CL-base</property>
            <property>aero/function/mach-lift</property>
          <table>
            <independentVar lookup="row">aero/h_b-mac-ft</independentVar>
            <tableData>
                    0.00    1.20000
                    0.10    1.08692
                    0.15    1.05730
                    0.20    1.03778
                    0.30    1.01642
                    0.40    1.00713
                    0.50    1.00310
                    0.60    1.00135
                    0.70    1.00059
                    0.80    1.00025
                    0.90    1.00011
                    1.00    1.00005
                    1.10    1.00000
            </tableData>
          </table>
          </product>
        </function>
        <function name="aero/coefficient/CL_elevator">
          <description>CL increment from elevator (deg), over alpha</description>
          <product>
            <property>aero/qbar-psf</property>
            <property>metrics/Sw-sqft</property>
            <property>aero/function/mach-elevator</property>
          <table>
            <independentVar lookup="row">aero/alpha-deg</independentVar>
            <independentVar lookup="column">fcs/elevator-pos-deg</independentVar>
            <tableData>
                        -30.00    -25.00    -20.00    -15.00    -10.00     -5.00      0.00      5.00     10.00     15.00     20.00
             -180.00  -0.00000  -0.00000  -0.00000  -0.00000   0.00000   0.00000   0.00000   0.00000   0.00000  -0.00000  -0.00000
             -120.00  -0.03214  -0.02965  -0.02673  -0.02271  -0.01683  -0.00895   0.00000   0.00895   0.01682   0.02269   0.02669
              -70.00  -0.00662  -0.00617  -0.00562  -0.00484  -0.00365  -0.00199   0.00000   0.00210   0.00404   0.00554   0.00660
              -46.00  -0.02859  -0.02722  -0.02533  -0.02222  -0.01699  -0.00929   0.00000   0.00959   0.01802   0.02394   0.02742
              -32.00  -0.03822  -0.03788  -0.03652  -0.03320  -0.02638  -0.01494   0.00000   0.01601   0.03011   0.03973   0.04490
              -22.00  -0.05499  -0.05237  -0.04920  -0.04457  -0.03595  -0.02079   0.00000   0.02335   0.04610   0.06519   0.07891
              -17.00  -0.07851  -0.07508  -0.07004  -0.06174  -0.04759  -0.02626   0.00000   0.02746   0.05209   0.07039   0.08249
              -13.00  -0.09579  -0.09002  -0.08265  -0.07159  -0.05405  -0.02918   0.00000   0.02973   0.05608   0.07551   0.08830
               -9.00  -0.10250  -0.09617  -0.08820  -0.07616  -0.05721  -0.03075   0.00000   0.03112   0.05858   0.07875   0.09197
               -5.00  -0.10711  -0.10031  -0.09183  -0.07913  -0.05932  -0.03181   0.00000   0.03206   0.06024   0.08086   0.09432
               -1.00  -0.11009  -0.10295  -0.09411  -0.08098  -0.06060  -0.03243   0.00000   0.03257   0.06109   0.08188   0.09541
                3.00  -0.11172  -0.10436  -0.09528  -0.08188  -0.06119  -0.03270   0.00000   0.03272   0.06126   0.08200   0.09542
                7.00  -0.11232  -0.10483  -0.09563  -0.08211  -0.06129  -0.03269   0.00000   0.03260   0.06094   0.08143   0.09462
               11.00  -0.11117  -0.10367  -0.09449  -0.08105  -0.06042  -0.03218   0.00000   0.03197   0.05965   0.07958   0.09233
               15.00  -0.10775  -0.10035  -0.09136  -0.07829  -0.05834  -0.03103   0.00000   0.03071   0.05720   0.07619   0.08829
               19.00  -0.09850  -0.09279  -0.08488  -0.07257  -0.05387  -0.02855   0.00000   0.02808   0.05222   0.06960   0.08084
               23.00  -0.10651  -0.09750  -0.08707  -0.07314  -0.05348  -0.02803   0.00000   0.02727   0.05077   0.06819   0.08033
               27.00  -0.17029  -0.15594  -0.13020  -0.09614  -0.06323  -0.03061   0.00000   0.02699   0.04845   0.06358   0.07426
               32.00  -0.10170  -0.09739  -0.09096  -0.07990  -0.06110  -0.03354   0.00000   0.03603   0.07059   0.10397   0.12735
               46.00  -0.05991  -0.05667  -0.05226  -0.04519  -0.03382  -0.01799   0.00000   0.01763   0.03262   0.04331   0.05021
               70.00  -0.02082  -0.01909  -0.01709  -0.01437  -0.01049  -0.00547   0.00000   0.00522   0.00963   0.01279   0.01489
              120.00  -0.01975  -0.01824  -0.01645  -0.01399  -0.01037  -0.00552   0.00000   0.00552   0.01038   0.01401   0.01650
              180.00   0.00000   0.00000   0.00000   0.00000   0.00000   0.00000   0.00000   0.00000   0.00000   0.00000   0.00000
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            </tableData>
          </table>
          </product>
        </function>
        <function name="aero/coefficient/CL_flap">
          <description>CL increment from flap (deg), over alpha</description>
          <product>
            <property>aero/qbar-psf</property>
            <property>metrics/Sw-sqft</property>
            <property>aero/function/mach-flap</property>
          <table>
            <independentVar lookup="row">aero/alpha-deg</independentVar>
            <independentVar lookup="column">fcs/flap-pos-deg</independentVar>
            <tableData>
                          0.00      5.00     10.00     15.00     20.00     25.00     30.00     35.00     40.00     45.00     50.00
             -180.00   0.00000   0.00000   0.00000  -0.00000  -0.00000  -0.00000  -0.00000  -0.00000  -0.00000  -0.00000  -0.00000
             -120.00   0.00000   0.02100   0.04182   0.06136   0.07885   0.09424   0.10802   0.12084   0.13330   0.14379   0.15428
              -70.00   0.00000   0.01116   0.02277   0.03418   0.04484   0.05457   0.06359   0.07225   0.08093   0.08845   0.09617
              -46.00   0.00000   0.03498   0.07040   0.10367   0.13286   0.15750   0.17836   0.19667   0.21384   0.22681   0.23899
              -32.00   0.00000   0.05577   0.11131   0.16192   0.20435   0.23801   0.26432   0.28628   0.30526   0.31691   0.32747
              -22.00   0.00000   0.05052   0.11281   0.18572   0.25821   0.32659   0.39090   0.45316   0.51558   0.56849   0.62210
              -17.00   0.00000   0.10129   0.20544   0.30523   0.39618   0.47802   0.55424   0.63209   0.71991   0.78816   0.85197
              -13.00   0.00000   0.10765   0.21513   0.31633   0.40698   0.48657   0.55767   0.62382   0.68821   0.74199   0.79601
               -9.00   0.00000   0.10964   0.21880   0.32129   0.41284   0.49303   0.56444   0.63069   0.69494   0.74836   0.80178
               -5.00   0.00000   0.11064   0.22054   0.32349   0.41525   0.49544   0.56672   0.63271   0.69660   0.74962   0.80255
               -1.00   0.00000   0.11087   0.22074   0.32347   0.41488   0.49464   0.56544   0.63091   0.69422   0.74669   0.79903
                3.00   0.00000   0.11220   0.22333   0.32720   0.41958   0.50016   0.57167   0.63775   0.70160   0.75449   0.80712
                7.00   0.00000   0.11648   0.23193   0.33992   0.43602   0.51987   0.59411   0.66222   0.72679   0.77853   0.82742
               11.00   0.00000   0.11367   0.22605   0.33046   0.42138   0.49640   0.55718   0.60762   0.65143   0.68459   0.71575
               15.00   0.00000   0.09957   0.18961   0.26154   0.31579   0.35824   0.39400   0.42661   0.45838   0.48418   0.50982
               19.00   0.00000   0.07369   0.13826   0.19547   0.24532   0.28737   0.32226   0.35203   0.37861   0.39791   0.41583
               23.00   0.00000   0.14847   0.32553   0.44583   0.52081   0.57557   0.61695   0.65077   0.67941   0.69995   0.71797
               27.00   0.00000   0.08934   0.18065   0.26943   0.35678   0.45507   0.54615   0.60963   0.65469   0.68796   0.71776
               32.00   0.00000   0.07471   0.15027   0.22151   0.28502   0.34061   0.39104   0.43987   0.49328   0.55162   0.60906
               46.00   0.00000   0.04086   0.08088   0.11752   0.14925   0.17608   0.19909   0.21956   0.23850   0.25340   0.26748
               70.00   0.00000   0.01030   0.02009   0.02889   0.03646   0.04288   0.04844   0.05345   0.05817   0.06203   0.06579
              120.00   0.00000   0.02364   0.04709   0.06910   0.08882   0.10617   0.12172   0.13620   0.15026   0.16212   0.17398
              180.00   0.00000   0.00000   0.00000   0.00000   0.00000   0.00000  -0.00000  -0.00000  -0.00000  -0.00000  -0.00000
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            </tableData>
          </table>
          <table>
            <independentVar lookup="row">aero/h_b-mac-ft</independentVar>
            <tableData>
                    0.00    1.20000
                    0.10    1.08692
                    0.20    1.03778
                    0.40    1.00713
                    0.60    1.00135
                    0.80    1.00025
                    1.00    1.00005
                    1.10    1.00000
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            </tableData>
          </table>
          </product>
        </function>
        <function name="aero/coefficient/CLq">
          <description>CL per q (non-dimensional), over alpha</description>
          <product>
            <property>aero/qbar-psf</property>
            <property>metrics/Sw-sqft</property>
            <property>aero/ci2vel</property>
            <property>velocities/q-aero-rad_sec</property>
            <property>aero/function/mach-lift</property>
          <table>
            <independentVar lookup="row">aero/alpha-deg</independentVar>
            <tableData>
                 -180.00   -2.67452
                 -165.00   -1.00320
                  -32.00    1.19027
                  -10.00    7.64875
                    5.00    9.93547
                   20.00    1.89063
                   46.00    1.71189
                  180.00   -2.67452
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            </tableData>
          </table>
          </product>
        </function>
        <function name="aero/coefficient/CLadot">
          <description>CL per alpha-dot (downwash lag at the tail)</description>
          <product>
            <property>aero/qbar-psf</property>
            <property>metrics/Sw-sqft</property>
            <property>aero/ci2vel</property>
            <property>aero/alphadot-rad_sec</property>
            <value>0.97523</value>
            <property>aero/function/mach-lift</property>
          </product>
        </function>
      </axis>
      <axis name="ROLL">
        <function name="aero/coefficient/Cl_base">
          <description>Cl over alpha and beta (hangar)</description>
          <product>
            <property>aero/qbar-psf</property>
            <property>metrics/Sw-sqft</property>
            <property>metrics/bw-ft</property>
            <property>aero/function/mach-side</property>
          <table>
            <independentVar lookup="row">aero/alpha-deg</independentVar>
            <independentVar lookup="column">aero/beta-deg</independentVar>
            <tableData>
                        -90.00    -70.00    -50.00    -40.00    -30.00    -25.00    -20.00    -15.00    -10.00     -6.00     -3.00      0.00      3.00      6.00     10.00     15.00     20.00     25.00     30.00     40.00     50.00     70.00     90.00
             -180.00   0.02555   0.03155   0.05989   0.07269   0.06668   0.05935   0.04993   0.03885   0.03003   0.02267   0.01177  -0.00000  -0.01177  -0.02267  -0.03003  -0.03885  -0.04993  -0.05935  -0.06668  -0.07269  -0.05989  -0.03155  -0.02555
              -35.00   0.02555   0.02865   0.03249   0.02657   0.01332   0.00756   0.00759   0.00701   0.00435   0.00251   0.00125  -0.00000  -0.00125  -0.00251  -0.00435  -0.00701  -0.00759  -0.00756  -0.01332  -0.02657  -0.03249  -0.02865  -0.02555
              -11.00   0.02555   0.04803   0.05634   0.03624   0.00430   0.00254   0.00256   0.00216   0.00152   0.00092   0.00046  -0.00000  -0.00046  -0.00092  -0.00152  -0.00216  -0.00256  -0.00254  -0.00430  -0.03624  -0.05634  -0.04803  -0.02555
                4.00   0.02555   0.04980   0.08003   0.06336   0.06529   0.06644   0.05685   0.04446   0.03049   0.01855   0.00932  -0.00000  -0.00932  -0.01855  -0.03049  -0.04446  -0.05685  -0.06644  -0.06529  -0.06336  -0.08003  -0.04980  -0.02555
               19.00   0.02555   0.03459   0.00730   0.01153   0.04512   0.05227   0.04997   0.04859   0.03381   0.02070   0.01043  -0.00000  -0.01043  -0.02070  -0.03381  -0.04859  -0.04997  -0.05227  -0.04512  -0.01153  -0.00730  -0.03459  -0.02555
               42.00   0.02555   0.03288   0.03602   0.03230   0.02542   0.02194   0.01905   0.01863   0.01216   0.00719   0.00361  -0.00000  -0.00361  -0.00719  -0.01216  -0.01863  -0.01905  -0.02194  -0.02542  -0.03230  -0.03602  -0.03288  -0.02555
              180.00   0.02555   0.03155   0.05989   0.07269   0.06668   0.05935   0.04993   0.03885   0.03003   0.02267   0.01177  -0.00000  -0.01177  -0.02267  -0.03003  -0.03885  -0.04993  -0.05935  -0.06668  -0.07269  -0.05989  -0.03155  -0.02555
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            </tableData>
          </table>
          </product>
        </function>
        <function name="aero/coefficient/Cl_aileron">
          <description>Cl increment from aileron (deg), over alpha</description>
          <product>
            <property>aero/qbar-psf</property>
            <property>metrics/Sw-sqft</property>
            <property>metrics/bw-ft</property>
            <property>aero/function/mach-aileron</property>
          <table>
            <independentVar lookup="row">aero/alpha-deg</independentVar>
            <independentVar lookup="column">fcs/left-aileron-pos-deg</independentVar>
            <tableData>
                        -20.00    -15.00    -10.00     -5.00      0.00      5.00     10.00     15.00     20.00
             -180.00   0.00000   0.00000   0.00000   0.00000   0.00000   0.00000   0.00000   0.00000   0.00000
              -35.00  -0.00840  -0.00795  -0.00634  -0.00352   0.00000   0.00352   0.00634   0.00795   0.00840
              -11.00  -0.03825  -0.03264  -0.02427  -0.01293   0.00000   0.01293   0.02427   0.03264   0.03825
                4.00  -0.03839  -0.03279  -0.02439  -0.01300   0.00000   0.01300   0.02439   0.03279   0.03839
               19.00  -0.04733  -0.04160  -0.03223  -0.01807   0.00000   0.01807   0.03223   0.04160   0.04733
               42.00  -0.00895  -0.00824  -0.00646  -0.00351   0.00000   0.00351   0.00646   0.00824   0.00895
              180.00   0.00000   0.00000   0.00000   0.00000   0.00000   0.00000   0.00000   0.00000   0.00000
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            </tableData>
          </table>
          </product>
        </function>
        <function name="aero/coefficient/Cl_rudder">
          <description>Cl increment from rudder (deg), over alpha</description>
          <product>
            <property>aero/qbar-psf</property>
            <property>metrics/Sw-sqft</property>
            <property>metrics/bw-ft</property>
            <property>aero/function/mach-rudder</property>
          <table>
            <independentVar lookup="row">aero/alpha-deg</independentVar>
            <independentVar lookup="column">fcs/rudder-pos-deg</independentVar>
            <tableData>
                        -25.00    -20.00    -15.00    -10.00     -5.00      0.00      5.00     10.00     15.00     20.00     25.00
             -180.00   0.00000   0.00000   0.00000   0.00000   0.00000   0.00000   0.00000   0.00000   0.00000   0.00000   0.00000
              -35.00  -0.00675  -0.00608  -0.00516  -0.00381  -0.00202   0.00000   0.00202   0.00381   0.00516   0.00608   0.00675
              -11.00  -0.00860  -0.00775  -0.00658  -0.00487  -0.00259   0.00000   0.00259   0.00487   0.00658   0.00775   0.00860
                4.00  -0.00900  -0.00811  -0.00688  -0.00510  -0.00271   0.00000   0.00271   0.00510   0.00688   0.00811   0.00900
               19.00  -0.00815  -0.00735  -0.00624  -0.00463  -0.00246   0.00000   0.00246   0.00463   0.00624   0.00735   0.00815
               42.00  -0.00664  -0.00599  -0.00506  -0.00369  -0.00196   0.00000   0.00196   0.00369   0.00506   0.00599   0.00664
              180.00   0.00000   0.00000   0.00000   0.00000   0.00000   0.00000   0.00000   0.00000   0.00000   0.00000   0.00000
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            </tableData>
          </table>
          </product>
        </function>
        <function name="aero/coefficient/Clp">
          <description>Cl per p (non-dimensional), over alpha</description>
          <product>
            <property>aero/qbar-psf</property>
            <property>metrics/Sw-sqft</property>
            <property>metrics/bw-ft</property>
            <property>aero/bi2vel</property>
            <property>velocities/p-aero-rad_sec</property>
            <property>aero/function/mach-lift</property>
          <table>
            <independentVar lookup="row">aero/alpha-deg</independentVar>
            <tableData>
                 -180.00   -0.66132
                 -165.00   -0.16381
                  -32.00   -0.13244
                  -10.00   -0.42045
                    5.00   -0.40626
                   20.00    0.28573
                   46.00   -0.21789
                  180.00   -0.66132
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            </tableData>
          </table>
          </product>
        </function>
        <function name="aero/coefficient/Clr">
          <description>Cl per r (non-dimensional), over alpha</description>
          <product>
            <property>aero/qbar-psf</property>
            <property>metrics/Sw-sqft</property>
            <property>metrics/bw-ft</property>
            <property>aero/bi2vel</property>
            <property>velocities/r-aero-rad_sec</property>
            <property>aero/function/mach-lift</property>
          <table>
            <independentVar lookup="row">aero/alpha-deg</independentVar>
            <tableData>
                 -180.00    0.10319
                 -165.00    0.12536
                  -32.00   -0.13684
                  -10.00   -0.01154
                    5.00    0.15989
                   20.00    0.51534
                   46.00    0.19984
                  180.00    0.10319
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            </tableData>
          </table>
          </product>
        </function>
      </axis>
      <axis name="PITCH">
        <function name="aero/coefficient/Cm_base">
          <description>Cm over alpha and beta (hangar)</description>
          <product>
            <property>aero/qbar-psf</property>
            <property>metrics/Sw-sqft</property>
            <property>metrics/cbarw-ft</property>
          <table>
            <independentVar lookup="row">aero/alpha-deg</independentVar>
            <independentVar lookup="column">aero/beta-deg</independentVar>
            <tableData>
                        -90.00    -70.00    -50.00    -40.00    -30.00    -25.00    -20.00    -15.00    -10.00     -6.00     -3.00      0.00      3.00      6.00     10.00     15.00     20.00     25.00     30.00     40.00     50.00     70.00     90.00
             -180.00   0.00000  -0.00731   0.01017  -0.05164  -0.13209  -0.16913  -0.19880  -0.21949  -0.22812  -0.23594  -0.24302  -0.24552  -0.24302  -0.23594  -0.22812  -0.21949  -0.19880  -0.16913  -0.13209  -0.05164   0.01017  -0.00731   0.00000
              -35.00   0.00000   0.06394   0.19470   0.25853   0.31147   0.33178   0.35720   0.35485   0.35619   0.35628   0.35616   0.35609   0.35616   0.35628   0.35619   0.35485   0.35720   0.33178   0.31147   0.25853   0.19470   0.06394   0.00000
              -11.00   0.00000   0.01297   0.15369   0.28295   0.32112   0.34699   0.38822   0.41842   0.44025   0.45149   0.45624   0.45783   0.45624   0.45149   0.44025   0.41842   0.38822   0.34699   0.32112   0.28295   0.15369   0.01297   0.00000
                4.00   0.00000  -0.00868   0.02355   0.02576   0.02021   0.02276   0.03533   0.04604   0.05364   0.05737   0.05884   0.05930   0.05884   0.05737   0.05364   0.04604   0.03533   0.02276   0.02021   0.02576   0.02355  -0.00868   0.00000
               19.00   0.00000  -0.01775  -0.17467  -0.35354  -0.31363  -0.28835  -0.27347  -0.21656  -0.23069  -0.23865  -0.24222  -0.24343  -0.24222  -0.23865  -0.23069  -0.21656  -0.27347  -0.28835  -0.31363  -0.35354  -0.17467  -0.01775   0.00000
               42.00   0.00000  -0.07319  -0.21894  -0.30312  -0.36578  -0.38931  -0.41167  -0.42983  -0.42989  -0.43000  -0.43001  -0.42992  -0.43001  -0.43000  -0.42989  -0.42983  -0.41167  -0.38931  -0.36578  -0.30312  -0.21894  -0.07319   0.00000
              180.00   0.00000  -0.00731   0.01017  -0.05164  -0.13209  -0.16913  -0.19880  -0.21949  -0.22812  -0.23594  -0.24302  -0.24552  -0.24302  -0.23594  -0.22812  -0.21949  -0.19880  -0.16913  -0.13209  -0.05164   0.01017  -0.00731   0.00000
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            </tableData>
          </table>
          </product>
        </function>
        <function name="aero/coefficient/Cm_mach">
          <description>Cm from the neutral point's move with Mach</description>
          <product>
            <property>aero/qbar-psf</property>
            <property>metrics/Sw-sqft</property>
            <property>metrics/cbarw-ft</property>
            <property>aero/function/CL-base</property>
            <property>aero/function/mach-dCm-dCL</property>
          </product>
        </function>
        <function name="aero/coefficient/Cm_elevator">
          <description>Cm increment from elevator (deg), over alpha</description>
          <product>
            <property>aero/qbar-psf</property>
            <property>metrics/Sw-sqft</property>
            <property>metrics/cbarw-ft</property>
            <property>aero/function/mach-elevator</property>
          <table>
            <independentVar lookup="row">aero/alpha-deg</independentVar>
            <independentVar lookup="column">fcs/elevator-pos-deg</independentVar>
            <tableData>
                        -30.00    -25.00    -20.00    -15.00    -10.00     -5.00      0.00      5.00     10.00     15.00     20.00
             -180.00  -0.00181  -0.00129  -0.00085  -0.00048  -0.00022  -0.00005   0.00000  -0.00005  -0.00022  -0.00048  -0.00085
              -35.00   0.06890   0.06817   0.06582   0.05975   0.04684   0.02571   0.00000  -0.02450  -0.04190  -0.04807  -0.04404
              -11.00   0.32337   0.30149   0.27479   0.23593   0.17635   0.09434   0.00000  -0.09470  -0.17762  -0.23812  -0.27746
                4.00   0.34987   0.32593   0.29676   0.25437   0.18970   0.10121   0.00000  -0.10115  -0.18946  -0.25387  -0.29593
               19.00   0.30925   0.29228   0.26824   0.23009   0.17150   0.09134   0.00000  -0.09086  -0.17000  -0.22800  -0.26656
               42.00   0.11087   0.11539   0.11551   0.10715   0.08513   0.04768   0.00000  -0.05064  -0.09642  -0.13074  -0.15418
              180.00  -0.00181  -0.00129  -0.00085  -0.00048  -0.00022  -0.00005   0.00000  -0.00005  -0.00022  -0.00048  -0.00085
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            </tableData>
          </table>
          </product>
        </function>
        <function name="aero/coefficient/Cm_flap">
          <description>Cm increment from flap (deg), over alpha</description>
          <product>
            <property>aero/qbar-psf</property>
            <property>metrics/Sw-sqft</property>
            <property>metrics/cbarw-ft</property>
            <property>aero/function/mach-flap</property>
          <table>
            <independentVar lookup="row">aero/alpha-deg</independentVar>
            <independentVar lookup="column">fcs/flap-pos-deg</independentVar>
            <tableData>
                          0.00      5.00     10.00     15.00     20.00     25.00     30.00     35.00     40.00     45.00     50.00
             -180.00   0.00000   0.00001   0.00006   0.00013   0.00022   0.00034   0.00047   0.00062   0.00078   0.00095   0.00111
              -35.00   0.00000  -0.00200  -0.00480  -0.00827  -0.01216  -0.01624  -0.01988  -0.02286  -0.02582  -0.02820  -0.02954
              -11.00   0.00000  -0.00214  -0.00456  -0.00744  -0.01087  -0.01479  -0.01913  -0.02385  -0.02895  -0.03428  -0.03993
                4.00   0.00000  -0.01231  -0.02505  -0.03797  -0.05082  -0.06349  -0.07605  -0.08868  -0.10155  -0.11393  -0.12654
               19.00   0.00000   0.00700   0.01219   0.01397   0.01182   0.00688   0.00035  -0.00725  -0.01578  -0.02521  -0.03550
               42.00   0.00000   0.00073   0.00181   0.00310   0.00446   0.00578   0.00701   0.00808   0.00892   0.00956   0.00988
              180.00   0.00000   0.00001   0.00006   0.00013   0.00022   0.00034   0.00047   0.00062   0.00078   0.00095   0.00111
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            </tableData>
          </table>
          </product>
        </function>
        <function name="aero/coefficient/Cmq">
          <description>Cm per q (non-dimensional), over alpha</description>
          <product>
            <property>aero/qbar-psf</property>
            <property>metrics/Sw-sqft</property>
            <property>metrics/cbarw-ft</property>
            <property>aero/ci2vel</property>
            <property>velocities/q-aero-rad_sec</property>
            <property>aero/function/mach-lift</property>
          <table>
            <independentVar lookup="row">aero/alpha-deg</independentVar>
            <tableData>
                 -180.00  -11.76831
                 -165.00   -5.30966
                  -32.00   -6.54701
                  -10.00  -13.32833
                    5.00  -20.02170
                   20.00  -11.86177
                   46.00   -9.78137
                  180.00  -11.76831
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            </tableData>
          </table>
          </product>
        </function>
        <function name="aero/coefficient/Cmadot">
          <description>Cm per alpha-dot (downwash lag at the tail)</description>
          <product>
            <property>aero/qbar-psf</property>
            <property>metrics/Sw-sqft</property>
            <property>metrics/cbarw-ft</property>
            <property>aero/ci2vel</property>
            <property>aero/alphadot-rad_sec</property>
            <value>-2.97082</value>
            <property>aero/function/mach-lift</property>
          </product>
        </function>
      </axis>
      <axis name="YAW">
        <function name="aero/coefficient/Cn_base">
          <description>Cn over alpha and beta (hangar)</description>
          <product>
            <property>aero/qbar-psf</property>
            <property>metrics/Sw-sqft</property>
            <property>metrics/bw-ft</property>
            <property>aero/function/mach-side</property>
          <table>
            <independentVar lookup="row">aero/alpha-deg</independentVar>
            <independentVar lookup="column">aero/beta-deg</independentVar>
            <tableData>
                        -90.00    -70.00    -50.00    -40.00    -30.00    -25.00    -20.00    -15.00    -10.00     -6.00     -3.00      0.00      3.00      6.00     10.00     15.00     20.00     25.00     30.00     40.00     50.00     70.00     90.00
             -180.00  -0.07200  -0.09161  -0.09515  -0.08774  -0.07354  -0.06406  -0.05314  -0.04097  -0.04100  -0.04167  -0.02235  -0.00000   0.02235   0.04167   0.04100   0.04097   0.05314   0.06406   0.07354   0.08774   0.09515   0.09161   0.07200
              -35.00  -0.07200  -0.04818  -0.02621  -0.01696  -0.01276  -0.01400  -0.02599  -0.02644  -0.01683  -0.00988  -0.00493  -0.00000   0.00493   0.00988   0.01683   0.02644   0.02599   0.01400   0.01276   0.01696   0.02621   0.04818   0.07200
              -11.00  -0.07200  -0.04699  -0.02916  -0.02122  -0.02608  -0.03988  -0.03550  -0.02764  -0.01882  -0.01140  -0.00572  -0.00000   0.00572   0.01140   0.01882   0.02764   0.03550   0.03988   0.02608   0.02122   0.02916   0.04699   0.07200
                4.00  -0.07200  -0.04729  -0.00991  -0.00452  -0.02109  -0.02861  -0.02598  -0.02067  -0.01432  -0.00877  -0.00443  -0.00000   0.00443   0.00877   0.01432   0.02067   0.02598   0.02861   0.02109   0.00452   0.00991   0.04729   0.07200
               19.00  -0.07200  -0.04461  -0.02220  -0.01624  -0.01829  -0.01821  -0.02264  -0.01690  -0.01149  -0.00692  -0.00346  -0.00000   0.00346   0.00692   0.01149   0.01690   0.02264   0.01821   0.01829   0.01624   0.02220   0.04461   0.07200
               42.00  -0.07200  -0.05010  -0.02738  -0.01812  -0.01279  -0.01277  -0.01580  -0.02493  -0.01567  -0.00909  -0.00461  -0.00000   0.00461   0.00909   0.01567   0.02493   0.01580   0.01277   0.01279   0.01812   0.02738   0.05010   0.07200
              180.00  -0.07200  -0.09161  -0.09515  -0.08774  -0.07354  -0.06406  -0.05314  -0.04097  -0.04100  -0.04167  -0.02235  -0.00000   0.02235   0.04167   0.04100   0.04097   0.05314   0.06406   0.07354   0.08774   0.09515   0.09161   0.07200
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            </tableData>
          </table>
          </product>
        </function>
        <function name="aero/coefficient/Cn_aileron">
          <description>Cn increment from aileron (deg), over alpha</description>
          <product>
            <property>aero/qbar-psf</property>
            <property>metrics/Sw-sqft</property>
            <property>metrics/bw-ft</property>
            <property>aero/function/mach-aileron</property>
          <table>
            <independentVar lookup="row">aero/alpha-deg</independentVar>
            <independentVar lookup="column">fcs/left-aileron-pos-deg</independentVar>
            <tableData>
                        -20.00    -15.00    -10.00     -5.00      0.00      5.00     10.00     15.00     20.00
             -180.00  -0.00000  -0.00000  -0.00000  -0.00000   0.00000  -0.00000  -0.00000  -0.00000  -0.00000
              -35.00   0.01826   0.01537   0.01132   0.00601   0.00000  -0.00601  -0.01132  -0.01537  -0.01826
              -11.00   0.00407   0.00345   0.00255   0.00135   0.00000  -0.00135  -0.00255  -0.00345  -0.00407
                4.00  -0.00018  -0.00018  -0.00014  -0.00008   0.00000   0.00008   0.00014   0.00018   0.00018
               19.00  -0.02275  -0.01884  -0.01304  -0.00613   0.00000   0.00613   0.01304   0.01884   0.02275
               42.00  -0.01643  -0.01388  -0.01024  -0.00544   0.00000   0.00544   0.01024   0.01388   0.01643
              180.00  -0.00000  -0.00000  -0.00000  -0.00000   0.00000  -0.00000  -0.00000  -0.00000  -0.00000
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            </tableData>
          </table>
          </product>
        </function>
        <function name="aero/coefficient/Cn_rudder">
          <description>Cn increment from rudder (deg), over alpha</description>
          <product>
            <property>aero/qbar-psf</property>
            <property>metrics/Sw-sqft</property>
            <property>metrics/bw-ft</property>
            <property>aero/function/mach-rudder</property>
          <table>
            <independentVar lookup="row">aero/alpha-deg</independentVar>
            <independentVar lookup="column">fcs/rudder-pos-deg</independentVar>
            <tableData>
                        -25.00    -20.00    -15.00    -10.00     -5.00      0.00      5.00     10.00     15.00     20.00     25.00
             -180.00  -0.00000  -0.00000  -0.00000  -0.00000  -0.00000   0.00000  -0.00000  -0.00000  -0.00000  -0.00000  -0.00000
              -35.00   0.02480   0.02239   0.01905   0.01409   0.00749   0.00000  -0.00749  -0.01409  -0.01905  -0.02239  -0.02480
              -11.00   0.03279   0.02961   0.02518   0.01867   0.00993   0.00000  -0.00993  -0.01867  -0.02518  -0.02961  -0.03279
                4.00   0.03446   0.03111   0.02646   0.01962   0.01043   0.00000  -0.01043  -0.01962  -0.02646  -0.03111  -0.03446
               19.00   0.02962   0.02675   0.02277   0.01689   0.00898   0.00000  -0.00898  -0.01689  -0.02277  -0.02675  -0.02962
               42.00   0.02437   0.02204   0.01868   0.01367   0.00725   0.00000  -0.00725  -0.01367  -0.01868  -0.02204  -0.02437
              180.00  -0.00000  -0.00000  -0.00000  -0.00000  -0.00000   0.00000  -0.00000  -0.00000  -0.00000  -0.00000  -0.00000
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            </tableData>
          </table>
          </product>
        </function>
        <function name="aero/coefficient/Cnp">
          <description>Cn per p (non-dimensional), over alpha</description>
          <product>
            <property>aero/qbar-psf</property>
            <property>metrics/Sw-sqft</property>
            <property>metrics/bw-ft</property>
            <property>aero/bi2vel</property>
            <property>velocities/p-aero-rad_sec</property>
            <property>aero/function/mach-lift</property>
          <table>
            <independentVar lookup="row">aero/alpha-deg</independentVar>
            <tableData>
                 -180.00    0.13521
                 -165.00    0.10729
                  -32.00    0.06000
                  -10.00    0.15018
                    5.00   -0.03533
                   20.00    0.11762
                   46.00    0.04366
                  180.00    0.13521
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            </tableData>
          </table>
          </product>
        </function>
        <function name="aero/coefficient/Cnr">
          <description>Cn per r (non-dimensional), over alpha</description>
          <product>
            <property>aero/qbar-psf</property>
            <property>metrics/Sw-sqft</property>
            <property>metrics/bw-ft</property>
            <property>aero/bi2vel</property>
            <property>velocities/r-aero-rad_sec</property>
            <property>aero/function/mach-lift</property>
          <table>
            <independentVar lookup="row">aero/alpha-deg</independentVar>
            <tableData>
                 -180.00   -0.29057
                 -165.00   -0.28387
                  -32.00   -0.15047
                  -10.00   -0.20014
                    5.00   -0.20476
                   20.00   -0.09208
                   46.00   -0.18085
                  180.00   -0.29057
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            </tableData>
          </table>
          </product>
        </function>
      </axis>
    </aerodynamics>
</fdm_config>
