<?xml version="1.0"?>
<?xml-stylesheet type="text/xsl" href="http://jsbsim.sourceforge.net/JSBSim.xsl"?>
<!-- Generated by hangar 0.1.0 from skua.toml on 2026-09-23. Edit the design and rebuild; changes
     made here are overwritten.  -->
<fdm_config name="skua" version="2.0" release="ALPHA"
            xmlns:xsi="http://www.w3.org/2001/XMLSchema-instance"
            xsi:noNamespaceSchemaLocation="http://jsbsim.sourceforge.net/JSBSim.xsd">
    <fileheader>
      <author>hangar</author>
      <filecreationdate>2026-09-23</filecreationdate>
      <version>0.1.0</version>
      <description>Skua - twin-boom pusher UAV, 4 m span, electric (hypothetical)</description>
      <note>Aerodynamics: vortex lattice with viscous section polars, full-envelope
        strip model, slender-body fuselage (hangar). Mass: Raymer component
        weights on the geometry. Propeller: blade-element momentum theory.</note>
    </fileheader>
    <metrics>
      <wingarea unit="M2"> 1.2978 </wingarea>
      <wingspan unit="M"> 4.0000 </wingspan>
      <chord unit="M"> 0.3289 </chord>
      <htailarea unit="M2"> 0.2420 </htailarea>
      <htailarm unit="M"> 1.4750 </htailarm>
      <vtailarea unit="M2"> 0.1530 </vtailarea>
      <vtailarm unit="M"> 1.4658 </vtailarm>
      <location name="AERORP" unit="M">
        <x> 0.6400 </x>
        <y> 0.0000 </y>
        <z> 0.1690 </z>
      </location>
      <location name="EYEPOINT" unit="M">
        <x> 0.6400 </x>
        <y> 0.0000 </y>
        <z> 0.1690 </z>
      </location>
      <location name="VRP" unit="M">
        <x> 0.7133 </x>
        <y> 0.0000 </y>
        <z> 0.0229 </z>
      </location>
    </metrics>
    <mass_balance negated_crossproduct_inertia="false">
      <ixx unit="KG*M2"> 4.64 </ixx>
      <iyy unit="KG*M2"> 4.73 </iyy>
      <izz unit="KG*M2"> 8.85 </izz>
      <ixy unit="KG*M2"> -0.000 </ixy>
      <ixz unit="KG*M2"> 0.404 </ixz>
      <iyz unit="KG*M2"> 0.000 </iyz>
      <emptywt unit="KG"> 21.00 </emptywt>
      <location name="CG" unit="M">
        <x> 0.7133 </x>
        <y> 0.0000 </y>
        <z> 0.0229 </z>
      </location>
      <pointmass name="camera">
        <weight unit="KG"> 2.00 </weight>
        <location unit="M">
          <x> 0.2000 </x>
          <y> 0.0000 </y>
          <z> -0.0800 </z>
        </location>
      </pointmass>
    </mass_balance>
    <ground_reactions>
      <contact type="BOGEY" name="Nose Gear">
        <location unit="M">
          <x> 0.1200 </x>
          <y> 0.0000 </y>
          <z> -0.3000 </z>
        </location>
        <static_friction> 0.8 </static_friction>
        <dynamic_friction> 0.5 </dynamic_friction>
        <rolling_friction> 0.02 </rolling_friction>
        <spring_coeff unit="N/M"> 5000 </spring_coeff>
        <damping_coeff unit="N/M/SEC"> 226 </damping_coeff>
        <damping_coeff_rebound unit="N/M/SEC"> 452 </damping_coeff_rebound>
        <max_steer unit="DEG"> 20.0 </max_steer>
        <brake_group> NONE </brake_group>
        <retractable> 0 </retractable>
      </contact>
      <contact type="BOGEY" name="Left Main Gear">
        <location unit="M">
          <x> 0.7600 </x>
          <y> -0.3500 </y>
          <z> -0.3000 </z>
        </location>
        <static_friction> 0.8 </static_friction>
        <dynamic_friction> 0.5 </dynamic_friction>
        <rolling_friction> 0.02 </rolling_friction>
        <spring_coeff unit="N/M"> 5000 </spring_coeff>
        <damping_coeff unit="N/M/SEC"> 226 </damping_coeff>
        <damping_coeff_rebound unit="N/M/SEC"> 452 </damping_coeff_rebound>
        <max_steer unit="DEG"> 0.0 </max_steer>
        <brake_group> LEFT </brake_group>
        <retractable> 0 </retractable>
      </contact>
      <contact type="BOGEY" name="Right Main Gear">
        <location unit="M">
          <x> 0.7600 </x>
          <y> 0.3500 </y>
          <z> -0.3000 </z>
        </location>
        <static_friction> 0.8 </static_friction>
        <dynamic_friction> 0.5 </dynamic_friction>
        <rolling_friction> 0.02 </rolling_friction>
        <spring_coeff unit="N/M"> 5000 </spring_coeff>
        <damping_coeff unit="N/M/SEC"> 226 </damping_coeff>
        <damping_coeff_rebound unit="N/M/SEC"> 452 </damping_coeff_rebound>
        <max_steer unit="DEG"> 0.0 </max_steer>
        <brake_group> RIGHT </brake_group>
        <retractable> 0 </retractable>
      </contact>
      <contact type="STRUCTURE" name="booms left rear">
        <location unit="M">
          <x> 2.3600 </x>
          <y> -0.5500 </y>
          <z> 0.1500 </z>
        </location>
        <static_friction> 0.8 </static_friction>
        <dynamic_friction> 0.6 </dynamic_friction>
        <spring_coeff unit="N/M"> 653 </spring_coeff>
        <damping_coeff unit="N/M/SEC"> 22 </damping_coeff>
        <damping_coeff_rebound unit="N/M/SEC"> 22 </damping_coeff_rebound>
      </contact>
      <contact type="STRUCTURE" name="booms right rear">
        <location unit="M">
          <x> 2.3600 </x>
          <y> 0.5500 </y>
          <z> 0.1500 </z>
        </location>
        <static_friction> 0.8 </static_friction>
        <dynamic_friction> 0.6 </dynamic_friction>
        <spring_coeff unit="N/M"> 653 </spring_coeff>
        <damping_coeff unit="N/M/SEC"> 22 </damping_coeff>
        <damping_coeff_rebound unit="N/M/SEC"> 22 </damping_coeff_rebound>
      </contact>
      <contact type="STRUCTURE" name="fin left rear">
        <location unit="M">
          <x> 2.3000 </x>
          <y> -0.5500 </y>
          <z> 0.4500 </z>
        </location>
        <static_friction> 0.8 </static_friction>
        <dynamic_friction> 0.6 </dynamic_friction>
        <spring_coeff unit="N/M"> 658 </spring_coeff>
        <damping_coeff unit="N/M/SEC"> 22 </damping_coeff>
        <damping_coeff_rebound unit="N/M/SEC"> 22 </damping_coeff_rebound>
      </contact>
      <contact type="STRUCTURE" name="fin right rear">
        <location unit="M">
          <x> 2.3000 </x>
          <y> 0.5500 </y>
          <z> 0.4500 </z>
        </location>
        <static_friction> 0.8 </static_friction>
        <dynamic_friction> 0.6 </dynamic_friction>
        <spring_coeff unit="N/M"> 658 </spring_coeff>
        <damping_coeff unit="N/M/SEC"> 22 </damping_coeff>
        <damping_coeff_rebound unit="N/M/SEC"> 22 </damping_coeff_rebound>
      </contact>
      <contact type="STRUCTURE" name="motor propeller rear">
        <location unit="M">
          <x> 1.5600 </x>
          <y> -0.0000 </y>
          <z> -0.2800 </z>
        </location>
        <static_friction> 0.8 </static_friction>
        <dynamic_friction> 0.6 </dynamic_friction>
        <spring_coeff unit="N/M"> 4120 </spring_coeff>
        <damping_coeff unit="N/M/SEC"> 137 </damping_coeff>
        <damping_coeff_rebound unit="N/M/SEC"> 137 </damping_coeff_rebound>
      </contact>
      <contact type="STRUCTURE" name="pod front">
        <location unit="M">
          <x> 0.0000 </x>
          <y> 0.0000 </y>
          <z> 0.0000 </z>
        </location>
        <static_friction> 0.8 </static_friction>
        <dynamic_friction> 0.6 </dynamic_friction>
        <spring_coeff unit="N/M"> 1933 </spring_coeff>
        <damping_coeff unit="N/M/SEC"> 64 </damping_coeff>
        <damping_coeff_rebound unit="N/M/SEC"> 64 </damping_coeff_rebound>
      </contact>
      <contact type="STRUCTURE" name="pod front 2">
        <location unit="M">
          <x> 0.1702 </x>
          <y> -0.0000 </y>
          <z> -0.1262 </z>
        </location>
        <static_friction> 0.8 </static_friction>
        <dynamic_friction> 0.6 </dynamic_friction>
        <spring_coeff unit="N/M"> 2617 </spring_coeff>
        <damping_coeff unit="N/M/SEC"> 87 </damping_coeff>
        <damping_coeff_rebound unit="N/M/SEC"> 87 </damping_coeff_rebound>
      </contact>
      <contact type="STRUCTURE" name="wing left front">
        <location unit="M">
          <x> 0.5800 </x>
          <y> -2.0000 </y>
          <z> 0.2250 </z>
        </location>
        <static_friction> 0.8 </static_friction>
        <dynamic_friction> 0.6 </dynamic_friction>
        <spring_coeff unit="N/M"> 484 </spring_coeff>
        <damping_coeff unit="N/M/SEC"> 16 </damping_coeff>
        <damping_coeff_rebound unit="N/M/SEC"> 16 </damping_coeff_rebound>
      </contact>
      <contact type="STRUCTURE" name="wing left front 2">
        <location unit="M">
          <x> 0.8200 </x>
          <y> -2.0000 </y>
          <z> 0.2250 </z>
        </location>
        <static_friction> 0.8 </static_friction>
        <dynamic_friction> 0.6 </dynamic_friction>
        <spring_coeff unit="N/M"> 484 </spring_coeff>
        <damping_coeff unit="N/M/SEC"> 16 </damping_coeff>
        <damping_coeff_rebound unit="N/M/SEC"> 16 </damping_coeff_rebound>
      </contact>
      <contact type="STRUCTURE" name="wing right front">
        <location unit="M">
          <x> 0.5800 </x>
          <y> 2.0000 </y>
          <z> 0.2250 </z>
        </location>
        <static_friction> 0.8 </static_friction>
        <dynamic_friction> 0.6 </dynamic_friction>
        <spring_coeff unit="N/M"> 484 </spring_coeff>
        <damping_coeff unit="N/M/SEC"> 16 </damping_coeff>
        <damping_coeff_rebound unit="N/M/SEC"> 16 </damping_coeff_rebound>
      </contact>
      <contact type="STRUCTURE" name="wing right front 2">
        <location unit="M">
          <x> 0.8200 </x>
          <y> 2.0000 </y>
          <z> 0.2250 </z>
        </location>
        <static_friction> 0.8 </static_friction>
        <dynamic_friction> 0.6 </dynamic_friction>
        <spring_coeff unit="N/M"> 484 </spring_coeff>
        <damping_coeff unit="N/M/SEC"> 16 </damping_coeff>
        <damping_coeff_rebound unit="N/M/SEC"> 16 </damping_coeff_rebound>
      </contact>
    </ground_reactions>
    <propulsion>
      <engine file="skua_engine0">
        <location unit="M">
          <x> 1.4400 </x>
          <y> 0.0000 </y>
          <z> 0.0000 </z>
        </location>

        <thruster file="skua_prop0">
          <location unit="M">
            <x> 1.5600 </x>
            <y> 0.0000 </y>
            <z> 0.0000 </z>
          </location>
          <orient unit="DEG"> <roll>0.00</roll> <pitch>0.00</pitch> <yaw>0.00</yaw> </orient>
          <sense>-1</sense>
        </thruster>
      </engine>
    </propulsion>
    <flight_control name="skua">
      <channel name="Pitch">
        <summer name="fcs/pitch-trim-sum">
          <input>fcs/elevator-cmd-norm</input>
          <input>fcs/pitch-trim-cmd-norm</input>
          <clipto> <min>-1</min> <max>1</max> </clipto>
        </summer>
        <aerosurface_scale name="fcs/elevator-control">
          <input>fcs/pitch-trim-sum</input>
          <range> <min>-25.00</min> <max>25.00</max> </range>
          <gain>0.0174533</gain>
        </aerosurface_scale>
        <actuator name="fcs/elevator-actuator">
          <input>fcs/elevator-control</input>
          <rate_limit>2.0</rate_limit>
          <output>fcs/elevator-pos-rad</output>
        </actuator>
      </channel>
      <channel name="Roll">
        <summer name="fcs/roll-trim-sum">
          <input>fcs/aileron-cmd-norm</input>
          <input>fcs/roll-trim-cmd-norm</input>
          <clipto> <min>-1</min> <max>1</max> </clipto>
        </summer>
        <aerosurface_scale name="fcs/left-aileron-control">
          <input>fcs/roll-trim-sum</input>
          <range> <min>-20.00</min> <max>20.00</max> </range>
          <gain>0.0174533</gain>
        </aerosurface_scale>
        <actuator name="fcs/left-aileron-actuator">
          <input>fcs/left-aileron-control</input>
          <rate_limit>2.0</rate_limit>
          <output>fcs/left-aileron-pos-rad</output>
        </actuator>
        <pure_gain name="fcs/right-aileron">
          <input>fcs/left-aileron-pos-rad</input>
          <gain>-1</gain>
          <output>fcs/right-aileron-pos-rad</output>
        </pure_gain>
      </channel>
      <channel name="Yaw">
        <summer name="fcs/yaw-trim-sum">
          <input>fcs/rudder-cmd-norm</input>
          <input>fcs/yaw-trim-cmd-norm</input>
          <clipto> <min>-1</min> <max>1</max> </clipto>
        </summer>
        <aerosurface_scale name="fcs/rudder-control">
          <input>fcs/yaw-trim-sum</input>
          <range> <min>-25.00</min> <max>25.00</max> </range>
          <gain>0.0174533</gain>
        </aerosurface_scale>
        <actuator name="fcs/rudder-actuator">
          <input>fcs/rudder-control</input>
          <rate_limit>2.0</rate_limit>
          <output>fcs/rudder-pos-rad</output>
        </actuator>
        <!-- the nose or tail wheel steers with the rudder pedals (JSBSim steers from
             fcs/steer-cmd-norm, positive right; the rudder command is positive left) -->
        <pure_gain name="fcs/steer-from-rudder">
          <input>fcs/yaw-trim-sum</input>
          <gain>-1</gain>
          <output>fcs/steer-cmd-norm</output>
        </pure_gain>
      </channel>
      <channel name="Flaps">
        <kinematic name="fcs/flaps-control">
          <input>fcs/flap-cmd-norm</input>
          <traverse>
            <setting> <position>0.0</position> <time>0.0</time> </setting>
            <setting> <position>8.8</position> <time>2.0</time> </setting>
            <setting> <position>17.5</position> <time>2.0</time> </setting>
            <setting> <position>26.2</position> <time>2.0</time> </setting>
            <setting> <position>35.0</position> <time>2.0</time> </setting>
          </traverse>
          <output>fcs/flap-pos-deg</output>
        </kinematic>
      </channel>
    </flight_control>
    <aerodynamics>
      <axis name="DRAG">
        <function name="aero/coefficient/CD_base">
          <description>CD over alpha and beta (hangar)</description>
          <product>
            <property>aero/qbar-psf</property>
            <property>metrics/Sw-sqft</property>
          <table>
            <independentVar lookup="row">aero/alpha-deg</independentVar>
            <independentVar lookup="column">aero/beta-deg</independentVar>
            <tableData>
                        -90.00    -70.00    -50.00    -40.00    -30.00    -25.00    -20.00    -15.00    -10.00     -6.00     -3.00      0.00      3.00      6.00     10.00     15.00     20.00     25.00     30.00     40.00     50.00     70.00     90.00
             -180.00   0.44287   0.35693   0.20416   0.13484   0.08309   0.06503   0.05206   0.04365   0.03774   0.03749   0.03748   0.03750   0.03748   0.03749   0.03774   0.04365   0.05206   0.06503   0.08309   0.13484   0.20416   0.35693   0.44287
             -120.00   0.44287   0.44789   0.62896   0.80265   1.00218   1.09963   1.18851   1.26378   1.32104   1.35140   1.36467   1.36915   1.36467   1.35140   1.32104   1.26378   1.18851   1.09963   1.00218   0.80265   0.62896   0.44789   0.44287
              -60.00   0.44287   0.46810   0.65450   0.82439   1.01752   1.11146   1.19699   1.26934   1.32434   1.35332   1.36611   1.37042   1.36611   1.35332   1.32434   1.26934   1.19699   1.11146   1.01752   0.82439   0.65450   0.46810   0.44287
              -35.00   0.44287   0.42879   0.42474   0.44739   0.48835   0.51710   0.54018   0.56056   0.57628   0.58274   0.58741   0.58855   0.58741   0.58274   0.57628   0.56056   0.54018   0.51710   0.48835   0.44739   0.42474   0.42879   0.44287
              -22.00   0.44287   0.40999   0.31660   0.27351   0.25986   0.25697   0.25307   0.25107   0.24989   0.24999   0.24954   0.24927   0.24954   0.24999   0.24989   0.25107   0.25307   0.25697   0.25986   0.27351   0.31660   0.40999   0.44287
              -17.00   0.44287   0.40516   0.28571   0.22014   0.17805   0.16062   0.14581   0.13638   0.12983   0.12661   0.12524   0.12477   0.12524   0.12661   0.12983   0.13638   0.14581   0.16062   0.17805   0.22014   0.28571   0.40516   0.44287
              -13.00   0.44287   0.40172   0.26676   0.19701   0.14891   0.12973   0.11050   0.09643   0.08715   0.08274   0.08098   0.08039   0.08098   0.08274   0.08715   0.09643   0.11050   0.12973   0.14891   0.19701   0.26676   0.40172   0.44287
               -9.00   0.44287   0.39851   0.25753   0.18046   0.13001   0.10406   0.08247   0.06664   0.05621   0.05128   0.04931   0.04867   0.04931   0.05128   0.05621   0.06664   0.08247   0.10406   0.13001   0.18046   0.25753   0.39851   0.44287
               -5.00   0.44287   0.39736   0.25136   0.17062   0.11849   0.09031   0.06763   0.05105   0.04019   0.03514   0.03316   0.03253   0.03316   0.03514   0.04019   0.05105   0.06763   0.09031   0.11849   0.17062   0.25136   0.39736   0.44287
               -1.00   0.44287   0.39703   0.24977   0.16856   0.11708   0.08866   0.06606   0.04963   0.03898   0.03412   0.03227   0.03170   0.03227   0.03412   0.03898   0.04963   0.06606   0.08866   0.11708   0.16856   0.24977   0.39703   0.44287
                3.00   0.44287   0.39760   0.25181   0.17359   0.12642   0.09925   0.07788   0.06249   0.05263   0.04819   0.04653   0.04603   0.04653   0.04819   0.05263   0.06249   0.07788   0.09925   0.12642   0.17359   0.25181   0.39760   0.44287
                7.00   0.44287   0.39938   0.25794   0.18725   0.14676   0.12233   0.10339   0.08997   0.08151   0.07775   0.07634   0.07591   0.07634   0.07775   0.08151   0.08997   0.10339   0.12233   0.14676   0.18725   0.25794   0.39938   0.44287
               11.00   0.44287   0.40157   0.27035   0.20481   0.17364   0.15442   0.13985   0.12991   0.12390   0.12134   0.12040   0.12010   0.12040   0.12134   0.12390   0.12991   0.13985   0.15442   0.17364   0.20481   0.27035   0.40157   0.44287
               15.00   0.44287   0.40461   0.28810   0.23270   0.20741   0.19351   0.18365   0.17730   0.17367   0.17257   0.17253   0.17255   0.17253   0.17257   0.17367   0.17730   0.18365   0.19351   0.20741   0.23270   0.28810   0.40461   0.44287
               19.00   0.44287   0.40861   0.31302   0.26907   0.25341   0.24717   0.24076   0.23710   0.23541   0.23492   0.23473   0.23490   0.23473   0.23492   0.23541   0.23710   0.24076   0.24717   0.25341   0.26907   0.31302   0.40861   0.44287
               23.00   0.44287   0.41364   0.33987   0.31019   0.30844   0.31067   0.30997   0.31130   0.31322   0.31456   0.31558   0.31563   0.31558   0.31456   0.31322   0.31130   0.30997   0.31067   0.30844   0.31019   0.33987   0.41364   0.44287
               27.00   0.44287   0.41900   0.37044   0.35807   0.36784   0.38426   0.39084   0.39790   0.40428   0.40822   0.41000   0.41037   0.41000   0.40822   0.40428   0.39790   0.39084   0.38426   0.36784   0.35807   0.37044   0.41900   0.44287
               32.00   0.44287   0.42641   0.41279   0.42632   0.45714   0.48129   0.50170   0.51720   0.53015   0.52731   0.54119   0.54214   0.54119   0.52731   0.53015   0.51720   0.50170   0.48129   0.45714   0.42632   0.41279   0.42641   0.44287
               46.00   0.44287   0.44921   0.54345   0.64269   0.75734   0.81361   0.86537   0.90897   0.94388   0.95812   0.96747   0.96989   0.96747   0.95812   0.94388   0.90897   0.86537   0.81361   0.75734   0.64269   0.54345   0.44921   0.44287
               70.00   0.44287   0.48097   0.73691   0.96135   1.21307   1.33472   1.44519   1.53847   1.60933   1.64704   1.66319   1.66869   1.66319   1.64704   1.60933   1.53847   1.44519   1.33472   1.21307   0.96135   0.73691   0.48097   0.44287
              120.00   0.44287   0.44575   0.61503   0.77912   0.96822   1.06073   1.14517   1.21671   1.27117   1.30004   1.31267   1.31693   1.31267   1.30004   1.27117   1.21671   1.14517   1.06073   0.96822   0.77912   0.61503   0.44575   0.44287
              180.00   0.44287   0.35693   0.20416   0.13484   0.08309   0.06503   0.05206   0.04365   0.03774   0.03749   0.03748   0.03750   0.03748   0.03749   0.03774   0.04365   0.05206   0.06503   0.08309   0.13484   0.20416   0.35693   0.44287
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            </tableData>
          </table>
          </product>
        </function>
        <function name="aero/coefficient/CD_aileron">
          <description>CD increment from aileron (deg), over alpha</description>
          <product>
            <property>aero/qbar-psf</property>
            <property>metrics/Sw-sqft</property>
          <table>
            <independentVar lookup="row">aero/alpha-deg</independentVar>
            <independentVar lookup="column">fcs/left-aileron-pos-deg</independentVar>
            <tableData>
                        -20.00    -15.00    -10.00     -5.00      0.00      5.00     10.00     15.00     20.00
             -180.00   0.00720   0.00412   0.00185   0.00047   0.00000   0.00047   0.00185   0.00412   0.00720
             -120.00   0.00717   0.00411   0.00185   0.00047   0.00000   0.00047   0.00185   0.00411   0.00717
              -60.00   0.00717   0.00411   0.00185   0.00047   0.00000   0.00047   0.00185   0.00411   0.00717
              -35.00   0.01965   0.01257   0.00628   0.00169   0.00000   0.00169   0.00628   0.01257   0.01965
              -22.00   0.01588   0.00971   0.00555   0.00201   0.00000   0.00201   0.00555   0.00971   0.01588
              -17.00   0.01948   0.01327   0.00728   0.00226   0.00000   0.00226   0.00728   0.01327   0.01948
              -13.00   0.02202   0.01478   0.00772   0.00213   0.00000   0.00213   0.00772   0.01478   0.02202
               -9.00   0.02226   0.01494   0.00777   0.00214   0.00000   0.00214   0.00777   0.01494   0.02226
               -5.00   0.02230   0.01496   0.00778   0.00214   0.00000   0.00214   0.00778   0.01496   0.02230
               -1.00   0.02236   0.01501   0.00780   0.00215   0.00000   0.00215   0.00780   0.01501   0.02236
                3.00   0.02246   0.01507   0.00784   0.00216   0.00000   0.00216   0.00784   0.01507   0.02246
                7.00   0.02256   0.01515   0.00789   0.00217   0.00000   0.00217   0.00789   0.01515   0.02256
               11.00   0.02517   0.01685   0.00872   0.00239   0.00000   0.00239   0.00872   0.01685   0.02517
               15.00   0.04346   0.02817   0.01387   0.00320   0.00000   0.00320   0.01387   0.02817   0.04346
               19.00   0.03773   0.02405   0.01197   0.00321   0.00000   0.00321   0.01197   0.02405   0.03773
               23.00   0.03328   0.02130   0.01063   0.00286   0.00000   0.00286   0.01063   0.02130   0.03328
               27.00   0.03076   0.01972   0.00985   0.00265   0.00000   0.00265   0.00985   0.01972   0.03076
               32.00   0.02787   0.01791   0.00897   0.00241   0.00000   0.00241   0.00897   0.01791   0.02787
               46.00   0.01343   0.00835   0.00407   0.00108   0.00000   0.00108   0.00407   0.00835   0.01343
               70.00   0.00717   0.00411   0.00185   0.00047   0.00000   0.00047   0.00185   0.00411   0.00717
              120.00   0.00717   0.00411   0.00185   0.00047   0.00000   0.00047   0.00185   0.00411   0.00717
              180.00   0.00720   0.00412   0.00185   0.00047   0.00000   0.00047   0.00185   0.00412   0.00720
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            </tableData>
          </table>
          </product>
        </function>
        <function name="aero/coefficient/CD_elevator">
          <description>CD increment from elevator (deg), over alpha</description>
          <product>
            <property>aero/qbar-psf</property>
            <property>metrics/Sw-sqft</property>
          <table>
            <independentVar lookup="row">aero/alpha-deg</independentVar>
            <independentVar lookup="column">fcs/elevator-pos-deg</independentVar>
            <tableData>
                        -25.00    -20.00    -15.00    -10.00     -5.00      0.00      5.00     10.00     15.00     20.00     25.00
             -180.00   0.00704   0.00461   0.00264   0.00119   0.00030   0.00000   0.00030   0.00119   0.00264   0.00461   0.00704
             -120.00   0.00704   0.00461   0.00264   0.00119   0.00030   0.00000   0.00030   0.00119   0.00264   0.00461   0.00704
              -60.00   0.00704   0.00461   0.00264   0.00119   0.00030   0.00000   0.00030   0.00119   0.00264   0.00461   0.00704
              -35.00   0.01751   0.01342   0.00973   0.00593   0.00231   0.00000   0.00004   0.00264   0.00704   0.01235   0.01820
              -22.00   0.02605   0.02069   0.01584   0.01071   0.00514   0.00000  -0.00317  -0.00427  -0.00234   0.00161   0.00682
              -17.00   0.01939   0.01471   0.01112   0.00741   0.00400   0.00000  -0.00657  -0.01213  -0.01476  -0.01510  -0.01406
              -13.00   0.03125   0.02647   0.02225   0.01663   0.00853   0.00000  -0.00660  -0.01039  -0.01150  -0.01080  -0.00902
               -9.00   0.03362   0.02797   0.02173   0.01433   0.00656   0.00000  -0.00424  -0.00588  -0.00541  -0.00363  -0.00109
               -5.00   0.02654   0.02128   0.01574   0.00980   0.00411   0.00000  -0.00176  -0.00125   0.00082   0.00367   0.00698
               -1.00   0.01848   0.01395   0.00950   0.00516   0.00163   0.00000   0.00070   0.00338   0.00704   0.01096   0.01502
                3.00   0.01140   0.00684   0.00325   0.00054  -0.00082   0.00000   0.00315   0.00796   0.01320   0.01818   0.02299
                7.00   0.00368   0.00032  -0.00219  -0.00396  -0.00325   0.00000   0.00557   0.01252   0.01933   0.02536   0.03091
               11.00  -0.00341  -0.00615  -0.00817  -0.00838  -0.00584   0.00000   0.00824   0.01748   0.02593   0.03302   0.03931
               15.00  -0.01009  -0.01464  -0.01613  -0.01376  -0.00749   0.00000   0.00540   0.01268   0.02018   0.02684   0.03293
               19.00   0.00640   0.00003  -0.00524  -0.00786  -0.00542   0.00000   0.00702   0.01582   0.02439   0.03172   0.03822
               23.00   0.00906   0.00262  -0.00262  -0.00563  -0.00521   0.00000   0.00734   0.01690   0.02626   0.03428   0.04134
               27.00   0.01126   0.00479  -0.00058  -0.00399  -0.00746   0.00000   0.00756   0.01707   0.02658   0.03494   0.04245
               32.00   0.01389   0.00920   0.00073  -0.00178  -0.00601   0.00000   0.00880   0.01922   0.02875   0.03678   0.04407
               46.00   0.01406   0.00978   0.00595   0.00272   0.00055   0.00000   0.00126   0.00393   0.00723   0.01072   0.01441
               70.00   0.00704   0.00461   0.00264   0.00119   0.00030   0.00000   0.00030   0.00119   0.00264   0.00461   0.00704
              120.00   0.00704   0.00461   0.00264   0.00119   0.00030   0.00000   0.00030   0.00119   0.00264   0.00461   0.00704
              180.00   0.00704   0.00461   0.00264   0.00119   0.00030   0.00000   0.00030   0.00119   0.00264   0.00461   0.00704
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            </tableData>
          </table>
          </product>
        </function>
        <function name="aero/coefficient/CD_flap">
          <description>CD increment from flap (deg), over alpha</description>
          <product>
            <property>aero/qbar-psf</property>
            <property>metrics/Sw-sqft</property>
          <table>
            <independentVar lookup="row">aero/alpha-deg</independentVar>
            <independentVar lookup="column">fcs/flap-pos-deg</independentVar>
            <tableData>
                          0.00      5.00     10.00     15.00     20.00     25.00     30.00     35.00
             -180.00   0.00000   0.00028   0.00109   0.00243   0.00424   0.00647   0.00906   0.01193
             -120.00   0.00000   0.00027   0.00109   0.00242   0.00423   0.00645   0.00903   0.01189
              -60.00   0.00000   0.00027   0.00109   0.00242   0.00423   0.00645   0.00903   0.01189
              -35.00   0.00000   0.00733   0.01699   0.02822   0.04016   0.05226   0.06430   0.07630
              -22.00   0.00000  -0.00004  -0.00597  -0.01888  -0.03376  -0.04335  -0.04659  -0.04558
              -17.00   0.00000  -0.00822  -0.01207  -0.01103  -0.00767  -0.00322   0.00163   0.00721
              -13.00   0.00000  -0.00345  -0.00409  -0.00237   0.00101   0.00583   0.01260   0.02015
               -9.00   0.00000  -0.00108   0.00064   0.00468   0.01040   0.01747   0.02532   0.03363
               -5.00   0.00000   0.00123   0.00518   0.01141   0.02012   0.02906   0.03837   0.04808
               -1.00   0.00000   0.00366   0.00998   0.02032   0.03014   0.04160   0.05251   0.06363
                3.00   0.00000   0.00631   0.01751   0.02813   0.04174   0.05518   0.06431   0.07678
                7.00   0.00000   0.00924   0.02242   0.03843   0.05551   0.07239   0.08598   0.10165
               11.00   0.00000   0.01163   0.03178   0.04869   0.06766   0.09465   0.11433   0.13452
               15.00   0.00000   0.00720   0.01872   0.03380   0.05162   0.07154   0.09322   0.11629
               19.00   0.00000   0.00455   0.01407   0.02794   0.04204   0.05654   0.07281   0.08918
               23.00   0.00000   0.00166   0.00769   0.01716   0.01795   0.03455   0.05320   0.06737
               27.00   0.00000  -0.00027   0.00347   0.01035   0.01663   0.02822   0.02998   0.03644
               32.00   0.00000  -0.00273  -0.00351   0.00035   0.00721   0.00976   0.02803   0.03680
               46.00   0.00000  -0.00242  -0.00323  -0.00256  -0.00069   0.00209   0.00555   0.00958
               70.00   0.00000   0.00027   0.00109   0.00242   0.00422   0.00645   0.00903   0.01188
              120.00   0.00000   0.00027   0.00109   0.00242   0.00423   0.00645   0.00903   0.01189
              180.00   0.00000   0.00028   0.00109   0.00243   0.00424   0.00647   0.00906   0.01193
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            </tableData>
          </table>
          </product>
        </function>
        <function name="aero/coefficient/CD_rudder">
          <description>CD increment from rudder (deg), over alpha</description>
          <product>
            <property>aero/qbar-psf</property>
            <property>metrics/Sw-sqft</property>
          <table>
            <independentVar lookup="row">aero/alpha-deg</independentVar>
            <independentVar lookup="column">fcs/rudder-pos-deg</independentVar>
            <tableData>
                        -25.00    -20.00    -15.00    -10.00     -5.00      0.00      5.00     10.00     15.00     20.00     25.00
             -180.00   0.00535   0.00350   0.00201   0.00090   0.00023   0.00000   0.00023   0.00090   0.00201   0.00350   0.00535
             -120.00   0.00067   0.00044   0.00025   0.00011   0.00003   0.00000   0.00003   0.00011   0.00025   0.00044   0.00067
              -60.00   0.00077   0.00052   0.00031   0.00015   0.00004   0.00000   0.00004   0.00015   0.00031   0.00052   0.00077
              -35.00   0.00420   0.00063   0.00317   0.00151   0.00041   0.00000   0.00041   0.00151   0.00317   0.00063   0.00420
              -22.00   0.00899   0.00650   0.00394   0.00267   0.00066   0.00000   0.00066   0.00267   0.00394   0.00650   0.00899
              -17.00   0.00955   0.00691   0.00439   0.00213   0.00065   0.00000   0.00065   0.00213   0.00439   0.00691   0.00955
              -13.00   0.01132   0.00841   0.00556   0.00286   0.00079   0.00000   0.00079   0.00286   0.00556   0.00841   0.01132
               -9.00   0.01182   0.00878   0.00583   0.00301   0.00084   0.00000   0.00084   0.00301   0.00583   0.00878   0.01182
               -5.00   0.01213   0.00902   0.00598   0.00308   0.00084   0.00000   0.00084   0.00308   0.00598   0.00902   0.01213
               -1.00   0.01226   0.00911   0.00605   0.00312   0.00085   0.00000   0.00085   0.00312   0.00605   0.00911   0.01226
                3.00   0.01222   0.00908   0.00603   0.00311   0.00085   0.00000   0.00085   0.00311   0.00603   0.00908   0.01222
                7.00   0.01200   0.00892   0.00592   0.00305   0.00084   0.00000   0.00084   0.00305   0.00592   0.00892   0.01200
               11.00   0.01148   0.00877   0.00575   0.00296   0.00085   0.00000   0.00085   0.00296   0.00575   0.00877   0.01148
               15.00   0.00958   0.00484   0.00571   0.00301   0.00040   0.00000   0.00040   0.00301   0.00571   0.00484   0.00958
               19.00   0.00920   0.00605   0.00266   0.00152   0.00076   0.00000   0.00076   0.00152   0.00266   0.00605   0.00920
               23.00   0.00798   0.00548   0.00277   0.00130   0.00062   0.00000   0.00062   0.00130   0.00277   0.00548   0.00798
               27.00   0.00695   0.00483   0.00270   0.00078   0.00054   0.00000   0.00054   0.00078   0.00270   0.00483   0.00695
               32.00   0.00547   0.00370   0.00174   0.00180   0.00043   0.00000   0.00043   0.00180   0.00174   0.00370   0.00547
               46.00   0.00461   0.00318   0.00217   0.00108   0.00029   0.00000   0.00029   0.00108   0.00217   0.00318   0.00461
               70.00   0.00025   0.00017   0.00010   0.00005   0.00001   0.00000   0.00001   0.00005   0.00010   0.00017   0.00025
              120.00   0.00067   0.00044   0.00025   0.00011   0.00003   0.00000   0.00003   0.00011   0.00025   0.00044   0.00067
              180.00   0.00535   0.00350   0.00201   0.00090   0.00023   0.00000   0.00023   0.00090   0.00201   0.00350   0.00535
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            </tableData>
          </table>
          </product>
        </function>
        <function name="aero/coefficient/CD_ground">
          <description>Induced drag change in ground effect</description>
          <product>
            <property>aero/qbar-psf</property>
            <property>metrics/Sw-sqft</property>
            <property>aero/cl-squared</property>
            <value>0.03037</value>
          <table>
            <independentVar lookup="row">aero/h_b-mac-ft</independentVar>
            <tableData>
                    0.00   -1.00000
                    0.10   -0.28090
                    0.15   -0.14793
                    0.20   -0.08897
                    0.30   -0.04160
                    0.40   -0.02383
                    0.50   -0.01538
                    0.60   -0.01073
                    0.70   -0.00791
                    0.80   -0.00607
                    0.90   -0.00480
                    1.00   -0.00389
                    1.10   -0.00322
            </tableData>
          </table>
          </product>
        </function>
      </axis>
      <axis name="SIDE">
        <function name="aero/coefficient/CY_base">
          <description>CY over alpha and beta (hangar)</description>
          <product>
            <property>aero/qbar-psf</property>
            <property>metrics/Sw-sqft</property>
          <table>
            <independentVar lookup="row">aero/alpha-deg</independentVar>
            <independentVar lookup="column">aero/beta-deg</independentVar>
            <tableData>
                        -90.00    -70.00    -50.00    -40.00    -30.00    -25.00    -20.00    -15.00    -10.00     -6.00     -3.00      0.00      3.00      6.00     10.00     15.00     20.00     25.00     30.00     40.00     50.00     70.00     90.00
             -180.00  -0.00000   0.13141   0.15907   0.13358   0.09387   0.07235   0.05168   0.03319   0.04356   0.04885   0.02537  -0.00000  -0.02537  -0.04885  -0.04356  -0.03319  -0.05168  -0.07235  -0.09387  -0.13358  -0.15907  -0.13141   0.00000
             -120.00  -0.00000  -0.06812  -0.28827  -0.36648  -0.37940  -0.35634  -0.31361  -0.25297  -0.17754  -0.10673  -0.04519  -0.00000   0.04519   0.10673   0.17754   0.25297   0.31361   0.35634   0.37940   0.36648   0.28827   0.06812   0.00000
              -60.00   0.00000  -0.06066  -0.26645  -0.33991  -0.35175  -0.32960  -0.28849  -0.22968  -0.15490  -0.07797  -0.03711  -0.00000   0.03711   0.07797   0.15490   0.22968   0.28849   0.32960   0.35175   0.33991   0.26645   0.06066  -0.00000
              -35.00   0.00000   0.05440   0.00643  -0.02939  -0.05015  -0.03802  -0.03677  -0.03183  -0.01936  -0.00059  -0.00520  -0.00000   0.00520   0.00059   0.01936   0.03183   0.03677   0.03802   0.05015   0.02939  -0.00643  -0.05440  -0.00000
              -22.00   0.00000   0.10619   0.12455   0.10134   0.08495   0.07548   0.05508   0.03750   0.02301   0.03245   0.00987  -0.00000  -0.00987  -0.03245  -0.02301  -0.03750  -0.05508  -0.07548  -0.08495  -0.10134  -0.12455  -0.10619  -0.00000
              -17.00   0.00000   0.12375   0.16442   0.15246   0.13849   0.12470   0.09727   0.07038   0.04515   0.02679   0.01423  -0.00000  -0.01423  -0.02679  -0.04515  -0.07038  -0.09727  -0.12470  -0.13849  -0.15246  -0.16442  -0.12375  -0.00000
              -13.00   0.00000   0.13723   0.19482   0.17686   0.15776   0.14159   0.11091   0.08047   0.05163   0.03013   0.01501  -0.00000  -0.01501  -0.03013  -0.05163  -0.08047  -0.11091  -0.14159  -0.15776  -0.17686  -0.19482  -0.13723  -0.00000
               -9.00   0.00000   0.15099   0.20498   0.18967   0.18081   0.15208   0.11923   0.08646   0.05528   0.03209   0.01577  -0.00000  -0.01577  -0.03209  -0.05528  -0.08646  -0.11923  -0.15208  -0.18081  -0.18967  -0.20498  -0.15099  -0.00000
               -5.00   0.00000   0.15523   0.21163   0.19813   0.18846   0.15719   0.12308   0.08898   0.05647   0.03246   0.01580  -0.00000  -0.01580  -0.03246  -0.05647  -0.08898  -0.12308  -0.15719  -0.18846  -0.19813  -0.21163  -0.15523  -0.00000
               -1.00   0.00000   0.15620   0.21317   0.19810   0.18921   0.15713   0.12271   0.08834   0.05564   0.03161   0.01516  -0.00000  -0.01516  -0.03161  -0.05564  -0.08834  -0.12271  -0.15713  -0.18921  -0.19810  -0.21317  -0.15620  -0.00000
                3.00   0.00000   0.15068   0.20977   0.19329   0.18382   0.15193   0.11817   0.08469   0.05308   0.03000   0.01430  -0.00000  -0.01430  -0.03000  -0.05308  -0.08469  -0.11817  -0.15193  -0.18382  -0.19329  -0.20977  -0.15068  -0.00000
                7.00   0.00000   0.13927   0.19967   0.18202   0.17235   0.14141   0.10928   0.07786   0.04859   0.02744   0.01312  -0.00000  -0.01312  -0.02744  -0.04859  -0.07786  -0.10928  -0.14141  -0.17235  -0.18202  -0.19967  -0.13927  -0.00000
               11.00   0.00000   0.12925   0.17033   0.15255   0.15054   0.12207   0.09338   0.06591   0.04085   0.02306   0.01105  -0.00000  -0.01105  -0.02306  -0.04085  -0.06591  -0.09338  -0.12207  -0.15054  -0.15255  -0.17033  -0.12925  -0.00000
               15.00   0.00000   0.11736   0.14962   0.12442   0.12230   0.09653   0.07220   0.04997   0.03071   0.01712   0.00820  -0.00000  -0.00820  -0.01712  -0.03071  -0.04997  -0.07220  -0.09653  -0.12230  -0.12442  -0.14962  -0.11736  -0.00000
               19.00   0.00000   0.10635   0.12869   0.10470   0.09620   0.08000   0.05868   0.03998   0.02409   0.01315   0.00541  -0.00000  -0.00541  -0.01315  -0.02409  -0.03998  -0.05868  -0.08000  -0.09620  -0.10470  -0.12869  -0.10635  -0.00000
               23.00   0.00000   0.09559   0.10025   0.07402   0.06333   0.05517   0.03599   0.02232   0.01203   0.00589   0.01006  -0.00000  -0.01006  -0.00589  -0.01203  -0.02232  -0.03599  -0.05517  -0.06333  -0.07402  -0.10025  -0.09559  -0.00000
               27.00   0.00000   0.08147   0.06679   0.03774   0.01788   0.02727   0.01080   0.00152  -0.00228   0.00015   0.00420  -0.00000  -0.00420  -0.00015   0.00228  -0.00152  -0.01080  -0.02727  -0.01788  -0.03774  -0.06679  -0.08147  -0.00000
               32.00   0.00000   0.06127   0.01938  -0.01472  -0.03420  -0.02316  -0.02144  -0.02605  -0.02226  -0.01477  -0.00336  -0.00000   0.00336   0.01477   0.02226   0.02605   0.02144   0.02316   0.03420   0.01472  -0.01938  -0.06127  -0.00000
               46.00   0.00000  -0.00335  -0.13281  -0.18662  -0.20094  -0.18876  -0.16220  -0.11432  -0.06069  -0.03308  -0.01941  -0.00000   0.01941   0.03308   0.06069   0.11432   0.16220   0.18876   0.20094   0.18662   0.13281   0.00335  -0.00000
               70.00   0.00000  -0.10204  -0.36820  -0.45821  -0.46869  -0.43837  -0.38437  -0.30864  -0.21443  -0.12802  -0.05784  -0.00000   0.05784   0.12802   0.21443   0.30864   0.38437   0.43837   0.46869   0.45821   0.36820   0.10204  -0.00000
              120.00  -0.00000  -0.06230  -0.27173  -0.34678  -0.35983  -0.33823  -0.29786  -0.24038  -0.16876  -0.10134  -0.04247  -0.00000   0.04247   0.10134   0.16876   0.24038   0.29786   0.33823   0.35983   0.34678   0.27173   0.06230   0.00000
              180.00  -0.00000   0.13141   0.15907   0.13358   0.09387   0.07235   0.05168   0.03319   0.04356   0.04885   0.02537  -0.00000  -0.02537  -0.04885  -0.04356  -0.03319  -0.05168  -0.07235  -0.09387  -0.13358  -0.15907  -0.13141   0.00000
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            </tableData>
          </table>
          </product>
        </function>
        <function name="aero/coefficient/CY_aileron">
          <description>CY increment from aileron (deg), over alpha</description>
          <product>
            <property>aero/qbar-psf</property>
            <property>metrics/Sw-sqft</property>
          <table>
            <independentVar lookup="row">aero/alpha-deg</independentVar>
            <independentVar lookup="column">fcs/left-aileron-pos-deg</independentVar>
            <tableData>
                        -20.00    -15.00    -10.00     -5.00      0.00      5.00     10.00     15.00     20.00
             -180.00  -0.00000   0.00000   0.00000   0.00000   0.00000   0.00000   0.00000   0.00000  -0.00000
             -120.00   0.00134   0.00114   0.00084   0.00045   0.00000  -0.00045  -0.00084  -0.00114  -0.00134
              -60.00  -0.00155  -0.00131  -0.00097  -0.00052   0.00000   0.00052   0.00097   0.00131   0.00155
              -35.00  -0.00445  -0.00390  -0.00296  -0.00160   0.00000   0.00160   0.00296   0.00390   0.00445
              -22.00  -0.00642  -0.00563  -0.00445  -0.00252   0.00000   0.00252   0.00445   0.00563   0.00642
              -17.00  -0.01079  -0.00930  -0.00700  -0.00378   0.00000   0.00378   0.00700   0.00930   0.01079
              -13.00  -0.01213  -0.01038  -0.00773  -0.00413   0.00000   0.00413   0.00773   0.01038   0.01213
               -9.00  -0.01215  -0.01040  -0.00775  -0.00413   0.00000   0.00413   0.00775   0.01040   0.01215
               -5.00  -0.01208  -0.01035  -0.00771  -0.00412   0.00000   0.00412   0.00771   0.01035   0.01208
               -1.00  -0.01197  -0.01026  -0.00765  -0.00408   0.00000   0.00408   0.00765   0.01026   0.01197
                3.00  -0.01184  -0.01015  -0.00757  -0.00404   0.00000   0.00404   0.00757   0.01015   0.01184
                7.00  -0.01170  -0.01003  -0.00748  -0.00400   0.00000   0.00400   0.00748   0.01003   0.01170
               11.00  -0.01098  -0.00938  -0.00697  -0.00372   0.00000   0.00372   0.00697   0.00938   0.01098
               15.00  -0.01567  -0.01327  -0.00981  -0.00521   0.00000   0.00521   0.00981   0.01327   0.01567
               19.00  -0.01147  -0.00970  -0.00717  -0.00382   0.00000   0.00382   0.00717   0.00970   0.01147
               23.00  -0.00962  -0.00823  -0.00615  -0.00329   0.00000   0.00329   0.00615   0.00823   0.00962
               27.00  -0.00797  -0.00689  -0.00518  -0.00278   0.00000   0.00278   0.00518   0.00689   0.00797
               32.00  -0.00643  -0.00560  -0.00423  -0.00228   0.00000   0.00228   0.00423   0.00560   0.00643
               46.00  -0.00363  -0.00314  -0.00236  -0.00126   0.00000   0.00126   0.00236   0.00314   0.00363
               70.00  -0.00044  -0.00038  -0.00028  -0.00015   0.00000   0.00015   0.00028   0.00038   0.00044
              120.00   0.00152   0.00129   0.00096   0.00051   0.00000  -0.00051  -0.00096  -0.00129  -0.00152
              180.00  -0.00000  -0.00000  -0.00000  -0.00000   0.00000  -0.00000  -0.00000  -0.00000  -0.00000
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            </tableData>
          </table>
          </product>
        </function>
        <function name="aero/coefficient/CY_rudder">
          <description>CY increment from rudder (deg), over alpha</description>
          <product>
            <property>aero/qbar-psf</property>
            <property>metrics/Sw-sqft</property>
          <table>
            <independentVar lookup="row">aero/alpha-deg</independentVar>
            <independentVar lookup="column">fcs/rudder-pos-deg</independentVar>
            <tableData>
                        -25.00    -20.00    -15.00    -10.00     -5.00      0.00      5.00     10.00     15.00     20.00     25.00
             -180.00   0.00000   0.00000   0.00000   0.00000   0.00000   0.00000   0.00000   0.00000   0.00000   0.00000   0.00000
             -120.00  -0.00000  -0.00000  -0.00000  -0.00000  -0.00000   0.00000  -0.00000  -0.00000  -0.00000  -0.00000  -0.00000
              -60.00  -0.03710  -0.03349  -0.02848  -0.02111  -0.01123   0.00000   0.01123   0.02111   0.02848   0.03349   0.03710
              -35.00  -0.01080  -0.00043  -0.02058  -0.01420  -0.00778   0.00000   0.00778   0.01420   0.02058   0.00043   0.01080
              -22.00  -0.02667  -0.02433  -0.01870  -0.04056  -0.01032   0.00000   0.01032   0.04056   0.01870   0.02433   0.02667
              -17.00  -0.04153  -0.03765  -0.03133  -0.02273  -0.01326   0.00000   0.01326   0.02273   0.03133   0.03765   0.04153
              -13.00  -0.04843  -0.04345  -0.03660  -0.02702  -0.01449   0.00000   0.01449   0.02702   0.03660   0.04345   0.04843
               -9.00  -0.04988  -0.04474  -0.03792  -0.02801  -0.01508   0.00000   0.01508   0.02801   0.03792   0.04474   0.04988
               -5.00  -0.05065  -0.04551  -0.03844  -0.02840  -0.01511   0.00000   0.01511   0.02840   0.03844   0.04551   0.05065
               -1.00  -0.05092  -0.04568  -0.03863  -0.02855  -0.01518   0.00000   0.01518   0.02855   0.03863   0.04568   0.05092
                3.00  -0.05074  -0.04550  -0.03848  -0.02843  -0.01511   0.00000   0.01511   0.02843   0.03848   0.04550   0.05074
                7.00  -0.05012  -0.04501  -0.03806  -0.02813  -0.01495   0.00000   0.01495   0.02813   0.03806   0.04501   0.05012
               11.00  -0.04719  -0.04680  -0.03766  -0.02781  -0.01591   0.00000   0.01591   0.02781   0.03766   0.04680   0.04719
               15.00  -0.03122  -0.01660  -0.04862  -0.03495  -0.00699   0.00000   0.00699   0.03495   0.04862   0.01660   0.03122
               19.00  -0.03017  -0.02370  -0.01316  -0.01200  -0.01652   0.00000   0.01652   0.01200   0.01316   0.02370   0.03017
               23.00  -0.02378  -0.02036  -0.01272  -0.00912  -0.01050   0.00000   0.01050   0.00912   0.01272   0.02036   0.02378
               27.00  -0.02011  -0.01810  -0.01333  -0.00595  -0.00925   0.00000   0.00925   0.00595   0.01333   0.01810   0.02011
               32.00  -0.01609  -0.01463  -0.00948  -0.01796  -0.00810   0.00000   0.00810   0.01796   0.00948   0.01463   0.01609
               46.00  -0.04026  -0.03000  -0.02657  -0.01929  -0.01036   0.00000   0.01036   0.01929   0.02657   0.03000   0.04026
               70.00  -0.01736  -0.01567  -0.01333  -0.00988  -0.00525   0.00000   0.00525   0.00988   0.01333   0.01567   0.01736
              120.00   0.00000   0.00000   0.00000   0.00000   0.00000   0.00000   0.00000   0.00000   0.00000   0.00000   0.00000
              180.00  -0.00000  -0.00000  -0.00000  -0.00000  -0.00000   0.00000  -0.00000  -0.00000  -0.00000  -0.00000  -0.00000
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            </tableData>
          </table>
          </product>
        </function>
        <function name="aero/coefficient/CYp">
          <description>CY per p (non-dimensional), over alpha</description>
          <product>
            <property>aero/qbar-psf</property>
            <property>metrics/Sw-sqft</property>
            <property>aero/bi2vel</property>
            <property>velocities/p-aero-rad_sec</property>
          <table>
            <independentVar lookup="row">aero/alpha-deg</independentVar>
            <tableData>
                 -180.00   -0.15602
                 -165.00   -0.06783
                 -105.00   -0.05873
                  -50.00   -0.05462
                  -30.00   -0.03080
                  -20.00    0.11942
                  -16.00   -0.08551
                  -12.00   -0.08814
                   -8.00   -0.08770
                   -4.00   -0.08755
                    0.00   -0.08766
                    4.00   -0.08749
                    8.00   -0.08761
                   12.00    0.03876
                   16.00    0.02899
                   20.00   -0.00503
                   24.00   -0.02070
                   28.00   -0.03039
                   35.00   -0.03797
                   50.00   -0.05496
                   80.00   -0.05600
                  135.00   -0.06543
                  180.00   -0.15602
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            </tableData>
          </table>
          </product>
        </function>
        <function name="aero/coefficient/CYr">
          <description>CY per r (non-dimensional), over alpha</description>
          <product>
            <property>aero/qbar-psf</property>
            <property>metrics/Sw-sqft</property>
            <property>aero/bi2vel</property>
            <property>velocities/r-aero-rad_sec</property>
          <table>
            <independentVar lookup="row">aero/alpha-deg</independentVar>
            <tableData>
                 -180.00    0.41317
                 -165.00    0.42120
                 -105.00    0.17947
                  -50.00    0.27993
                  -30.00    0.17852
                  -20.00    0.06234
                  -16.00    0.17545
                  -12.00    0.18313
                   -8.00    0.19011
                   -4.00    0.19638
                    0.00    0.20114
                    4.00    0.20552
                    8.00    0.21592
                   12.00    0.29172
                   16.00    0.27627
                   20.00    0.26426
                   24.00    0.26020
                   28.00    0.25586
                   35.00    0.25941
                   50.00    0.33336
                   80.00    0.16568
                  135.00    0.32201
                  180.00    0.41317
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            </tableData>
          </table>
          </product>
        </function>
      </axis>
      <axis name="LIFT">
        <function name="aero/coefficient/CL_base">
          <description>CL over alpha and beta, ground effect (hangar)</description>
          <product>
            <property>aero/qbar-psf</property>
            <property>metrics/Sw-sqft</property>
          <table>
            <independentVar lookup="row">aero/alpha-deg</independentVar>
            <independentVar lookup="column">aero/beta-deg</independentVar>
            <tableData>
                        -90.00    -70.00    -50.00    -40.00    -30.00    -25.00    -20.00    -15.00    -10.00     -6.00     -3.00      0.00      3.00      6.00     10.00     15.00     20.00     25.00     30.00     40.00     50.00     70.00     90.00
             -180.00   0.00000  -0.00501   0.04154   0.06218   0.08073   0.08874   0.09562   0.10119   0.10528   0.10741   0.10832   0.10863   0.10832   0.10741   0.10528   0.10119   0.09562   0.08874   0.08073   0.06218   0.04154  -0.00501   0.00000
             -120.00  -0.00000   0.12046   0.34487   0.46852   0.58210   0.63118   0.67329   0.70728   0.73224   0.74594   0.75163   0.75244   0.75163   0.74594   0.73224   0.70728   0.67329   0.63118   0.58210   0.46852   0.34487   0.12046  -0.00000
              -60.00  -0.00000  -0.13564  -0.39797  -0.54386  -0.67833  -0.73655  -0.78655  -0.82694  -0.85661  -0.87346  -0.87654  -0.87724  -0.87654  -0.87346  -0.85661  -0.82694  -0.78655  -0.73655  -0.67833  -0.54386  -0.39797  -0.13564  -0.00000
              -35.00  -0.00000  -0.16694  -0.49283  -0.67369  -0.84016  -0.91246  -0.97238  -1.01988  -1.05458  -1.07151  -1.07948  -1.08198  -1.07948  -1.07151  -1.05458  -1.01988  -0.97238  -0.91246  -0.84016  -0.67369  -0.49283  -0.16694  -0.00000
              -22.00  -0.00000  -0.15622  -0.51444  -0.70149  -0.87225  -0.93747  -0.99010  -1.03262  -1.06273  -1.07754  -1.08431  -1.08597  -1.08431  -1.07754  -1.06273  -1.03262  -0.99010  -0.93747  -0.87225  -0.70149  -0.51444  -0.15622  -0.00000
              -17.00  -0.00000  -0.12079  -0.47372  -0.71260  -0.89067  -0.96269  -1.03952  -1.10657  -1.15174  -1.17396  -1.18265  -1.18592  -1.18265  -1.17396  -1.15174  -1.10657  -1.03952  -0.96269  -0.89067  -0.71260  -0.47372  -0.12079  -0.00000
              -13.00  -0.00000  -0.09605  -0.41454  -0.53800  -0.63196  -0.68907  -0.73470  -0.77075  -0.79656  -0.80963  -0.81504  -0.81685  -0.81504  -0.80963  -0.79656  -0.77075  -0.73470  -0.68907  -0.63196  -0.53800  -0.41454  -0.09605  -0.00000
               -9.00  -0.00000  -0.07600  -0.24102  -0.28909  -0.33649  -0.36437  -0.38686  -0.40427  -0.41632  -0.42214  -0.42445  -0.42518  -0.42445  -0.42214  -0.41632  -0.40427  -0.38686  -0.36437  -0.33649  -0.28909  -0.24102  -0.07600  -0.00000
               -5.00  -0.00000  -0.01610  -0.02677  -0.02232  -0.03643  -0.03687  -0.03648  -0.03556  -0.03421  -0.03302  -0.03227  -0.03196  -0.03227  -0.03302  -0.03421  -0.03556  -0.03648  -0.03687  -0.03643  -0.02232  -0.02677  -0.01610  -0.00000
               -1.00  -0.00000   0.05056   0.16708   0.21746   0.26483   0.29095   0.31401   0.33300   0.34731   0.35507   0.35854   0.35977   0.35854   0.35507   0.34731   0.33300   0.31401   0.29095   0.26483   0.21746   0.16708   0.05056  -0.00000
                3.00   0.00000   0.09092   0.37509   0.47303   0.56469   0.61737   0.66293   0.69982   0.72693   0.74102   0.74702   0.74905   0.74702   0.74102   0.72693   0.69982   0.66293   0.61737   0.56469   0.47303   0.37509   0.09092   0.00000
                7.00   0.00000   0.11291   0.54543   0.72565   0.86128   0.94006   1.00807   1.06286   1.10286   1.12347   1.13210   1.13494   1.13210   1.12347   1.10286   1.06286   1.00807   0.94006   0.86128   0.72565   0.54543   0.11291   0.00000
               11.00   0.00000   0.14926   0.57796   0.81947   1.06451   1.17959   1.27970   1.36072   1.42005   1.45072   1.46362   1.46784   1.46362   1.45072   1.42005   1.36072   1.27970   1.17959   1.06451   0.81947   0.57796   0.14926   0.00000
               15.00   0.00000   0.17586   0.58429   0.79496   0.97444   1.05872   1.13083   1.18598   1.22223   1.24601   1.25379   1.25465   1.25379   1.24601   1.22223   1.18598   1.13083   1.05872   0.97444   0.79496   0.58429   0.17586   0.00000
               19.00   0.00000   0.17928   0.50096   0.70779   0.87709   0.95077   1.01520   1.06768   1.10631   1.12639   1.13505   1.13757   1.13505   1.12639   1.10631   1.06768   1.01520   0.95077   0.87709   0.70779   0.50096   0.17928   0.00000
               23.00   0.00000   0.16437   0.49207   0.68107   0.85969   0.92984   0.98937   1.03705   1.07092   1.08785   1.09538   1.09779   1.09538   1.08785   1.07092   1.03705   0.98937   0.92984   0.85969   0.68107   0.49207   0.16437   0.00000
               27.00   0.00000   0.16498   0.49245   0.67433   0.84720   0.92411   0.98231   1.02871   1.06272   1.08043   1.08820   1.09052   1.08820   1.08043   1.06272   1.02871   0.98231   0.92411   0.84720   0.67433   0.49245   0.16498   0.00000
               32.00   0.00000   0.16693   0.49549   0.67607   0.84072   0.91224   0.97343   1.02116   1.05690   1.06470   1.08400   1.08654   1.08400   1.06470   1.05690   1.02116   0.97343   0.91224   0.84072   0.67607   0.49549   0.16693   0.00000
               46.00   0.00000   0.16216   0.47579   0.64906   0.80631   0.87339   0.93047   0.97650   1.01008   1.02282   1.02890   1.03082   1.02890   1.02282   1.01008   0.97650   0.93047   0.87339   0.80631   0.64906   0.47579   0.16216   0.00000
               70.00   0.00000   0.09347   0.27144   0.37032   0.46153   0.50105   0.53501   0.56245   0.58261   0.59311   0.59737   0.59725   0.59737   0.59311   0.58261   0.56245   0.53501   0.50105   0.46153   0.37032   0.27144   0.09347   0.00000
              120.00   0.00000  -0.12416  -0.35753  -0.48645  -0.60497  -0.65621  -0.70019  -0.73569  -0.76176  -0.77605  -0.78199  -0.78288  -0.78199  -0.77605  -0.76176  -0.73569  -0.70019  -0.65621  -0.60497  -0.48645  -0.35753  -0.12416   0.00000
              180.00   0.00000  -0.00501   0.04154   0.06218   0.08073   0.08874   0.09562   0.10119   0.10528   0.10741   0.10832   0.10863   0.10832   0.10741   0.10528   0.10119   0.09562   0.08874   0.08073   0.06218   0.04154  -0.00501   0.00000
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            </tableData>
          </table>
          <table>
            <independentVar lookup="row">aero/h_b-mac-ft</independentVar>
            <tableData>
                    0.00    1.20000
                    0.10    1.08692
                    0.15    1.05730
                    0.20    1.03778
                    0.30    1.01642
                    0.40    1.00713
                    0.50    1.00310
                    0.60    1.00135
                    0.70    1.00059
                    0.80    1.00025
                    0.90    1.00011
                    1.00    1.00005
                    1.10    1.00000
            </tableData>
          </table>
          </product>
        </function>
        <function name="aero/coefficient/CL_elevator">
          <description>CL increment from elevator (deg), over alpha</description>
          <product>
            <property>aero/qbar-psf</property>
            <property>metrics/Sw-sqft</property>
          <table>
            <independentVar lookup="row">aero/alpha-deg</independentVar>
            <independentVar lookup="column">fcs/elevator-pos-deg</independentVar>
            <tableData>
                        -25.00    -20.00    -15.00    -10.00     -5.00      0.00      5.00     10.00     15.00     20.00     25.00
             -180.00   0.00000   0.00000   0.00000   0.00000   0.00000   0.00000   0.00000   0.00000   0.00000   0.00000   0.00000
             -120.00  -0.02941  -0.02653  -0.02255  -0.01671  -0.00889   0.00000   0.00889   0.01671   0.02255   0.02653   0.02941
              -60.00  -0.02222  -0.02015  -0.01739  -0.01318  -0.00721   0.00000   0.00768   0.01484   0.02043   0.02437   0.02729
              -35.00  -0.05602  -0.05234  -0.04713  -0.03714  -0.02092   0.00000   0.02218   0.04150   0.05466   0.06205   0.06587
              -22.00  -0.05495  -0.05183  -0.04829  -0.03970  -0.02305   0.00000   0.02961   0.06863   0.09484   0.10943   0.11755
              -17.00  -0.03066  -0.02835  -0.02718  -0.02195  -0.01378   0.00000   0.03145   0.06750   0.09518   0.11346   0.12612
              -13.00  -0.08619  -0.08488  -0.08376  -0.07192  -0.04182   0.00000   0.04419   0.08334   0.11209   0.13100   0.14408
               -9.00  -0.13846  -0.12847  -0.11190  -0.08387  -0.04509   0.00000   0.04547   0.08533   0.11448   0.13360   0.14676
               -5.00  -0.14558  -0.13321  -0.11444  -0.08572  -0.04589   0.00000   0.04599   0.08617   0.11548   0.13463   0.14778
               -1.00  -0.14646  -0.13426  -0.11562  -0.08624  -0.04611   0.00000   0.04611   0.08630   0.11554   0.13460   0.14763
                3.00  -0.10780  -0.12533  -0.11338  -0.08598  -0.04591   0.00000   0.04591   0.08590   0.11494   0.13380   0.14663
                7.00  -0.13910  -0.12953  -0.04537  -0.02441  -0.04542   0.00000   0.04549   0.08503   0.11367   0.13218   0.14470
               11.00  -0.12953  -0.11908  -0.10510  -0.07879  -0.04266   0.00000   0.04259   0.07946   0.10604   0.12310   0.13453
               15.00  -0.13583  -0.11632  -0.09465  -0.06755  -0.03575   0.00000   0.01039   0.02889   0.04550   0.05680   0.06437
               19.00  -0.16847  -0.15666  -0.13532  -0.09717  -0.02081   0.00000   0.02287   0.04552   0.06299   0.07426   0.08148
               23.00  -0.14314  -0.13566  -0.12072  -0.09253  -0.04554   0.00000   0.03192   0.05893   0.07808   0.09025   0.09813
               27.00  -0.12204  -0.11636  -0.10371  -0.07871  -0.05149   0.00000   0.02890   0.05474   0.07371   0.08611   0.09442
               32.00  -0.09964  -0.08895  -0.09237  -0.06563  -0.04172   0.00000   0.03143   0.05660   0.07365   0.08419   0.09127
               46.00  -0.06544  -0.06045  -0.05247  -0.03956  -0.02129   0.00000   0.02140   0.04004   0.05365   0.06272   0.06912
               70.00  -0.01726  -0.01545  -0.01299  -0.00948  -0.00494   0.00000   0.00470   0.00866   0.01150   0.01338   0.01472
              120.00  -0.02606  -0.02351  -0.01998  -0.01481  -0.00787   0.00000   0.00787   0.01481   0.01998   0.02351   0.02606
              180.00   0.00000   0.00000   0.00000   0.00000   0.00000   0.00000   0.00000   0.00000   0.00000   0.00000   0.00000
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            </tableData>
          </table>
          </product>
        </function>
        <function name="aero/coefficient/CL_flap">
          <description>CL increment from flap (deg), over alpha</description>
          <product>
            <property>aero/qbar-psf</property>
            <property>metrics/Sw-sqft</property>
          <table>
            <independentVar lookup="row">aero/alpha-deg</independentVar>
            <independentVar lookup="column">fcs/flap-pos-deg</independentVar>
            <tableData>
                          0.00      5.00     10.00     15.00     20.00     25.00     30.00     35.00
             -180.00   0.00000   0.00000   0.00000   0.00000   0.00000   0.00000   0.00000   0.00000
             -120.00   0.00000   0.01439   0.02824   0.04081   0.05168   0.06087   0.06878   0.07587
              -60.00   0.00000   0.01909   0.03849   0.05702   0.07377   0.08851   0.10162   0.11373
              -35.00   0.00000   0.03970   0.07738   0.11037   0.13706   0.15750   0.17291   0.18478
              -22.00   0.00000   0.05485   0.08385   0.08353   0.06840   0.06376   0.07454   0.09358
              -17.00   0.00000   0.10672   0.21541   0.30640   0.37943   0.43918   0.49343   0.54550
              -13.00   0.00000   0.09027   0.17821   0.26039   0.33643   0.41027   0.47712   0.53157
               -9.00   0.00000   0.09013   0.17636   0.25444   0.32367   0.38521   0.43905   0.48853
               -5.00   0.00000   0.09019   0.17658   0.25621   0.32978   0.38732   0.43549   0.47809
               -1.00   0.00000   0.09005   0.17672   0.26978   0.32783   0.38587   0.44454   0.48615
                3.00   0.00000   0.08966   0.18971   0.25825   0.32769   0.38333   0.46797   0.50665
                7.00   0.00000   0.08842   0.17436   0.25084   0.31165   0.35821   0.43740   0.46416
               11.00   0.00000   0.07274   0.16479   0.18749   0.23621   0.31423   0.34275   0.36200
               15.00   0.00000   0.07170   0.13978   0.20113   0.25564   0.30446   0.34931   0.39061
               19.00   0.00000   0.07642   0.15155   0.22745   0.27032   0.29759   0.33114   0.35335
               23.00   0.00000   0.06419   0.12584   0.18122   0.19285   0.22707   0.27177   0.29226
               27.00   0.00000   0.05603   0.10962   0.15685   0.18651   0.21495   0.21655   0.22108
               32.00   0.00000   0.04664   0.08659   0.12483   0.15844   0.17303   0.21390   0.22699
               46.00   0.00000   0.03095   0.06095   0.08824   0.11176   0.13158   0.14852   0.16356
               70.00   0.00000   0.00652   0.01251   0.01773   0.02206   0.02560   0.02854   0.03111
              120.00   0.00000   0.01833   0.03597   0.05199   0.06583   0.07755   0.08762   0.09666
              180.00   0.00000   0.00000   0.00000   0.00000   0.00000   0.00000   0.00000   0.00000
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            </tableData>
          </table>
          <table>
            <independentVar lookup="row">aero/h_b-mac-ft</independentVar>
            <tableData>
                    0.00    1.20000
                    0.10    1.08692
                    0.15    1.05730
                    0.20    1.03778
                    0.30    1.01642
                    0.40    1.00713
                    0.50    1.00310
                    0.60    1.00135
                    0.70    1.00059
                    0.80    1.00025
                    0.90    1.00011
                    1.00    1.00005
                    1.10    1.00000
            </tableData>
          </table>
          </product>
        </function>
        <function name="aero/coefficient/CLq">
          <description>CL per q (non-dimensional), over alpha</description>
          <product>
            <property>aero/qbar-psf</property>
            <property>metrics/Sw-sqft</property>
            <property>aero/ci2vel</property>
            <property>velocities/q-aero-rad_sec</property>
          <table>
            <independentVar lookup="row">aero/alpha-deg</independentVar>
            <tableData>
                 -180.00   -2.24555
                 -165.00   -2.79907
                 -105.00   -1.47655
                  -50.00    2.77452
                  -30.00    2.16667
                  -20.00    0.87063
                  -16.00    8.62838
                  -12.00    9.63124
                   -8.00   10.14070
                   -4.00   10.52651
                    0.00   11.01706
                    4.00   11.77347
                    8.00   10.52557
                   12.00    2.67336
                   16.00    1.63511
                   20.00    3.23565
                   24.00    3.18647
                   28.00    2.58754
                   35.00    2.80411
                   50.00    2.96857
                   80.00    1.06470
                  135.00   -2.95953
                  180.00   -2.24555
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            </tableData>
          </table>
          </product>
        </function>
        <function name="aero/coefficient/CLadot">
          <description>CL per alpha-dot (downwash lag at the tail)</description>
          <product>
            <property>aero/qbar-psf</property>
            <property>metrics/Sw-sqft</property>
            <property>aero/ci2vel</property>
            <property>aero/alphadot-rad_sec</property>
            <value>1.62446</value>
          </product>
        </function>
      </axis>
      <axis name="ROLL">
        <function name="aero/coefficient/Cl_base">
          <description>Cl over alpha and beta (hangar)</description>
          <product>
            <property>aero/qbar-psf</property>
            <property>metrics/Sw-sqft</property>
            <property>metrics/bw-ft</property>
          <table>
            <independentVar lookup="row">aero/alpha-deg</independentVar>
            <independentVar lookup="column">aero/beta-deg</independentVar>
            <tableData>
                        -90.00    -70.00    -50.00    -40.00    -30.00    -25.00    -20.00    -15.00    -10.00     -6.00     -3.00      0.00      3.00      6.00     10.00     15.00     20.00     25.00     30.00     40.00     50.00     70.00     90.00
             -180.00  -0.00236   0.01144   0.02854   0.02965   0.02675   0.02392   0.02028   0.01593   0.01175   0.00794   0.00406  -0.00000  -0.00406  -0.00794  -0.01175  -0.01593  -0.02028  -0.02392  -0.02675  -0.02965  -0.02854  -0.01144   0.00236
             -120.00  -0.00236   0.00652   0.01202   0.01234   0.01100   0.00976   0.00821   0.00639   0.00437   0.00274   0.00164  -0.00000  -0.00164  -0.00274  -0.00437  -0.00639  -0.00821  -0.00976  -0.01100  -0.01234  -0.01202  -0.00652   0.00236
              -60.00  -0.00236   0.00546   0.01042   0.01076   0.00965   0.00861   0.00730   0.00578   0.00415   0.00304   0.00161  -0.00000  -0.00161  -0.00304  -0.00415  -0.00578  -0.00730  -0.00861  -0.00965  -0.01076  -0.01042  -0.00546   0.00236
              -35.00  -0.00236   0.00213   0.00600   0.00849   0.01006   0.01037   0.00937   0.00777   0.00556   0.00388   0.00185  -0.00000  -0.00185  -0.00388  -0.00556  -0.00777  -0.00937  -0.01037  -0.01006  -0.00849  -0.00600  -0.00213   0.00236
              -22.00  -0.00236  -0.00087  -0.00300   0.00082   0.00415   0.00515   0.00487   0.00396   0.00280   0.00243   0.00097  -0.00000  -0.00097  -0.00243  -0.00280  -0.00396  -0.00487  -0.00515  -0.00415  -0.00082   0.00300   0.00087   0.00236
              -17.00  -0.00236   0.00499   0.00765   0.01932   0.02664   0.02444   0.02095   0.01678   0.01164   0.00712   0.00367  -0.00000  -0.00367  -0.00712  -0.01164  -0.01678  -0.02095  -0.02444  -0.02664  -0.01932  -0.00765  -0.00499   0.00236
              -13.00  -0.00236   0.01063   0.03052   0.03231   0.03125   0.02849   0.02390   0.01861   0.01275   0.00776   0.00392  -0.00000  -0.00392  -0.00776  -0.01275  -0.01861  -0.02390  -0.02849  -0.03125  -0.03231  -0.03052  -0.01063   0.00236
               -9.00  -0.00236   0.01810   0.03060   0.03234   0.03217   0.02866   0.02403   0.01871   0.01283   0.00782   0.00394  -0.00000  -0.00394  -0.00782  -0.01283  -0.01871  -0.02403  -0.02866  -0.03217  -0.03234  -0.03060  -0.01810   0.00236
               -5.00  -0.00236   0.02019   0.03320   0.03637   0.03243   0.02876   0.02412   0.01879   0.01290   0.00787   0.00397  -0.00000  -0.00397  -0.00787  -0.01290  -0.01879  -0.02412  -0.02876  -0.03243  -0.03637  -0.03320  -0.02019   0.00236
               -1.00  -0.00236   0.02027   0.03516   0.03466   0.03266   0.02887   0.02421   0.01886   0.01295   0.00791   0.00399  -0.00000  -0.00399  -0.00791  -0.01295  -0.01886  -0.02421  -0.02887  -0.03266  -0.03466  -0.03516  -0.02027   0.00236
                3.00  -0.00236   0.01511   0.03407   0.03422   0.03281   0.02899   0.02430   0.01893   0.01299   0.00793   0.00400  -0.00000  -0.00400  -0.00793  -0.01299  -0.01893  -0.02430  -0.02899  -0.03281  -0.03422  -0.03407  -0.01511   0.00236
                7.00  -0.00236   0.00495   0.02780   0.03362   0.03287   0.02904   0.02434   0.01896   0.01301   0.00793   0.00400  -0.00000  -0.00400  -0.00793  -0.01301  -0.01896  -0.02434  -0.02904  -0.03287  -0.03362  -0.02780  -0.00495   0.00236
               11.00  -0.00236  -0.00108  -0.00784   0.00873   0.02283   0.02119   0.01824   0.01449   0.01007   0.00619   0.00312  -0.00000  -0.00312  -0.00619  -0.01007  -0.01449  -0.01824  -0.02119  -0.02283  -0.00873   0.00784   0.00108   0.00236
               15.00  -0.00236  -0.00623  -0.01617  -0.01404  -0.00927  -0.00893  -0.00830  -0.00701  -0.00500  -0.00282  -0.00138  -0.00000   0.00138   0.00282   0.00500   0.00701   0.00830   0.00893   0.00927   0.01404   0.01617   0.00623   0.00236
               19.00  -0.00236  -0.00669  -0.00038   0.00238   0.00559   0.00560   0.00457   0.00352   0.00241   0.00145   0.00066  -0.00000  -0.00066  -0.00145  -0.00241  -0.00352  -0.00457  -0.00560  -0.00559  -0.00238   0.00038   0.00669   0.00236
               23.00  -0.00236  -0.00127   0.00266   0.00653   0.00843   0.00817   0.00664   0.00499   0.00335   0.00203   0.00118  -0.00000  -0.00118  -0.00203  -0.00335  -0.00499  -0.00664  -0.00817  -0.00843  -0.00653  -0.00266   0.00127   0.00236
               27.00  -0.00236   0.00035   0.00429   0.00790   0.00972   0.01013   0.00877   0.00688   0.00470   0.00293   0.00162  -0.00000  -0.00162  -0.00293  -0.00470  -0.00688  -0.00877  -0.01013  -0.00972  -0.00790  -0.00429  -0.00035   0.00236
               32.00  -0.00236   0.00168   0.00560   0.00845   0.01005   0.01029   0.00936   0.00732   0.00504   0.00295   0.00173  -0.00000  -0.00173  -0.00295  -0.00504  -0.00732  -0.00936  -0.01029  -0.01005  -0.00845  -0.00560  -0.00168   0.00236
               46.00  -0.00236   0.00400   0.00845   0.00906   0.00897   0.00845   0.00759   0.00660   0.00531   0.00344   0.00170  -0.00000  -0.00170  -0.00344  -0.00531  -0.00660  -0.00759  -0.00845  -0.00897  -0.00906  -0.00845  -0.00400   0.00236
               70.00  -0.00236   0.00636   0.01165   0.01190   0.01056   0.00936   0.00786   0.00614   0.00425   0.00270   0.00157  -0.00000  -0.00157  -0.00270  -0.00425  -0.00614  -0.00786  -0.00936  -0.01056  -0.01190  -0.01165  -0.00636   0.00236
              120.00  -0.00236   0.00643   0.01189   0.01221   0.01088   0.00966   0.00812   0.00632   0.00433   0.00271   0.00163  -0.00000  -0.00163  -0.00271  -0.00433  -0.00632  -0.00812  -0.00966  -0.01088  -0.01221  -0.01189  -0.00643   0.00236
              180.00  -0.00236   0.01144   0.02854   0.02965   0.02675   0.02392   0.02028   0.01593   0.01175   0.00794   0.00406  -0.00000  -0.00406  -0.00794  -0.01175  -0.01593  -0.02028  -0.02392  -0.02675  -0.02965  -0.02854  -0.01144   0.00236
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            </tableData>
          </table>
          </product>
        </function>
        <function name="aero/coefficient/Cl_aileron">
          <description>Cl increment from aileron (deg), over alpha</description>
          <product>
            <property>aero/qbar-psf</property>
            <property>metrics/Sw-sqft</property>
            <property>metrics/bw-ft</property>
          <table>
            <independentVar lookup="row">aero/alpha-deg</independentVar>
            <independentVar lookup="column">fcs/left-aileron-pos-deg</independentVar>
            <tableData>
                        -20.00    -15.00    -10.00     -5.00      0.00      5.00     10.00     15.00     20.00
             -180.00  -0.00000  -0.00000  -0.00000  -0.00000   0.00000  -0.00000  -0.00000  -0.00000  -0.00000
              -27.00  -0.04791  -0.04153  -0.03132  -0.01686   0.00000   0.01686   0.03132   0.04153   0.04791
               -9.00  -0.10028  -0.08588  -0.06402  -0.03416   0.00000   0.03416   0.06402   0.08588   0.10028
                5.00  -0.09829  -0.08433  -0.06295  -0.03361   0.00000   0.03361   0.06295   0.08433   0.09829
               19.00  -0.08675  -0.07323  -0.05413  -0.02881   0.00000   0.02881   0.05413   0.07323   0.08675
               38.00  -0.03284  -0.02866  -0.02170  -0.01169   0.00000   0.01169   0.02170   0.02866   0.03284
              180.00   0.00000   0.00000   0.00000   0.00000   0.00000   0.00000   0.00000   0.00000   0.00000
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            </tableData>
          </table>
          </product>
        </function>
        <function name="aero/coefficient/Cl_rudder">
          <description>Cl increment from rudder (deg), over alpha</description>
          <product>
            <property>aero/qbar-psf</property>
            <property>metrics/Sw-sqft</property>
            <property>metrics/bw-ft</property>
          <table>
            <independentVar lookup="row">aero/alpha-deg</independentVar>
            <independentVar lookup="column">fcs/rudder-pos-deg</independentVar>
            <tableData>
                        -25.00    -20.00    -15.00    -10.00     -5.00      0.00      5.00     10.00     15.00     20.00     25.00
             -180.00  -0.00000  -0.00000  -0.00000  -0.00000  -0.00000   0.00000  -0.00000  -0.00000  -0.00000  -0.00000  -0.00000
              -27.00  -0.00069  -0.00064  -0.00040  -0.00060  -0.00031   0.00000   0.00031   0.00060   0.00040   0.00064   0.00069
               -9.00  -0.00241  -0.00219  -0.00188  -0.00140  -0.00075   0.00000   0.00075   0.00140   0.00188   0.00219   0.00241
                5.00  -0.00245  -0.00222  -0.00190  -0.00142  -0.00076   0.00000   0.00076   0.00142   0.00190   0.00222   0.00245
               19.00  -0.00098  -0.00080  -0.00052  -0.00048  -0.00048   0.00000   0.00048   0.00048   0.00052   0.00080   0.00098
               38.00  -0.00055  -0.00047  -0.00095  -0.00055  -0.00030   0.00000   0.00030   0.00055   0.00095   0.00047   0.00055
              180.00   0.00000   0.00000   0.00000   0.00000   0.00000   0.00000   0.00000   0.00000   0.00000   0.00000   0.00000
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            </tableData>
          </table>
          </product>
        </function>
        <function name="aero/coefficient/Clp">
          <description>Cl per p (non-dimensional), over alpha</description>
          <product>
            <property>aero/qbar-psf</property>
            <property>metrics/Sw-sqft</property>
            <property>metrics/bw-ft</property>
            <property>aero/bi2vel</property>
            <property>velocities/p-aero-rad_sec</property>
          <table>
            <independentVar lookup="row">aero/alpha-deg</independentVar>
            <tableData>
                 -180.00   -0.72479
                 -165.00   -0.21076
                  -24.00   -0.10824
                   -8.00   -0.59822
                    6.00   -0.60683
                   20.00    0.02429
                   42.00   -0.26286
                  180.00   -0.72479
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            </tableData>
          </table>
          </product>
        </function>
        <function name="aero/coefficient/Clr">
          <description>Cl per r (non-dimensional), over alpha</description>
          <product>
            <property>aero/qbar-psf</property>
            <property>metrics/Sw-sqft</property>
            <property>metrics/bw-ft</property>
            <property>aero/bi2vel</property>
            <property>velocities/r-aero-rad_sec</property>
          <table>
            <independentVar lookup="row">aero/alpha-deg</independentVar>
            <tableData>
                 -180.00    0.03396
                 -165.00    0.06861
                  -24.00   -0.23432
                   -8.00    0.03445
                    6.00    0.20322
                   20.00    0.32175
                   42.00    0.18143
                  180.00    0.03396
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            </tableData>
          </table>
          </product>
        </function>
      </axis>
      <axis name="PITCH">
        <function name="aero/coefficient/Cm_base">
          <description>Cm over alpha and beta (hangar)</description>
          <product>
            <property>aero/qbar-psf</property>
            <property>metrics/Sw-sqft</property>
            <property>metrics/cbarw-ft</property>
          <table>
            <independentVar lookup="row">aero/alpha-deg</independentVar>
            <independentVar lookup="column">aero/beta-deg</independentVar>
            <tableData>
                        -90.00    -70.00    -50.00    -40.00    -30.00    -25.00    -20.00    -15.00    -10.00     -6.00     -3.00      0.00      3.00      6.00     10.00     15.00     20.00     25.00     30.00     40.00     50.00     70.00     90.00
             -180.00  -0.00000  -0.01002  -0.00422  -0.00427  -0.00477  -0.00505  -0.00531  -0.00553  -0.00362  -0.00433  -0.00566  -0.00613  -0.00566  -0.00433  -0.00362  -0.00553  -0.00531  -0.00505  -0.00477  -0.00427  -0.00422  -0.01002  -0.00000
              -27.00  -0.00000   0.13040   0.34476   0.44252   0.52759   0.56569   0.59534   0.61782   0.63416   0.63471   0.64668   0.64770   0.64668   0.63471   0.63416   0.61782   0.59534   0.56569   0.52759   0.44252   0.34476   0.13040  -0.00000
               -9.00  -0.00000   0.10409   0.28852   0.30131   0.30730   0.33827   0.36018   0.37663   0.38770   0.39290   0.39490   0.39553   0.39490   0.39290   0.38770   0.37663   0.36018   0.33827   0.30730   0.30131   0.28852   0.10409  -0.00000
                5.00  -0.00000  -0.05808  -0.13667  -0.07574  -0.01899  -0.01776  -0.01718  -0.01672  -0.01631  -0.01598  -0.01569  -0.01546  -0.01569  -0.01598  -0.01631  -0.01672  -0.01718  -0.01776  -0.01899  -0.07574  -0.13667  -0.05808  -0.00000
               19.00  -0.00000  -0.11936  -0.32570  -0.48781  -0.52575  -0.55606  -0.59534  -0.63043  -0.65780  -0.67260  -0.67937  -0.68050  -0.67937  -0.67260  -0.65780  -0.63043  -0.59534  -0.55606  -0.52575  -0.48781  -0.32570  -0.11936  -0.00000
               38.00  -0.00000  -0.17070  -0.44195  -0.57371  -0.67819  -0.71945  -0.75354  -0.78115  -0.79926  -0.71030  -0.81123  -0.81263  -0.81123  -0.71030  -0.79926  -0.78115  -0.75354  -0.71945  -0.67819  -0.57371  -0.44195  -0.17070  -0.00000
              180.00  -0.00000  -0.01002  -0.00422  -0.00427  -0.00477  -0.00505  -0.00531  -0.00553  -0.00362  -0.00433  -0.00566  -0.00613  -0.00566  -0.00433  -0.00362  -0.00553  -0.00531  -0.00505  -0.00477  -0.00427  -0.00422  -0.01002  -0.00000
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            </tableData>
          </table>
          </product>
        </function>
        <function name="aero/coefficient/Cm_elevator">
          <description>Cm increment from elevator (deg), over alpha</description>
          <product>
            <property>aero/qbar-psf</property>
            <property>metrics/Sw-sqft</property>
            <property>metrics/cbarw-ft</property>
          <table>
            <independentVar lookup="row">aero/alpha-deg</independentVar>
            <independentVar lookup="column">fcs/elevator-pos-deg</independentVar>
            <tableData>
                        -25.00    -20.00    -15.00    -10.00     -5.00      0.00      5.00     10.00     15.00     20.00     25.00
             -180.00   0.00099   0.00065   0.00037   0.00017   0.00004   0.00000   0.00004   0.00017   0.00037   0.00065   0.00099
              -27.00   0.28830   0.26385   0.23740   0.18877   0.10768   0.00000  -0.11410  -0.19282  -0.22998  -0.27049  -0.28408
               -9.00   0.62201   0.57517   0.49949   0.37331   0.20006   0.00000  -0.20044  -0.37512  -0.50222  -0.58509  -0.64175
                5.00   0.62548   0.34045   0.30946   0.37227   0.20039   0.00000  -0.20187  -0.37876  -0.50825  -0.59335  -0.65216
               19.00   0.71052   0.67013   0.58755   0.42929   0.10228   0.00000  -0.11434  -0.22980  -0.32147  -0.38364  -0.42664
               38.00   0.23462   0.23586   0.22093   0.17933   0.10460   0.00000  -0.12796  -0.28283  -0.36293  -0.41828  -0.46085
              180.00   0.00099   0.00065   0.00037   0.00017   0.00004   0.00000   0.00004   0.00017   0.00037   0.00065   0.00099
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            </tableData>
          </table>
          </product>
        </function>
        <function name="aero/coefficient/Cm_flap">
          <description>Cm increment from flap (deg), over alpha</description>
          <product>
            <property>aero/qbar-psf</property>
            <property>metrics/Sw-sqft</property>
            <property>metrics/cbarw-ft</property>
          <table>
            <independentVar lookup="row">aero/alpha-deg</independentVar>
            <independentVar lookup="column">fcs/flap-pos-deg</independentVar>
            <tableData>
                          0.00      5.00     10.00     15.00     20.00     25.00     30.00     35.00
             -180.00   0.00000   0.00003   0.00012   0.00026   0.00045   0.00068   0.00096   0.00126
              -27.00   0.00000  -0.00757  -0.01453  -0.02055  -0.02541  -0.02911  -0.03186  -0.03391
               -9.00   0.00000   0.05260   0.10260   0.14490   0.16991   0.17547   0.17229   0.16127
                5.00   0.00000   0.04576  -0.12405   0.09239   0.10245   0.11510  -0.02152  -0.00570
               19.00   0.00000  -0.02685  -0.07063  -0.15650  -0.14446  -0.10393  -0.11946  -0.10703
               38.00   0.00000   0.00013   0.00007  -0.00014  -0.00045  -0.00085  -0.00136  -0.00203
              180.00   0.00000   0.00003   0.00012   0.00026   0.00045   0.00068   0.00096   0.00126
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            </tableData>
          </table>
          </product>
        </function>
        <function name="aero/coefficient/Cmq">
          <description>Cm per q (non-dimensional), over alpha</description>
          <product>
            <property>aero/qbar-psf</property>
            <property>metrics/Sw-sqft</property>
            <property>metrics/cbarw-ft</property>
            <property>aero/ci2vel</property>
            <property>velocities/q-aero-rad_sec</property>
          <table>
            <independentVar lookup="row">aero/alpha-deg</independentVar>
            <tableData>
                 -180.00  -10.37939
                 -165.00  -13.30183
                  -24.00  -12.80780
                   -8.00  -20.96376
                    6.00  -26.74922
                   20.00  -17.26723
                   42.00  -15.86071
                  180.00  -10.37939
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            </tableData>
          </table>
          </product>
        </function>
        <function name="aero/coefficient/Cmadot">
          <description>Cm per alpha-dot (downwash lag at the tail)</description>
          <product>
            <property>aero/qbar-psf</property>
            <property>metrics/Sw-sqft</property>
            <property>metrics/cbarw-ft</property>
            <property>aero/ci2vel</property>
            <property>aero/alphadot-rad_sec</property>
            <value>-7.28538</value>
          </product>
        </function>
      </axis>
      <axis name="YAW">
        <function name="aero/coefficient/Cn_base">
          <description>Cn over alpha and beta (hangar)</description>
          <product>
            <property>aero/qbar-psf</property>
            <property>metrics/Sw-sqft</property>
            <property>metrics/bw-ft</property>
          <table>
            <independentVar lookup="row">aero/alpha-deg</independentVar>
            <independentVar lookup="column">aero/beta-deg</independentVar>
            <tableData>
                        -90.00    -70.00    -50.00    -40.00    -30.00    -25.00    -20.00    -15.00    -10.00     -6.00     -3.00      0.00      3.00      6.00     10.00     15.00     20.00     25.00     30.00     40.00     50.00     70.00     90.00
             -180.00  -0.08675  -0.08616  -0.07021  -0.05793  -0.04374  -0.03623  -0.02863  -0.02108  -0.02369  -0.02399  -0.01266  -0.00000   0.01266   0.02399   0.02369   0.02108   0.02863   0.03623   0.04374   0.05793   0.07021   0.08616   0.08675
              -27.00  -0.08675  -0.07358  -0.05242  -0.03935  -0.03514  -0.03030  -0.02592  -0.01864  -0.01246  -0.01248  -0.00497  -0.00000   0.00497   0.01248   0.01246   0.01864   0.02592   0.03030   0.03514   0.03935   0.05242   0.07358   0.08675
               -9.00  -0.08675  -0.07754  -0.05703  -0.04379  -0.04425  -0.03720  -0.02914  -0.02131  -0.01386  -0.00817  -0.00406  -0.00000   0.00406   0.00817   0.01386   0.02131   0.02914   0.03720   0.04425   0.04379   0.05703   0.07754   0.08675
                5.00  -0.08675  -0.07086  -0.04337  -0.03339  -0.03659  -0.02941  -0.02245  -0.01597  -0.01004  -0.00573  -0.00275  -0.00000   0.00275   0.00573   0.01004   0.01597   0.02245   0.02941   0.03659   0.03339   0.04337   0.07086   0.08675
               19.00  -0.08675  -0.07458  -0.05164  -0.03911  -0.03732  -0.03232  -0.02508  -0.01824  -0.01177  -0.00679  -0.00304  -0.00000   0.00304   0.00679   0.01177   0.01824   0.02508   0.03232   0.03732   0.03911   0.05164   0.07458   0.08675
               38.00  -0.08675  -0.07464  -0.05324  -0.04103  -0.03019  -0.02685  -0.02703  -0.02150  -0.01373  -0.01306  -0.00547  -0.00000   0.00547   0.01306   0.01373   0.02150   0.02703   0.02685   0.03019   0.04103   0.05324   0.07464   0.08675
              180.00  -0.08675  -0.08616  -0.07021  -0.05793  -0.04374  -0.03623  -0.02863  -0.02108  -0.02369  -0.02399  -0.01266  -0.00000   0.01266   0.02399   0.02369   0.02108   0.02863   0.03623   0.04374   0.05793   0.07021   0.08616   0.08675
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            </tableData>
          </table>
          </product>
        </function>
        <function name="aero/coefficient/Cn_aileron">
          <description>Cn increment from aileron (deg), over alpha</description>
          <product>
            <property>aero/qbar-psf</property>
            <property>metrics/Sw-sqft</property>
            <property>metrics/bw-ft</property>
          <table>
            <independentVar lookup="row">aero/alpha-deg</independentVar>
            <independentVar lookup="column">fcs/left-aileron-pos-deg</independentVar>
            <tableData>
                        -20.00    -15.00    -10.00     -5.00      0.00      5.00     10.00     15.00     20.00
             -180.00   0.00000   0.00000  -0.00000  -0.00000   0.00000  -0.00000  -0.00000   0.00000   0.00000
              -27.00   0.02866   0.02455   0.01833   0.00980   0.00000  -0.00980  -0.01833  -0.02455  -0.02866
               -9.00   0.00986   0.00847   0.00633   0.00338   0.00000  -0.00338  -0.00633  -0.00847  -0.00986
                5.00   0.00120   0.00087   0.00056   0.00027   0.00000  -0.00027  -0.00056  -0.00087  -0.00120
               19.00  -0.02538  -0.02174  -0.01621  -0.00867   0.00000   0.00867   0.01621   0.02174   0.02538
               38.00  -0.03244  -0.02780  -0.02076  -0.01111   0.00000   0.01111   0.02076   0.02780   0.03244
              180.00   0.00000   0.00000  -0.00000  -0.00000   0.00000  -0.00000  -0.00000   0.00000   0.00000
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            </tableData>
          </table>
          </product>
        </function>
        <function name="aero/coefficient/Cn_rudder">
          <description>Cn increment from rudder (deg), over alpha</description>
          <product>
            <property>aero/qbar-psf</property>
            <property>metrics/Sw-sqft</property>
            <property>metrics/bw-ft</property>
          <table>
            <independentVar lookup="row">aero/alpha-deg</independentVar>
            <independentVar lookup="column">fcs/rudder-pos-deg</independentVar>
            <tableData>
                        -25.00    -20.00    -15.00    -10.00     -5.00      0.00      5.00     10.00     15.00     20.00     25.00
             -180.00   0.00000   0.00000   0.00000   0.00000   0.00000   0.00000   0.00000   0.00000   0.00000   0.00000   0.00000
              -27.00   0.00783   0.00704   0.00356   0.00701   0.00351   0.00000  -0.00351  -0.00701  -0.00356  -0.00704  -0.00783
               -9.00   0.01956   0.01755   0.01488   0.01100   0.00592   0.00000  -0.00592  -0.01100  -0.01488  -0.01755  -0.01956
                5.00   0.01977   0.01773   0.01500   0.01109   0.00589   0.00000  -0.00589  -0.01109  -0.01500  -0.01773  -0.01977
               19.00   0.01229   0.00993   0.00605   0.00520   0.00640   0.00000  -0.00640  -0.00520  -0.00605  -0.00993  -0.01229
               38.00   0.00605   0.00488   0.01122   0.00596   0.00323   0.00000  -0.00323  -0.00596  -0.01122  -0.00488  -0.00605
              180.00  -0.00000  -0.00000  -0.00000  -0.00000  -0.00000   0.00000  -0.00000  -0.00000  -0.00000  -0.00000  -0.00000
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            </tableData>
          </table>
          </product>
        </function>
        <function name="aero/coefficient/Cnp">
          <description>Cn per p (non-dimensional), over alpha</description>
          <product>
            <property>aero/qbar-psf</property>
            <property>metrics/Sw-sqft</property>
            <property>metrics/bw-ft</property>
            <property>aero/bi2vel</property>
            <property>velocities/p-aero-rad_sec</property>
          <table>
            <independentVar lookup="row">aero/alpha-deg</independentVar>
            <tableData>
                 -180.00    0.00907
                 -165.00    0.01981
                  -24.00    0.00537
                   -8.00    0.08364
                    6.00   -0.12231
                   20.00    0.01268
                   42.00    0.00844
                  180.00    0.00907
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            </tableData>
          </table>
          </product>
        </function>
        <function name="aero/coefficient/Cnr">
          <description>Cn per r (non-dimensional), over alpha</description>
          <product>
            <property>aero/qbar-psf</property>
            <property>metrics/Sw-sqft</property>
            <property>metrics/bw-ft</property>
            <property>aero/bi2vel</property>
            <property>velocities/r-aero-rad_sec</property>
          <table>
            <independentVar lookup="row">aero/alpha-deg</independentVar>
            <tableData>
                 -180.00   -0.16769
                 -165.00   -0.16603
                  -24.00   -0.02998
                   -8.00   -0.08167
                    6.00   -0.07099
                   20.00   -0.03126
                   42.00   -0.05792
                  180.00   -0.16769
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            </tableData>
          </table>
          </product>
        </function>
      </axis>
    </aerodynamics>
</fdm_config>
