<?xml version="1.0"?>
<?xml-stylesheet type="text/xsl" href="http://jsbsim.sourceforge.net/JSBSim.xsl"?>
<!-- Generated by hangar 0.1.0 from u2s.toml on 2026-09-26. Edit the design and rebuild; changes
     made here are overwritten.  -->
<fdm_config name="u2s" version="2.0" release="ALPHA"
            xmlns:xsi="http://www.w3.org/2001/XMLSchema-instance"
            xsi:noNamespaceSchemaLocation="http://jsbsim.sourceforge.net/JSBSim.xsd">
    <fileheader>
      <author>hangar</author>
      <filecreationdate>2026-09-26</filecreationdate>
      <version>0.1.0</version>
      <description>Lockheed U-2S Dragon Lady (hangar build)</description>
      <note>Aerodynamics: vortex lattice with viscous section polars, full-envelope
        strip model, slender-body fuselage (hangar). Mass: Raymer component
        weights on the geometry. Propeller: blade-element momentum theory.</note>
    </fileheader>
    <metrics>
      <wingarea unit="M2"> 92.9461 </wingarea>
      <wingspan unit="M"> 31.3900 </wingspan>
      <chord unit="M"> 3.3413 </chord>
      <htailarea unit="M2"> 13.8207 </htailarea>
      <htailarm unit="M"> 7.7338 </htailarm>
      <vtailarea unit="M2"> 4.5423 </vtailarea>
      <vtailarm unit="M"> 8.3458 </vtailarm>
      <location name="AERORP" unit="M">
        <x> 9.1476 </x>
        <y> 0.0000 </y>
        <z> 0.3225 </z>
      </location>
      <location name="EYEPOINT" unit="M">
        <x> 4.4000 </x>
        <y> 0.0000 </y>
        <z> 1.0500 </z>
      </location>
      <location name="VRP" unit="M">
        <x> 9.1000 </x>
        <y> 0.0000 </y>
        <z> 0.0000 </z>
      </location>
    </metrics>
    <mass_balance negated_crossproduct_inertia="false">
      <ixx unit="KG*M2"> 79703.22 </ixx>
      <iyy unit="KG*M2"> 85742.50 </iyy>
      <izz unit="KG*M2"> 161956.29 </izz>
      <ixy unit="KG*M2"> 0.004 </ixy>
      <ixz unit="KG*M2"> 3857.901 </ixz>
      <iyz unit="KG*M2"> -0.048 </iyz>
      <emptywt unit="KG"> 7257.00 </emptywt>
      <location name="CG" unit="M">
        <x> 9.1000 </x>
        <y> 0.0000 </y>
        <z> 0.0000 </z>
      </location>
      <pointmass name="pilot">
        <weight unit="KG"> 110.00 </weight>
        <location unit="M">
          <x> 4.4000 </x>
          <y> 0.0000 </y>
          <z> 0.3500 </z>
        </location>
      </pointmass>
      <pointmass name="nose sensors">
        <weight unit="KG"> 272.00 </weight>
        <location unit="M">
          <x> 1.5000 </x>
          <y> 0.0000 </y>
          <z> 0.0000 </z>
        </location>
      </pointmass>
      <pointmass name="Q-bay sensors">
        <weight unit="KG"> 590.00 </weight>
        <location unit="M">
          <x> 6.5000 </x>
          <y> 0.0000 </y>
          <z> 0.1000 </z>
        </location>
      </pointmass>
    </mass_balance>
    <ground_reactions>
      <contact type="BOGEY" name="Main Gear">
        <location unit="M">
          <x> 8.3800 </x>
          <y> 0.0000 </y>
          <z> -1.6400 </z>
        </location>
        <static_friction> 0.8 </static_friction>
        <dynamic_friction> 0.5 </dynamic_friction>
        <rolling_friction> 0.02 </rolling_friction>
        <spring_coeff unit="N/M"> 1133804 </spring_coeff>
        <damping_coeff unit="N/M/SEC"> 114493 </damping_coeff>
        <damping_coeff_rebound unit="N/M/SEC"> 228985 </damping_coeff_rebound>
        <max_steer unit="DEG"> 0.0 </max_steer>
        <brake_group> CENTER </brake_group>
        <retractable> 1 </retractable>
      </contact>
      <contact type="BOGEY" name="Tail Gear">
        <location unit="M">
          <x> 15.1200 </x>
          <y> 0.0000 </y>
          <z> -1.1200 </z>
        </location>
        <static_friction> 0.8 </static_friction>
        <dynamic_friction> 0.5 </dynamic_friction>
        <rolling_friction> 0.02 </rolling_friction>
        <spring_coeff unit="N/M"> 201315 </spring_coeff>
        <damping_coeff unit="N/M/SEC"> 14375 </damping_coeff>
        <damping_coeff_rebound unit="N/M/SEC"> 28749 </damping_coeff_rebound>
        <max_steer unit="DEG"> 15.0 </max_steer>
        <brake_group> NONE </brake_group>
        <retractable> 1 </retractable>
      </contact>
      <contact type="STRUCTURE" name="fin rear">
        <location unit="M">
          <x> 18.7500 </x>
          <y> 0.0000 </y>
          <z> 3.9400 </z>
        </location>
        <static_friction> 0.8 </static_friction>
        <dynamic_friction> 0.6 </dynamic_friction>
        <spring_coeff unit="N/M"> 640606 </spring_coeff>
        <damping_coeff unit="N/M/SEC"> 21354 </damping_coeff>
        <damping_coeff_rebound unit="N/M/SEC"> 21354 </damping_coeff_rebound>
      </contact>
      <contact type="STRUCTURE" name="fuselage front">
        <location unit="M">
          <x> 0.0000 </x>
          <y> 0.0000 </y>
          <z> -0.1000 </z>
        </location>
        <static_friction> 0.8 </static_friction>
        <dynamic_friction> 0.6 </dynamic_friction>
        <spring_coeff unit="N/M"> 815429 </spring_coeff>
        <damping_coeff unit="N/M/SEC"> 27181 </damping_coeff>
        <damping_coeff_rebound unit="N/M/SEC"> 27181 </damping_coeff_rebound>
      </contact>
      <contact type="STRUCTURE" name="fuselage rear">
        <location unit="M">
          <x> 18.5500 </x>
          <y> 0.0000 </y>
          <z> -0.5360 </z>
        </location>
        <static_friction> 0.8 </static_friction>
        <dynamic_friction> 0.6 </dynamic_friction>
        <spring_coeff unit="N/M"> 380495 </spring_coeff>
        <damping_coeff unit="N/M/SEC"> 12683 </damping_coeff>
        <damping_coeff_rebound unit="N/M/SEC"> 12683 </damping_coeff_rebound>
      </contact>
      <contact type="STRUCTURE" name="htail left rear">
        <location unit="M">
          <x> 17.9500 </x>
          <y> -4.0060 </y>
          <z> 0.6198 </z>
        </location>
        <static_friction> 0.8 </static_friction>
        <dynamic_friction> 0.6 </dynamic_friction>
        <spring_coeff unit="N/M"> 715676 </spring_coeff>
        <damping_coeff unit="N/M/SEC"> 23856 </damping_coeff>
        <damping_coeff_rebound unit="N/M/SEC"> 23856 </damping_coeff_rebound>
      </contact>
      <contact type="STRUCTURE" name="htail right rear">
        <location unit="M">
          <x> 17.9500 </x>
          <y> 4.0060 </y>
          <z> 0.6198 </z>
        </location>
        <static_friction> 0.8 </static_friction>
        <dynamic_friction> 0.6 </dynamic_friction>
        <spring_coeff unit="N/M"> 715676 </spring_coeff>
        <damping_coeff unit="N/M/SEC"> 23856 </damping_coeff>
        <damping_coeff_rebound unit="N/M/SEC"> 23856 </damping_coeff_rebound>
      </contact>
      <contact type="STRUCTURE" name="tail cone rear">
        <location unit="M">
          <x> 19.2000 </x>
          <y> 0.0000 </y>
          <z> 0.6600 </z>
        </location>
        <static_friction> 0.8 </static_friction>
        <dynamic_friction> 0.6 </dynamic_friction>
        <spring_coeff unit="N/M"> 337685 </spring_coeff>
        <damping_coeff unit="N/M/SEC"> 11256 </damping_coeff>
        <damping_coeff_rebound unit="N/M/SEC"> 11256 </damping_coeff_rebound>
      </contact>
      <contact type="STRUCTURE" name="wing left rear">
        <location unit="M">
          <x> 10.7298 </x>
          <y> -15.6955 </y>
          <z> 0.5503 </z>
        </location>
        <static_friction> 0.8 </static_friction>
        <dynamic_friction> 0.6 </dynamic_friction>
        <spring_coeff unit="N/M"> 137599 </spring_coeff>
        <damping_coeff unit="N/M/SEC"> 4587 </damping_coeff>
        <damping_coeff_rebound unit="N/M/SEC"> 4587 </damping_coeff_rebound>
      </contact>
      <contact type="STRUCTURE" name="wing left bottom">
        <location unit="M">
          <x> 9.6100 </x>
          <y> -15.6950 </y>
          <z> 0.5700 </z>
        </location>
        <static_friction> 0.8 </static_friction>
        <dynamic_friction> 0.6 </dynamic_friction>
        <spring_coeff unit="N/M"> 138780 </spring_coeff>
        <damping_coeff unit="N/M/SEC"> 4626 </damping_coeff>
        <damping_coeff_rebound unit="N/M/SEC"> 4626 </damping_coeff_rebound>
      </contact>
      <contact type="STRUCTURE" name="wing right bottom">
        <location unit="M">
          <x> 9.6100 </x>
          <y> 15.6950 </y>
          <z> 0.5700 </z>
        </location>
        <static_friction> 0.8 </static_friction>
        <dynamic_friction> 0.6 </dynamic_friction>
        <spring_coeff unit="N/M"> 138780 </spring_coeff>
        <damping_coeff unit="N/M/SEC"> 4626 </damping_coeff>
        <damping_coeff_rebound unit="N/M/SEC"> 4626 </damping_coeff_rebound>
      </contact>
      <contact type="STRUCTURE" name="wing right rear">
        <location unit="M">
          <x> 10.7298 </x>
          <y> 15.6955 </y>
          <z> 0.5503 </z>
        </location>
        <static_friction> 0.8 </static_friction>
        <dynamic_friction> 0.6 </dynamic_friction>
        <spring_coeff unit="N/M"> 137599 </spring_coeff>
        <damping_coeff unit="N/M/SEC"> 4587 </damping_coeff>
        <damping_coeff_rebound unit="N/M/SEC"> 4587 </damping_coeff_rebound>
      </contact>
    </ground_reactions>
    <propulsion>
      <engine file="u2s_engine0">
        <location unit="M">
          <x> 10.5000 </x>
          <y> 0.0000 </y>
          <z> -0.0500 </z>
        </location>
        <feed>0</feed>
        <feed>1</feed>
        <feed>2</feed>
        <feed>3</feed>
        <feed>4</feed>
        <thruster file="u2s_nozzle0">
          <location unit="M">
            <x> 18.5500 </x>
            <y> 0.0000 </y>
            <z> -0.0700 </z>
          </location>
          <orient unit="DEG"> <roll>0.00</roll> <pitch>0.00</pitch> <yaw>0.00</yaw> </orient>

        </thruster>
      </engine>
      <tank type="FUEL">
        <location unit="M">
          <x> 9.5000 </x>
          <y> -3.5000 </y>
          <z> 0.2500 </z>
        </location>
        <capacity unit="KG"> 3496.00 </capacity>
        <contents unit="KG"> 1748.00 </contents>
      </tank>
      <tank type="FUEL">
        <location unit="M">
          <x> 9.5000 </x>
          <y> 3.5000 </y>
          <z> 0.2500 </z>
        </location>
        <capacity unit="KG"> 3496.00 </capacity>
        <contents unit="KG"> 1748.00 </contents>
      </tank>
      <tank type="FUEL">
        <location unit="M">
          <x> 9.8000 </x>
          <y> -9.5000 </y>
          <z> 0.4100 </z>
        </location>
        <capacity unit="KG"> 715.00 </capacity>
        <contents unit="KG"> 357.50 </contents>
      </tank>
      <tank type="FUEL">
        <location unit="M">
          <x> 9.8000 </x>
          <y> 9.5000 </y>
          <z> 0.4100 </z>
        </location>
        <capacity unit="KG"> 715.00 </capacity>
        <contents unit="KG"> 357.50 </contents>
      </tank>
      <tank type="FUEL">
        <location unit="M">
          <x> 9.6000 </x>
          <y> 0.0000 </y>
          <z> -0.2000 </z>
        </location>
        <capacity unit="KG"> 296.00 </capacity>
        <contents unit="KG"> 148.00 </contents>
      </tank>
    </propulsion>
    <flight_control name="u2s">
      <!-- the aircraft's profile for the platform (docs/control-architecture.md, section 7): what
           hangar knows of it - its design, its flight tests, its identified responses -->
      <property value="1">fsim/identity/version</property>
      <property value="1">fsim/identity/provenance</property>
      <property value="8">fsim/identity/class</property>
      <property value="1">fsim/identity/family</property>
      <property value="1">fsim/effectors/version</property>
      <property value="1">fsim/effectors/provenance</property>
      <property value="1">fsim/effectors/flaps</property>
      <property value="8">fsim/effectors/flaps_transit_s</property>
      <property value="0.0">fsim/effectors/neutral</property>
      <property value="0.0">fsim/effectors/pitch</property>
      <property value="1">fsim/effectors/pitch_trim</property>
      <property value="1">fsim/effectors/retractable_gear</property>
      <property value="0.0">fsim/effectors/roll</property>
      <property value="0.0">fsim/effectors/speedbrake</property>
      <property value="1">fsim/effectors/wheel_brakes</property>
      <property value="0.0">fsim/effectors/yaw</property>
      <property value="1">fsim/envelope/version</property>
      <property value="1">fsim/envelope/provenance</property>
      <property value="7.98881">fsim/envelope/clean/alpha_max_deg</property>
      <property value="43.718">fsim/envelope/clean/cas_min_ms</property>
      <property value="1">fsim/propulsion/version</property>
      <property value="1">fsim/propulsion/provenance</property>
      <property value="0.0">fsim/propulsion/afterburner</property>
      <property value="1">fsim/propulsion/engines</property>
      <property value="0.149688">fsim/propulsion/spool_s</property>
      <property value="2">fsim/propulsion/type</property>
      <property value="1">fsim/plant/version</property>
      <property value="1">fsim/plant/provenance</property>
      <property value="-5.17821">fsim/plant/alpha_zero_lift_deg</property>
      <property value="3000">fsim/plant/altitude_m</property>
      <property value="78.94">fsim/plant/eas_ms</property>
      <property value="-0.0692327">fsim/plant/elevator_trim</property>
      <property value="-0.204185">fsim/plant/elevator_trim_lift</property>
      <property value="4.58901">fsim/plant/pitch/gain</property>
      <property value="0.388615">fsim/plant/pitch/tau_s</property>
      <property value="0.935989">fsim/plant/roll/gain</property>
      <property value="0.152886">fsim/plant/roll/tau_s</property>
      <property value="3.21236">fsim/plant/speed/gain</property>
      <property value="0.149688">fsim/plant/speed/tau_s</property>
      <property value="91.36">fsim/plant/tas_ms</property>
      <property value="0.390981">fsim/plant/yaw/gain</property>
      <property value="1">fsim/performance/version</property>
      <property value="1">fsim/performance/provenance</property>
      <property value="19752">fsim/performance/ceiling_m</property>
      <property value="275.518">fsim/performance/max_tas_ms</property>
      <property value="43.718">fsim/performance/stall_cas_ms</property>
      <!-- the platform's built-in control loops, tuned for this aircraft (hangar autopilot):
           every vehicle of the type takes these as its controllers' parameters -->
      <property value="0.0">fsim/control/pid_acceleration/load_factor/eas_exponent</property>
      <property value="0.0">fsim/control/pid_acceleration/load_factor/feedforward</property>
      <property value="0.3">fsim/control/pid_acceleration/load_factor/integral_limit</property>
      <property value="0.326499">fsim/control/pid_acceleration/load_factor/kd</property>
      <property value="0.168222">fsim/control/pid_acceleration/load_factor/ki</property>
      <property value="0.0217912">fsim/control/pid_acceleration/load_factor/kp</property>
      <property value="0.0">fsim/control/pid_acceleration/load_factor/path_hold</property>
      <property value="1">fsim/control/pid_acceleration/load_factor/tas_exponent</property>
      <property value="0.311298">fsim/control/pid_acceleration/longitudinal/ki</property>
      <property value="0.0622595">fsim/control/pid_acceleration/longitudinal/kp</property>
      <property value="-0.0692327">fsim/control/pid_acceleration/pitch/trim</property>
      <property value="-0.204185">fsim/control/pid_acceleration/pitch/trim_lift</property>
      <property value="-2">fsim/control/pid_acceleration/roll_rate/eas_exponent</property>
      <property value="0.854711">fsim/control/pid_acceleration/roll_rate/feedforward</property>
      <property value="2.09645">fsim/control/pid_acceleration/roll_rate/ki</property>
      <property value="0.106839">fsim/control/pid_acceleration/roll_rate/kp</property>
      <property value="2">fsim/control/pid_acceleration/roll_rate/tas_exponent</property>
      <property value="-1.27883">fsim/control/pid_acceleration/rudder/beta_gain</property>
      <property value="78.9413">fsim/control/pid_acceleration/schedule/eas_ms</property>
      <property value="91.3608">fsim/control/pid_acceleration/schedule/tas_ms</property>
      <property value="0.285657">fsim/control/pid_acceleration/throttle/feedforward</property>
      <property value="0.0194561">fsim/control/pid_attitude/airspeed/ki</property>
      <property value="0.140084">fsim/control/pid_attitude/airspeed/kp</property>
      <property value="1.86324">fsim/control/pid_attitude/heading/gain</property>
      <property value="0.0">fsim/control/pid_attitude/pitch/eas_exponent</property>
      <property value="0.5">fsim/control/pid_attitude/pitch/integral_limit</property>
      <property value="0.326499">fsim/control/pid_attitude/pitch/kd</property>
      <property value="0.504096">fsim/control/pid_attitude/pitch/ki</property>
      <property value="1.30599">fsim/control/pid_attitude/pitch/kp</property>
      <property value="0.0">fsim/control/pid_attitude/pitch/tas_exponent</property>
      <property value="-0.0692327">fsim/control/pid_attitude/pitch/trim</property>
      <property value="-0.204185">fsim/control/pid_attitude/pitch/trim_lift</property>
      <property value="-2">fsim/control/pid_attitude/roll/eas_exponent</property>
      <property value="0.412522">fsim/control/pid_attitude/roll/kd</property>
      <property value="0.0">fsim/control/pid_attitude/roll/ki</property>
      <property value="1.65009">fsim/control/pid_attitude/roll/kp</property>
      <property value="0.467994">fsim/control/pid_attitude/roll/max_rate</property>
      <property value="2">fsim/control/pid_attitude/roll/tas_exponent</property>
      <property value="-1.27883">fsim/control/pid_attitude/rudder/beta_gain</property>
      <property value="78.9413">fsim/control/pid_attitude/schedule/eas_ms</property>
      <property value="91.3608">fsim/control/pid_attitude/schedule/tas_ms</property>
      <property value="0.285657">fsim/control/pid_attitude/throttle/feedforward</property>
      <property value="0.116667">fsim/control/pid_position/altitude/gain</property>
      <property value="9.13608">fsim/control/pid_position/max_vertical_speed</property>
      <property value="0.523599">fsim/control/pid_velocity/max_bank</property>
      <property value="91.3608">fsim/control/pid_velocity/schedule/tas_ms</property>
      <property value="-0.0903769">fsim/control/pid_velocity/vertical_speed/alpha_zero_lift</property>
      <property value="0.647691">fsim/control/pid_velocity/vertical_speed/command_lag</property>
      <property value="1">fsim/control/pid_velocity/vertical_speed/feedforward</property>
      <property value="0.000446946">fsim/control/pid_velocity/vertical_speed/ki</property>
      <property value="0.00383097">fsim/control/pid_velocity/vertical_speed/kp</property>
      <channel name="Brakes">
        <!-- the platform brakes left and right: the centre wheel takes both -->
        <fcs_function name="fcs/center-brake">
          <function>
            <product>
              <value>0.5</value>
              <sum>
                <property>fcs/left-brake-cmd-norm</property>
                <property>fcs/right-brake-cmd-norm</property>
              </sum>
            </product>
          </function>
          <output>fcs/center-brake-cmd-norm</output>
        </fcs_function>
      </channel>
      <channel name="Pitch">
        <summer name="fcs/pitch-trim-sum">
          <input>fcs/elevator-cmd-norm</input>
          <input>fcs/pitch-trim-cmd-norm</input>
          <clipto> <min>-1</min> <max>1</max> </clipto>
        </summer>
        <aerosurface_scale name="fcs/elevator-control">
          <input>fcs/pitch-trim-sum</input>
          <range> <min>-25.00</min> <max>15.00</max> </range>
          <gain>0.0174533</gain>
        </aerosurface_scale>
        <actuator name="fcs/elevator-actuator">
          <input>fcs/elevator-control</input>
          <rate_limit>2.0</rate_limit>
          <output>fcs/elevator-pos-rad</output>
        </actuator>
      </channel>
      <channel name="Roll">
        <summer name="fcs/roll-trim-sum">
          <input>fcs/aileron-cmd-norm</input>
          <input>fcs/roll-trim-cmd-norm</input>
          <clipto> <min>-1</min> <max>1</max> </clipto>
        </summer>
        <aerosurface_scale name="fcs/left-aileron-control">
          <input>fcs/roll-trim-sum</input>
          <range> <min>-20.00</min> <max>20.00</max> </range>
          <gain>0.0174533</gain>
        </aerosurface_scale>
        <actuator name="fcs/left-aileron-actuator">
          <input>fcs/left-aileron-control</input>
          <rate_limit>2.0</rate_limit>
          <output>fcs/left-aileron-pos-rad</output>
        </actuator>
        <pure_gain name="fcs/right-aileron">
          <input>fcs/left-aileron-pos-rad</input>
          <gain>-1</gain>
          <output>fcs/right-aileron-pos-rad</output>
        </pure_gain>
      </channel>
      <channel name="Yaw">
        <summer name="fcs/yaw-trim-sum">
          <input>fcs/rudder-cmd-norm</input>
          <input>fcs/yaw-trim-cmd-norm</input>
          <clipto> <min>-1</min> <max>1</max> </clipto>
        </summer>
        <aerosurface_scale name="fcs/rudder-control">
          <input>fcs/yaw-trim-sum</input>
          <range> <min>-25.00</min> <max>25.00</max> </range>
          <gain>0.0174533</gain>
        </aerosurface_scale>
        <actuator name="fcs/rudder-actuator">
          <input>fcs/rudder-control</input>
          <rate_limit>2.0</rate_limit>
          <output>fcs/rudder-pos-rad</output>
        </actuator>
        <!-- the nose or tail wheel steers with the rudder pedals (JSBSim steers from
             fcs/steer-cmd-norm, positive right; the rudder command is positive left) -->
        <pure_gain name="fcs/steer-from-rudder">
          <input>fcs/yaw-trim-sum</input>
          <gain>-1</gain>
          <output>fcs/steer-cmd-norm</output>
        </pure_gain>
      </channel>
      <channel name="Flaps">
        <kinematic name="fcs/flaps-control">
          <input>fcs/flap-cmd-norm</input>
          <traverse>
            <setting> <position>0.0</position> <time>0.0</time> </setting>
            <setting> <position>8.8</position> <time>2.0</time> </setting>
            <setting> <position>17.5</position> <time>2.0</time> </setting>
            <setting> <position>26.2</position> <time>2.0</time> </setting>
            <setting> <position>35.0</position> <time>2.0</time> </setting>
          </traverse>
          <output>fcs/flap-pos-deg</output>
        </kinematic>
      </channel>
      <channel name="Landing Gear">
        <kinematic name="fcs/gear-control">
          <input>gear/gear-cmd-norm</input>
          <traverse>
            <setting> <position>0</position> <time>0</time> </setting>
            <setting> <position>1</position> <time>5</time> </setting>
          </traverse>
          <output>gear/gear-pos-norm</output>
        </kinematic>
      </channel>
    </flight_control>
    <aerodynamics>
        <function name="aero/function/mach-lift">
          <description>lift, and damping, over its low-speed value (hangar: aero/mach.py)</description>
          <table>
            <independentVar lookup="row">velocities/mach</independentVar>
            <tableData>
                 0.000     1.000000
                 0.300     1.034888
                 0.500     1.108711
                 0.600     1.171308
                 0.700     1.263166
                 0.800     1.401676
                 0.850     1.467312
                 0.900     1.041111
            </tableData>
          </table>
        </function>
        <function name="aero/function/mach-side">
          <description>side force, rolling and yawing moment over their low-speed values</description>
          <table>
            <independentVar lookup="row">velocities/mach</independentVar>
            <tableData>
                 0.000     1.000000
                 0.300     1.024634
                 0.500     1.078072
                 0.600     1.125127
                 0.700     1.198097
                 0.800     1.324221
                 0.850     1.430515
                 0.900     1.601635
            </tableData>
          </table>
        </function>
        <function name="aero/function/mach-dCm-dCL">
          <description>pitching moment per unit low-speed lift: the neutral point's move</description>
          <table>
            <independentVar lookup="row">velocities/mach</independentVar>
            <tableData>
                 0.000     0.000000
                 0.300    -0.003157
                 0.500    -0.009264
                 0.600    -0.013820
                 0.700    -0.019430
                 0.800    -0.025714
                 0.850    -0.023401
                 0.900     0.056423
            </tableData>
          </table>
        </function>
        <function name="aero/function/mach-dCD0">
          <description>zero-lift drag's change: friction and wave drag</description>
          <table>
            <independentVar lookup="row">velocities/mach</independentVar>
            <tableData>
                 0.000     0.000000
                 0.300    -0.000077
                 0.500    -0.000209
                 0.600    -0.000297
                 0.700    -0.000193
                 0.800     0.003572
                 0.850     0.012665
                 0.900     0.025398
            </tableData>
          </table>
        </function>
        <function name="aero/function/mach-dK">
          <description>induced-drag factor's change (per CL^2)</description>
          <table>
            <independentVar lookup="row">velocities/mach</independentVar>
            <tableData>
                 0.000     0.000000
                 0.300     0.002646
                 0.500     0.007443
                 0.600     0.010820
                 0.700     0.014897
                 0.800     0.019597
                 0.850     0.021373
                 0.900     0.003090
            </tableData>
          </table>
        </function>
        <function name="aero/function/mach-aileron">
          <description>aileron power over its low-speed value</description>
          <table>
            <independentVar lookup="row">velocities/mach</independentVar>
            <tableData>
                 0.000     1.000000
                 0.300     1.033541
                 0.500     1.104146
                 0.600     1.163699
                 0.700     1.250871
                 0.800     1.384017
                 0.850     1.469318
                 0.900     1.225345
            </tableData>
          </table>
        </function>
        <function name="aero/function/mach-elevator">
          <description>elevator power over its low-speed value</description>
          <table>
            <independentVar lookup="row">velocities/mach</independentVar>
            <tableData>
                 0.000     1.000000
                 0.300     1.029797
                 0.500     1.091898
                 0.600     1.143688
                 0.700     1.218839
                 0.800     1.335428
                 0.850     1.422522
                 0.900     1.545231
            </tableData>
          </table>
        </function>
        <function name="aero/function/mach-flap">
          <description>flap power over its low-speed value</description>
          <table>
            <independentVar lookup="row">velocities/mach</independentVar>
            <tableData>
                 0.000     1.000000
                 0.300     1.036452
                 0.500     1.113939
                 0.600     1.180122
                 0.700     1.278484
                 0.800     1.433584
                 0.850     1.541636
                 0.900     1.379052
            </tableData>
          </table>
        </function>
        <function name="aero/function/mach-rudder">
          <description>rudder power over its low-speed value</description>
          <table>
            <independentVar lookup="row">velocities/mach</independentVar>
            <tableData>
                 0.000     1.000000
                 0.300     1.024510
                 0.500     1.075336
                 0.600     1.117537
                 0.700     1.178621
                 0.800     1.273425
                 0.850     1.344684
                 0.900     1.447932
            </tableData>
          </table>
        </function>
        <function name="aero/function/CL-base">
          <description>CL over alpha and beta at low speed</description>
          <table>
            <independentVar lookup="row">aero/alpha-deg</independentVar>
            <independentVar lookup="column">aero/beta-deg</independentVar>
            <tableData>
                        -90.00    -70.00    -50.00    -40.00    -30.00    -25.00    -20.00    -15.00    -10.00     -6.00     -3.00      0.00      3.00      6.00     10.00     15.00     20.00     25.00     30.00     40.00     50.00     70.00     90.00
             -180.00   0.00000   0.02069   0.08506   0.12185   0.15632   0.17139   0.18439   0.19493   0.20270   0.20675   0.20848   0.20906   0.20848   0.20675   0.20270   0.19493   0.18439   0.17139   0.15632   0.12185   0.08506   0.02069   0.00000
             -120.00  -0.00000   0.09461   0.29276   0.40496   0.50911   0.55438   0.59333   0.62484   0.64802   0.66038   0.66566   0.66692   0.66566   0.66038   0.64802   0.62484   0.59333   0.55438   0.50911   0.40496   0.29276   0.09461  -0.00000
              -70.00  -0.00000  -0.08165  -0.25808  -0.35878  -0.45257  -0.49342  -0.52860  -0.55709  -0.57805  -0.58899  -0.59365  -0.59450  -0.59365  -0.58899  -0.57805  -0.55709  -0.52860  -0.49342  -0.45257  -0.35878  -0.25808  -0.08165  -0.00000
              -46.00  -0.00000  -0.12624  -0.39610  -0.54971  -0.69916  -0.76703  -0.82693  -0.87645  -0.91407  -0.93176  -0.93929  -0.94181  -0.93929  -0.93176  -0.91407  -0.87645  -0.82693  -0.76703  -0.69916  -0.54971  -0.39610  -0.12624  -0.00000
              -32.00  -0.00000  -0.12142  -0.38238  -0.53844  -0.69322  -0.76259  -0.82255  -0.87049  -0.90329  -0.92006  -0.92711  -0.92946  -0.92711  -0.92006  -0.90329  -0.87049  -0.82255  -0.76259  -0.69322  -0.53844  -0.38238  -0.12142  -0.00000
              -22.00  -0.00000  -0.12076  -0.35542  -0.49400  -0.63241  -0.69267  -0.74233  -0.78029  -0.80644  -0.81776  -0.82270  -0.82450  -0.82270  -0.81776  -0.80644  -0.78029  -0.74233  -0.69267  -0.63241  -0.49400  -0.35542  -0.12076  -0.00000
              -17.00  -0.00000  -0.10964  -0.41132  -0.61013  -0.78299  -0.85256  -0.91565  -0.96507  -1.00074  -1.01917  -1.02697  -1.02957  -1.02697  -1.01917  -1.00074  -0.96507  -0.91565  -0.85256  -0.78299  -0.61013  -0.41132  -0.10964  -0.00000
              -13.00  -0.00000  -0.09901  -0.36249  -0.48005  -0.58057  -0.63162  -0.67733  -0.71278  -0.73826  -0.75135  -0.75686  -0.75869  -0.75686  -0.75135  -0.73826  -0.71278  -0.67733  -0.63162  -0.58057  -0.48005  -0.36249  -0.09901  -0.00000
               -9.00  -0.00000  -0.06056  -0.18881  -0.24429  -0.29720  -0.32320  -0.34593  -0.36315  -0.37525  -0.38132  -0.38381  -0.38463  -0.38381  -0.38132  -0.37525  -0.36315  -0.34593  -0.32320  -0.29720  -0.24429  -0.18881  -0.06056  -0.00000
               -5.00  -0.00000  -0.00035   0.00400  -0.00416  -0.01243  -0.01238  -0.01242  -0.01164  -0.01060  -0.00980  -0.00933  -0.00914  -0.00933  -0.00980  -0.01060  -0.01164  -0.01242  -0.01238  -0.01243  -0.00416   0.00400  -0.00035  -0.00000
               -1.00  -0.00000   0.06048   0.19544   0.23440   0.27257   0.29871   0.32101   0.33937   0.35306   0.36029   0.36342   0.36450   0.36342   0.36029   0.35306   0.33937   0.32101   0.29871   0.27257   0.23440   0.19544   0.06048  -0.00000
                3.00   0.00000   0.11592   0.38585   0.47043   0.55502   0.60764   0.65319   0.68934   0.71560   0.72918   0.73490   0.73680   0.73490   0.72918   0.71560   0.68934   0.65319   0.60764   0.55502   0.47043   0.38585   0.11592   0.00000
                7.00   0.00000   0.11552   0.51563   0.70510   0.83889   0.91654   0.98315   1.03688   1.07615   1.09648   1.10505   1.10788   1.10505   1.09648   1.07615   1.03688   0.98315   0.91654   0.83889   0.70510   0.51563   0.11552   0.00000
               11.00   0.00000   0.14430   0.42224   0.58725   0.71917   0.77855   0.82761   0.86693   0.89490   0.90988   0.91736   1.10718   0.91736   0.90988   0.89490   0.86693   0.82761   0.77855   0.71917   0.58725   0.42224   0.14430   0.00000
               15.00   0.00000   0.10865   0.35793   0.48587   0.60209   0.65524   0.70113   0.73736   0.76336   0.77673   0.78236   0.78423   0.78236   0.77673   0.76336   0.73736   0.70113   0.65524   0.60209   0.48587   0.35793   0.10865   0.00000
               19.00   0.00000   0.11071   0.35596   0.50501   0.64450   0.70075   0.74988   0.78913   0.81745   0.83208   0.83827   0.84034   0.83827   0.83208   0.81745   0.78913   0.74988   0.70075   0.64450   0.50501   0.35596   0.11071   0.00000
               23.00   0.00000   0.11510   0.36735   0.51269   0.65018   0.71328   0.76853   0.80662   0.83002   0.84265   0.84843   0.85039   0.84843   0.84265   0.83002   0.80662   0.76853   0.71328   0.65018   0.51269   0.36735   0.11510   0.00000
               27.00   0.00000   0.11965   0.37974   0.52933   0.66990   0.73127   0.78413   0.82554   0.85464   0.86964   0.87600   0.87812   0.87600   0.86964   0.85464   0.82554   0.78413   0.73127   0.66990   0.52933   0.37974   0.11965   0.00000
               32.00   0.00000   0.12424   0.39217   0.54620   0.69152   0.75538   0.81076   0.85514   0.88636   0.90239   0.90917   0.91143   0.90917   0.90239   0.88636   0.85514   0.81076   0.75538   0.69152   0.54620   0.39217   0.12424   0.00000
               46.00   0.00000   0.12417   0.38895   0.53901   0.67945   0.74105   0.79439   0.83780   0.87021   0.88537   0.89180   0.89395   0.89180   0.88537   0.87021   0.83780   0.79439   0.74105   0.67945   0.53901   0.38895   0.12417   0.00000
               70.00   0.00000   0.07076   0.21981   0.30445   0.38316   0.41741   0.44689   0.47076   0.48831   0.49747   0.50137   0.50198   0.50137   0.49747   0.48831   0.47076   0.44689   0.41741   0.38316   0.30445   0.21981   0.07076   0.00000
              120.00   0.00000  -0.10131  -0.31628  -0.43834  -0.55175  -0.60107  -0.64352  -0.67787  -0.70314  -0.71660  -0.72234  -0.72376  -0.72234  -0.71660  -0.70314  -0.67787  -0.64352  -0.60107  -0.55175  -0.43834  -0.31628  -0.10131   0.00000
              180.00   0.00000   0.02069   0.08506   0.12185   0.15632   0.17139   0.18439   0.19493   0.20270   0.20675   0.20848   0.20906   0.20848   0.20675   0.20270   0.19493   0.18439   0.17139   0.15632   0.12185   0.08506   0.02069   0.00000
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            </tableData>
          </table>
        </function>
      <axis name="DRAG">
        <function name="aero/coefficient/CD_base">
          <description>CD over alpha and beta (hangar)</description>
          <product>
            <property>aero/qbar-psf</property>
            <property>metrics/Sw-sqft</property>
          <table>
            <independentVar lookup="row">aero/alpha-deg</independentVar>
            <independentVar lookup="column">aero/beta-deg</independentVar>
            <tableData>
                        -90.00    -70.00    -50.00    -40.00    -30.00    -25.00    -20.00    -15.00    -10.00     -6.00     -3.00      0.00      3.00      6.00     10.00     15.00     20.00     25.00     30.00     40.00     50.00     70.00     90.00
             -180.00   0.22244   0.17063   0.09045   0.05679   0.03340   0.02588   0.02092   0.01811   0.01623   0.01653   0.01683   0.01695   0.01683   0.01653   0.01623   0.01811   0.02092   0.02588   0.03340   0.05679   0.09045   0.17063   0.22244
             -120.00   0.22244   0.24620   0.46852   0.66202   0.87711   0.98039   1.07378   1.15235   1.21181   1.24331   1.25690   1.26149   1.25690   1.24331   1.21181   1.15235   1.07378   0.98039   0.87711   0.66202   0.46852   0.24620   0.22244
              -70.00   0.22244   0.27088   0.53865   0.76093   1.00491   1.12141   1.22651   1.31480   1.38156   1.41699   1.43216   1.43730   1.43216   1.41699   1.38156   1.31480   1.22651   1.12141   1.00491   0.76093   0.53865   0.27088   0.22244
              -46.00   0.22244   0.24453   0.36404   0.46992   0.59804   0.66445   0.72737   0.78255   0.82663   0.84812   0.85738   0.86049   0.85738   0.84812   0.82663   0.78255   0.72737   0.66445   0.59804   0.46992   0.36404   0.24453   0.22244
              -32.00   0.22244   0.22668   0.25435   0.29778   0.36760   0.40766   0.44654   0.47902   0.50002   0.51069   0.51512   0.51658   0.51512   0.51069   0.50002   0.47902   0.44654   0.40766   0.36760   0.29778   0.25435   0.22668   0.22244
              -22.00   0.22244   0.21563   0.19143   0.19483   0.21472   0.22660   0.23793   0.24052   0.24358   0.24468   0.24530   0.24553   0.24530   0.24468   0.24358   0.24052   0.23793   0.22660   0.21472   0.19483   0.19143   0.21563   0.22244
              -17.00   0.22244   0.21151   0.16147   0.14425   0.12747   0.11985   0.11744   0.10861   0.10337   0.10065   0.09949   0.09911   0.09949   0.10065   0.10337   0.10861   0.11744   0.11985   0.12747   0.14425   0.16147   0.21151   0.22244
              -13.00   0.22244   0.20851   0.14479   0.11372   0.08604   0.07579   0.06993   0.05948   0.05307   0.04978   0.04840   0.04794   0.04840   0.04978   0.05307   0.05948   0.06993   0.07579   0.08604   0.11372   0.14479   0.20851   0.22244
               -9.00   0.22244   0.20705   0.13738   0.09933   0.06770   0.05604   0.04820   0.03718   0.03036   0.02691   0.02548   0.02501   0.02548   0.02691   0.03036   0.03718   0.04820   0.05604   0.06770   0.09933   0.13738   0.20705   0.22244
               -5.00   0.22244   0.20654   0.13378   0.09259   0.05905   0.04682   0.03780   0.02672   0.01990   0.01654   0.01517   0.01472   0.01517   0.01654   0.01990   0.02672   0.03780   0.04682   0.05905   0.09259   0.13378   0.20654   0.22244
               -1.00   0.22244   0.20639   0.13400   0.09410   0.06042   0.04845   0.03901   0.02825   0.02172   0.01857   0.01732   0.01693   0.01732   0.01857   0.02172   0.02825   0.03901   0.04845   0.06042   0.09410   0.13400   0.20639   0.22244
                3.00   0.22244   0.20664   0.13902   0.10473   0.07309   0.06178   0.05266   0.04273   0.03627   0.03351   0.03217   0.03139   0.03217   0.03351   0.03627   0.04273   0.05266   0.06178   0.07309   0.10473   0.13902   0.20664   0.22244
                7.00   0.22244   0.20818   0.14737   0.12634   0.09849   0.08816   0.07963   0.07057   0.06459   0.06231   0.06105   0.06017   0.06105   0.06231   0.06459   0.07057   0.07963   0.08816   0.09849   0.12634   0.14737   0.20818   0.22244
               11.00   0.22244   0.20983   0.16000   0.15054   0.15408   0.14888   0.14566   0.13759   0.13282   0.13023   0.12820   0.11950   0.12820   0.13023   0.13282   0.13759   0.14566   0.14888   0.15408   0.15054   0.16000   0.20983   0.22244
               15.00   0.22244   0.21307   0.17545   0.16610   0.16720   0.16903   0.17088   0.16753   0.16762   0.16779   0.16781   0.16784   0.16781   0.16779   0.16762   0.16753   0.17088   0.16903   0.16720   0.16610   0.17545   0.21307   0.22244
               19.00   0.22244   0.21644   0.19502   0.19916   0.21265   0.22053   0.22897   0.23153   0.23480   0.23639   0.23675   0.23693   0.23675   0.23639   0.23480   0.23153   0.22897   0.22053   0.21265   0.19916   0.19502   0.21644   0.22244
               23.00   0.22244   0.22035   0.21844   0.23728   0.26939   0.28786   0.30314   0.31237   0.31961   0.32349   0.32485   0.32539   0.32485   0.32349   0.31961   0.31237   0.30314   0.28786   0.26939   0.23728   0.21844   0.22035   0.22244
               27.00   0.22244   0.22475   0.24484   0.28063   0.33212   0.35938   0.38598   0.40201   0.41496   0.42161   0.42438   0.42531   0.42438   0.42161   0.41496   0.40201   0.38598   0.35938   0.33212   0.28063   0.24484   0.22475   0.22244
               32.00   0.22244   0.23077   0.28120   0.33949   0.41639   0.45650   0.49632   0.52440   0.54612   0.55740   0.56216   0.56374   0.56216   0.55740   0.54612   0.52440   0.49632   0.45650   0.41639   0.33949   0.28120   0.23077   0.22244
               46.00   0.22244   0.24908   0.39411   0.52035   0.66534   0.73695   0.80276   0.85901   0.90239   0.92384   0.93305   0.93613   0.93305   0.92384   0.90239   0.85901   0.80276   0.73695   0.66534   0.52035   0.39411   0.24908   0.22244
               70.00   0.22244   0.27380   0.55798   0.79364   1.05215   1.17555   1.28686   1.38034   1.45103   1.48853   1.50459   1.51002   1.50459   1.48853   1.45103   1.38034   1.28686   1.17555   1.05215   0.79364   0.55798   0.27380   0.22244
              120.00   0.22244   0.24226   0.44247   0.61794   0.81345   0.90743   0.99247   1.06403   1.11822   1.14692   1.15931   1.16350   1.15931   1.14692   1.11822   1.06403   0.99247   0.90743   0.81345   0.61794   0.44247   0.24226   0.22244
              180.00   0.22244   0.17063   0.09045   0.05679   0.03340   0.02588   0.02092   0.01811   0.01623   0.01653   0.01683   0.01695   0.01683   0.01653   0.01623   0.01811   0.02092   0.02588   0.03340   0.05679   0.09045   0.17063   0.22244
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            </tableData>
          </table>
          </product>
        </function>
        <function name="aero/coefficient/CD_mach">
          <description>zero-lift drag's change with Mach: friction, wave drag</description>
          <product>
            <property>aero/qbar-psf</property>
            <property>metrics/Sw-sqft</property>
            <property>aero/function/mach-dCD0</property>
          </product>
        </function>
        <function name="aero/coefficient/CD_induced_mach">
          <description>induced drag's change with Mach (leading-edge suction lost)</description>
          <product>
            <property>aero/qbar-psf</property>
            <property>metrics/Sw-sqft</property>
            <property>aero/cl-squared</property>
            <property>aero/function/mach-dK</property>
          </product>
        </function>
        <function name="aero/coefficient/CD_aileron">
          <description>CD increment from aileron (deg), over alpha</description>
          <product>
            <property>aero/qbar-psf</property>
            <property>metrics/Sw-sqft</property>
            <property>aero/function/mach-aileron</property>
          <table>
            <independentVar lookup="row">aero/alpha-deg</independentVar>
            <independentVar lookup="column">fcs/left-aileron-pos-deg</independentVar>
            <tableData>
                        -20.00    -15.00    -10.00     -5.00      0.00      5.00     10.00     15.00     20.00
             -180.00   0.00466   0.00267   0.00120   0.00030   0.00000   0.00030   0.00120   0.00267   0.00466
             -120.00   0.00466   0.00267   0.00120   0.00030   0.00000   0.00030   0.00120   0.00267   0.00466
              -70.00   0.00466   0.00267   0.00120   0.00030   0.00000   0.00030   0.00120   0.00267   0.00466
              -46.00   0.00765   0.00467   0.00224   0.00059   0.00000   0.00059   0.00224   0.00467   0.00765
              -32.00   0.00927   0.00577   0.00283   0.00075   0.00000   0.00075   0.00283   0.00577   0.00927
              -22.00   0.01021   0.00660   0.00334   0.00091   0.00000   0.00091   0.00334   0.00660   0.01021
              -17.00   0.01637   0.01321   0.01040   0.00379   0.00000   0.00379   0.01040   0.01321   0.01637
              -13.00   0.01092   0.00720   0.00368   0.00096   0.00000   0.00096   0.00368   0.00720   0.01092
               -9.00   0.01105   0.00730   0.00375   0.00103   0.00000   0.00103   0.00375   0.00730   0.01105
               -5.00   0.01119   0.00740   0.00380   0.00104   0.00000   0.00104   0.00380   0.00740   0.01119
               -1.00   0.01111   0.00734   0.00377   0.00103   0.00000   0.00103   0.00377   0.00734   0.01111
                3.00   0.01085   0.00716   0.00367   0.00100   0.00000   0.00100   0.00367   0.00716   0.01085
                7.00   0.01100   0.00700   0.00348   0.00095   0.00000   0.00095   0.00348   0.00700   0.01100
               11.00   0.03934   0.03090   0.02170   0.01349   0.00000   0.01349   0.02170   0.03090   0.03934
               15.00   0.01354   0.00887   0.00454   0.00124   0.00000   0.00124   0.00454   0.00887   0.01354
               19.00   0.01199   0.00778   0.00395   0.00108   0.00000   0.00108   0.00395   0.00778   0.01199
               23.00   0.01114   0.00712   0.00357   0.00097   0.00000   0.00097   0.00357   0.00712   0.01114
               27.00   0.01071   0.00676   0.00335   0.00090   0.00000   0.00090   0.00335   0.00676   0.01071
               32.00   0.01035   0.00652   0.00318   0.00085   0.00000   0.00085   0.00318   0.00652   0.01035
               46.00   0.00814   0.00498   0.00239   0.00063   0.00000   0.00063   0.00239   0.00498   0.00814
               70.00   0.00466   0.00267   0.00120   0.00030   0.00000   0.00030   0.00120   0.00267   0.00466
              120.00   0.00466   0.00267   0.00120   0.00030   0.00000   0.00030   0.00120   0.00267   0.00466
              180.00   0.00466   0.00267   0.00120   0.00030   0.00000   0.00030   0.00120   0.00267   0.00466
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            </tableData>
          </table>
          </product>
        </function>
        <function name="aero/coefficient/CD_elevator">
          <description>CD increment from elevator (deg), over alpha</description>
          <product>
            <property>aero/qbar-psf</property>
            <property>metrics/Sw-sqft</property>
            <property>aero/function/mach-elevator</property>
          <table>
            <independentVar lookup="row">aero/alpha-deg</independentVar>
            <independentVar lookup="column">fcs/elevator-pos-deg</independentVar>
            <tableData>
                        -25.00    -20.00    -15.00    -10.00     -5.00      0.00      5.00     10.00     15.00
             -180.00   0.00450   0.00295   0.00169   0.00076   0.00019   0.00000   0.00019   0.00076   0.00169
             -120.00   0.00450   0.00295   0.00169   0.00076   0.00019   0.00000   0.00019   0.00076   0.00169
              -70.00   0.00450   0.00295   0.00169   0.00076   0.00019   0.00000   0.00019   0.00076   0.00169
              -46.00  -0.00014  -0.00094  -0.00134  -0.00142  -0.00104   0.00000   0.00179   0.00429   0.00729
              -32.00  -0.00020  -0.00077  -0.00079  -0.00081  -0.00069   0.00000   0.00174   0.00471   0.00866
              -22.00   0.00666   0.00451   0.00373   0.00269   0.00127   0.00000  -0.00027   0.00090   0.00302
              -17.00   0.02010   0.01642   0.01420   0.01073   0.00567   0.00000  -0.00501  -0.00853  -0.01025
              -13.00   0.01958   0.01639   0.01304   0.00886   0.00424   0.00000  -0.00321  -0.00502  -0.00544
               -9.00   0.01669   0.01374   0.01057   0.00696   0.00318   0.00000  -0.00203  -0.00274  -0.00233
               -5.00   0.01301   0.01032   0.00756   0.00464   0.00191   0.00000  -0.00070  -0.00021   0.00109
               -1.00   0.00867   0.00632   0.00410   0.00203   0.00050   0.00000   0.00073   0.00248   0.00471
                3.00   0.00385   0.00194   0.00033  -0.00078  -0.00100   0.00000   0.00223   0.00527   0.00842
                7.00  -0.00092  -0.00241  -0.00340  -0.00355  -0.00246   0.00000   0.00364   0.00787   0.01186
               11.00  -0.01895  -0.01975  -0.01956  -0.01520  -0.01129   0.00000   0.01113   0.01975   0.02688
               15.00  -0.00630  -0.00450  -0.00698  -0.00215  -0.00331   0.00000   0.00455   0.00925   0.01350
               19.00   0.00040  -0.00539  -0.00653  -0.00549  -0.00356   0.00000   0.00627   0.01377   0.02050
               23.00   0.00549   0.00381   0.00155  -0.00072  -0.00163   0.00000   0.00432   0.01022   0.01590
               27.00   0.01194   0.00808   0.00446   0.00140  -0.00032   0.00000   0.00231   0.00580   0.00937
               32.00   0.01651   0.01178   0.00740   0.00360   0.00096   0.00000   0.00067   0.00238   0.00429
               46.00   0.01390   0.01024   0.00688   0.00391   0.00154   0.00000  -0.00065  -0.00058  -0.00006
               70.00   0.00450   0.00295   0.00169   0.00076   0.00019   0.00000   0.00019   0.00076   0.00169
              120.00   0.00450   0.00295   0.00169   0.00076   0.00019   0.00000   0.00019   0.00076   0.00169
              180.00   0.00450   0.00295   0.00169   0.00076   0.00019   0.00000   0.00019   0.00076   0.00169
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            </tableData>
          </table>
          </product>
        </function>
        <function name="aero/coefficient/CD_flap">
          <description>CD increment from flap (deg), over alpha</description>
          <product>
            <property>aero/qbar-psf</property>
            <property>metrics/Sw-sqft</property>
            <property>aero/function/mach-flap</property>
          <table>
            <independentVar lookup="row">aero/alpha-deg</independentVar>
            <independentVar lookup="column">fcs/flap-pos-deg</independentVar>
            <tableData>
                          0.00      5.00     10.00     15.00     20.00     25.00     30.00     35.00
             -180.00   0.00000   0.00084   0.00335   0.00743   0.01298   0.01982   0.02774   0.03650
             -120.00   0.00000   0.00084   0.00334   0.00743   0.01297   0.01980   0.02772   0.03647
              -70.00   0.00000   0.00084   0.00334   0.00743   0.01297   0.01980   0.02771   0.03647
              -46.00   0.00000   0.01443   0.03157   0.05000   0.06872   0.08787   0.10822   0.12993
              -32.00   0.00000   0.02013   0.04469   0.07151   0.09875   0.12707   0.15676   0.18794
              -22.00   0.00000   0.01025   0.02660   0.04639   0.06740   0.08964   0.11383   0.14035
              -17.00   0.00000  -0.01742  -0.02428  -0.02429  -0.01994  -0.01294  -0.00420   0.00584
              -13.00   0.00000  -0.00521  -0.00536  -0.00143   0.00505   0.01322   0.02270   0.03333
               -9.00   0.00000  -0.00117   0.00228   0.00883   0.01700   0.02628   0.03664   0.04808
               -5.00   0.00000   0.00287   0.00982   0.01886   0.02859   0.03889   0.05004   0.06221
               -1.00   0.00000   0.00679   0.01705   0.02838   0.03951   0.05067   0.06248   0.07525
                3.00   0.00000   0.01056   0.02391   0.03732   0.04966   0.06154   0.07385   0.08705
                7.00   0.00000   0.01458   0.03220   0.05194   0.06968   0.08510   0.09999   0.11555
               11.00   0.00000   0.01451   0.04331   0.07656   0.10178   0.12130   0.13927   0.15690
               15.00   0.00000  -0.00121   0.00413   0.01211   0.02083   0.03127   0.05147   0.09791
               19.00   0.00000  -0.00619  -0.00684  -0.00522  -0.00297   0.00015   0.00479   0.01144
               23.00   0.00000  -0.01173  -0.01830  -0.02198  -0.02428  -0.02537  -0.02495  -0.02288
               27.00   0.00000  -0.01700  -0.02879  -0.03718  -0.04359  -0.04844  -0.05172  -0.05345
               32.00   0.00000  -0.02320  -0.04104  -0.05462  -0.06532  -0.07391  -0.08079  -0.08610
               46.00   0.00000  -0.01558  -0.02696  -0.03432  -0.03859  -0.04071  -0.04133  -0.04087
               70.00   0.00000   0.00084   0.00334   0.00743   0.01297   0.01980   0.02771   0.03647
              120.00   0.00000   0.00084   0.00334   0.00743   0.01297   0.01980   0.02772   0.03647
              180.00   0.00000   0.00084   0.00335   0.00743   0.01298   0.01982   0.02774   0.03650
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            </tableData>
          </table>
          </product>
        </function>
        <function name="aero/coefficient/CD_rudder">
          <description>CD increment from rudder (deg), over alpha</description>
          <product>
            <property>aero/qbar-psf</property>
            <property>metrics/Sw-sqft</property>
            <property>aero/function/mach-rudder</property>
          <table>
            <independentVar lookup="row">aero/alpha-deg</independentVar>
            <independentVar lookup="column">fcs/rudder-pos-deg</independentVar>
            <tableData>
                        -25.00    -20.00    -15.00    -10.00     -5.00      0.00      5.00     10.00     15.00     20.00     25.00
             -180.00   0.00134   0.00088   0.00050   0.00023   0.00006   0.00000   0.00006   0.00023   0.00050   0.00088   0.00134
             -120.00   0.00017   0.00011   0.00006   0.00003   0.00001   0.00000   0.00001   0.00003   0.00006   0.00011   0.00017
              -70.00   0.00006   0.00004   0.00002   0.00001   0.00000   0.00000   0.00000   0.00001   0.00002   0.00004   0.00006
              -46.00   0.00201   0.00156   0.00108   0.00058   0.00016   0.00000   0.00016   0.00058   0.00108   0.00156   0.00201
              -32.00   0.00269   0.00204   0.00139   0.00073   0.00020   0.00000   0.00020   0.00073   0.00139   0.00204   0.00269
              -22.00   0.00315   0.00238   0.00161   0.00084   0.00023   0.00000   0.00023   0.00084   0.00161   0.00238   0.00315
              -17.00   0.00350   0.00267   0.00181   0.00095   0.00026   0.00000   0.00026   0.00095   0.00181   0.00267   0.00350
              -13.00   0.00362   0.00275   0.00187   0.00098   0.00027   0.00000   0.00027   0.00098   0.00187   0.00275   0.00362
               -9.00   0.00369   0.00280   0.00190   0.00100   0.00027   0.00000   0.00027   0.00100   0.00190   0.00280   0.00369
               -5.00   0.00371   0.00281   0.00190   0.00100   0.00028   0.00000   0.00028   0.00100   0.00190   0.00281   0.00371
               -1.00   0.00369   0.00279   0.00189   0.00099   0.00027   0.00000   0.00027   0.00099   0.00189   0.00279   0.00369
                3.00   0.00363   0.00274   0.00185   0.00097   0.00027   0.00000   0.00027   0.00097   0.00185   0.00274   0.00363
                7.00   0.00352   0.00266   0.00179   0.00094   0.00026   0.00000   0.00026   0.00094   0.00179   0.00266   0.00352
               11.00   0.00904   0.00840   0.00791   0.00080   0.00023   0.00000   0.00023   0.00080   0.00790   0.00839   0.00903
               15.00   0.00323   0.00244   0.00165   0.00086   0.00024   0.00000   0.00024   0.00086   0.00165   0.00244   0.00323
               19.00   0.00311   0.00235   0.00158   0.00083   0.00023   0.00000   0.00023   0.00083   0.00158   0.00235   0.00311
               23.00   0.00265   0.00198   0.00133   0.00069   0.00019   0.00000   0.00019   0.00069   0.00133   0.00198   0.00265
               27.00   0.00244   0.00183   0.00122   0.00064   0.00018   0.00000   0.00018   0.00064   0.00122   0.00183   0.00244
               32.00   0.00216   0.00162   0.00109   0.00056   0.00016   0.00000   0.00016   0.00056   0.00109   0.00162   0.00216
               46.00   0.00192   0.00148   0.00102   0.00054   0.00015   0.00000   0.00015   0.00054   0.00102   0.00148   0.00192
               70.00   0.00006   0.00004   0.00002   0.00001   0.00000   0.00000   0.00000   0.00001   0.00002   0.00004   0.00006
              120.00   0.00017   0.00011   0.00006   0.00003   0.00001   0.00000   0.00001   0.00003   0.00006   0.00011   0.00017
              180.00   0.00134   0.00088   0.00050   0.00023   0.00006   0.00000   0.00006   0.00023   0.00050   0.00088   0.00134
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            </tableData>
          </table>
          </product>
        </function>
        <function name="aero/coefficient/CD_ground">
          <description>Induced drag change in ground effect</description>
          <product>
            <property>aero/qbar-psf</property>
            <property>metrics/Sw-sqft</property>
            <property>aero/cl-squared</property>
            <value>0.03532</value>
          <table>
            <independentVar lookup="row">aero/h_b-mac-ft</independentVar>
            <tableData>
                    0.00   -1.00000
                    0.10   -0.28090
                    0.15   -0.14793
                    0.20   -0.08897
                    0.30   -0.04160
                    0.40   -0.02383
                    0.50   -0.01538
                    0.60   -0.01073
                    0.70   -0.00791
                    0.80   -0.00607
                    0.90   -0.00480
                    1.00   -0.00389
                    1.10   -0.00322
            </tableData>
          </table>
          </product>
        </function>
      </axis>
      <axis name="SIDE">
        <function name="aero/coefficient/CY_base">
          <description>CY over alpha and beta (hangar)</description>
          <product>
            <property>aero/qbar-psf</property>
            <property>metrics/Sw-sqft</property>
            <property>aero/function/mach-side</property>
          <table>
            <independentVar lookup="row">aero/alpha-deg</independentVar>
            <independentVar lookup="column">aero/beta-deg</independentVar>
            <tableData>
                        -90.00    -70.00    -50.00    -40.00    -30.00    -25.00    -20.00    -15.00    -10.00     -6.00     -3.00      0.00      3.00      6.00     10.00     15.00     20.00     25.00     30.00     40.00     50.00     70.00     90.00
             -180.00  -0.00000   0.06209   0.06852   0.05374   0.03373   0.02378   0.01487   0.00764   0.01282   0.01734   0.00903  -0.00000  -0.00903  -0.01734  -0.01282  -0.00764  -0.01487  -0.02378  -0.03373  -0.05374  -0.06852  -0.06209   0.00000
             -120.00  -0.00000  -0.09853  -0.32671  -0.39978  -0.40422  -0.37648  -0.32914  -0.26416  -0.18472  -0.11256  -0.05309  -0.00000   0.05309   0.11256   0.18472   0.26416   0.32914   0.37648   0.40422   0.39978   0.32671   0.09853   0.00000
              -70.00   0.00000  -0.11581  -0.36717  -0.44613  -0.44927  -0.41786  -0.36485  -0.29234  -0.20363  -0.12365  -0.05941  -0.00000   0.05941   0.12365   0.20363   0.29234   0.36485   0.41786   0.44927   0.44613   0.36717   0.11581  -0.00000
              -46.00   0.00000  -0.03326  -0.15573  -0.19975  -0.21012  -0.19844  -0.17446  -0.13818  -0.08555  -0.05255  -0.02664  -0.00000   0.02664   0.05255   0.08555   0.13818   0.17446   0.19844   0.21012   0.19975   0.15573   0.03326  -0.00000
              -32.00   0.00000   0.01786  -0.02778  -0.05535  -0.06937  -0.06732  -0.05738  -0.03512  -0.02573  -0.01631  -0.00835  -0.00000   0.00835   0.01631   0.02573   0.03512   0.05738   0.06732   0.06937   0.05535   0.02778  -0.01786  -0.00000
              -22.00   0.00000   0.04777   0.04432   0.02937   0.01675   0.01425   0.02255   0.02048   0.01287   0.00754   0.00371  -0.00000  -0.00371  -0.00754  -0.01287  -0.02048  -0.02255  -0.01425  -0.01675  -0.02937  -0.04432  -0.04777  -0.00000
              -17.00   0.00000   0.05952   0.07966   0.07296   0.05953   0.05372   0.05690   0.04907   0.03253   0.01934   0.00962  -0.00000  -0.00962  -0.01934  -0.03253  -0.04907  -0.05690  -0.05372  -0.05953  -0.07296  -0.07966  -0.05952  -0.00000
              -13.00   0.00000   0.07046   0.09830   0.08906   0.07507   0.06806   0.07045   0.05825   0.03868   0.02301   0.01145  -0.00000  -0.01145  -0.02301  -0.03868  -0.05825  -0.07045  -0.06806  -0.07507  -0.08906  -0.09830  -0.07046  -0.00000
               -9.00   0.00000   0.07551   0.10456   0.09714   0.08301   0.07523   0.07674   0.06232   0.04119   0.02441   0.01211  -0.00000  -0.01211  -0.02441  -0.04119  -0.06232  -0.07674  -0.07523  -0.08301  -0.09714  -0.10456  -0.07551  -0.00000
               -5.00   0.00000   0.07697   0.10780   0.10048   0.08599   0.07782   0.07865   0.06312   0.04135   0.02426   0.01195  -0.00000  -0.01195  -0.02426  -0.04135  -0.06312  -0.07865  -0.07782  -0.08599  -0.10048  -0.10780  -0.07697  -0.00000
               -1.00   0.00000   0.07740   0.10758   0.09948   0.08437   0.07628   0.07689   0.06135   0.03985   0.02310   0.01121  -0.00000  -0.01121  -0.02310  -0.03985  -0.06135  -0.07689  -0.07628  -0.08437  -0.09948  -0.10758  -0.07740  -0.00000
                3.00   0.00000   0.07634   0.10438   0.09387   0.07838   0.07078   0.07186   0.05748   0.03732   0.02168   0.01056  -0.00000  -0.01056  -0.02168  -0.03732  -0.05748  -0.07186  -0.07078  -0.07838  -0.09387  -0.10438  -0.07634  -0.00000
                7.00   0.00000   0.06758   0.09623   0.08357   0.06748   0.06081   0.06312   0.05092   0.03305   0.01922   0.00939  -0.00000  -0.00939  -0.01922  -0.03305  -0.05092  -0.06312  -0.06081  -0.06748  -0.08357  -0.09623  -0.06758  -0.00000
               11.00   0.00000   0.06152   0.07753   0.06117   0.04439   0.03752   0.03311   0.03790   0.02898   0.01785   0.01071  -0.00000  -0.01071  -0.01785  -0.02898  -0.03790  -0.03311  -0.03752  -0.04439  -0.06117  -0.07753  -0.06152  -0.00000
               15.00   0.00000   0.05541   0.06150   0.04889   0.03706   0.03309   0.03704   0.03357   0.02179   0.01268   0.00626  -0.00000  -0.00626  -0.01268  -0.02179  -0.03357  -0.03704  -0.03309  -0.03706  -0.04889  -0.06150  -0.05541  -0.00000
               19.00   0.00000   0.04635   0.03889   0.02242   0.01010   0.00840   0.01529   0.01573   0.00974   0.00539   0.00258  -0.00000  -0.00258  -0.00539  -0.00974  -0.01573  -0.01529  -0.00840  -0.01010  -0.02242  -0.03889  -0.04635  -0.00000
               23.00   0.00000   0.03565   0.01227  -0.00785  -0.01914  -0.01840  -0.00960  -0.00513  -0.00392  -0.00276  -0.00153  -0.00000   0.00153   0.00276   0.00392   0.00513   0.00960   0.01840   0.01914   0.00785  -0.01227  -0.03565  -0.00000
               27.00   0.00000   0.02350  -0.01794  -0.04294  -0.05377  -0.05098  -0.03743  -0.02644  -0.01880  -0.01197  -0.00617  -0.00000   0.00617   0.01197   0.01880   0.02644   0.03743   0.05098   0.05377   0.04294   0.01794  -0.02350  -0.00000
               32.00   0.00000   0.00667  -0.05979  -0.09153  -0.10217  -0.09636  -0.08009  -0.05760  -0.04054  -0.02537  -0.01294  -0.00000   0.01294   0.02537   0.04054   0.05760   0.08009   0.09636   0.10217   0.09153   0.05979  -0.00667  -0.00000
               46.00   0.00000  -0.04573  -0.19154  -0.24210  -0.24963  -0.23339  -0.20343  -0.16024  -0.10186  -0.06251  -0.03161  -0.00000   0.03161   0.06251   0.10186   0.16024   0.20343   0.23339   0.24963   0.24210   0.19154   0.04573  -0.00000
               70.00   0.00000  -0.12382  -0.39020  -0.47356  -0.47654  -0.44310  -0.38681  -0.30989  -0.21587  -0.13117  -0.06321  -0.00000   0.06321   0.13117   0.21587   0.30989   0.38681   0.44310   0.47654   0.47356   0.39020   0.12382  -0.00000
              120.00  -0.00000  -0.08773  -0.29569  -0.36282  -0.36748  -0.34247  -0.29955  -0.24050  -0.16822  -0.10243  -0.04798  -0.00000   0.04798   0.10243   0.16822   0.24050   0.29955   0.34247   0.36748   0.36282   0.29569   0.08773   0.00000
              180.00  -0.00000   0.06209   0.06852   0.05374   0.03373   0.02378   0.01487   0.00764   0.01282   0.01734   0.00903  -0.00000  -0.00903  -0.01734  -0.01282  -0.00764  -0.01487  -0.02378  -0.03373  -0.05374  -0.06852  -0.06209   0.00000
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            </tableData>
          </table>
          </product>
        </function>
        <function name="aero/coefficient/CY_aileron">
          <description>CY increment from aileron (deg), over alpha</description>
          <product>
            <property>aero/qbar-psf</property>
            <property>metrics/Sw-sqft</property>
            <property>aero/function/mach-aileron</property>
          <table>
            <independentVar lookup="row">aero/alpha-deg</independentVar>
            <independentVar lookup="column">fcs/left-aileron-pos-deg</independentVar>
            <tableData>
                        -20.00    -15.00    -10.00     -5.00      0.00      5.00     10.00     15.00     20.00
             -180.00   0.00000   0.00000   0.00000   0.00000   0.00000   0.00000   0.00000   0.00000   0.00000
             -120.00   0.00037   0.00031   0.00023   0.00012   0.00000  -0.00012  -0.00023  -0.00031  -0.00037
              -70.00  -0.00015  -0.00013  -0.00010  -0.00005   0.00000   0.00005   0.00010   0.00013   0.00015
              -46.00  -0.00043  -0.00041  -0.00032  -0.00018   0.00000   0.00018   0.00032   0.00041   0.00043
              -32.00  -0.00095  -0.00086  -0.00067  -0.00037   0.00000   0.00037   0.00067   0.00086   0.00095
              -22.00  -0.00245  -0.00210  -0.00156  -0.00083   0.00000   0.00083   0.00156   0.00210   0.00245
              -17.00  -0.00433  -0.00368  -0.00275  -0.00154   0.00000   0.00154   0.00275   0.00368   0.00433
              -13.00  -0.00349  -0.00293  -0.00213  -0.00112   0.00000   0.00112   0.00213   0.00293   0.00349
               -9.00  -0.00333  -0.00284  -0.00211  -0.00112   0.00000   0.00112   0.00211   0.00284   0.00333
               -5.00  -0.00338  -0.00289  -0.00215  -0.00114   0.00000   0.00114   0.00215   0.00289   0.00338
               -1.00  -0.00350  -0.00299  -0.00222  -0.00118   0.00000   0.00118   0.00222   0.00299   0.00350
                3.00  -0.00365  -0.00312  -0.00233  -0.00124   0.00000   0.00124   0.00233   0.00312   0.00365
                7.00  -0.00391  -0.00333  -0.00247  -0.00131   0.00000   0.00131   0.00247   0.00333   0.00391
               11.00  -0.01522  -0.01501  -0.01421  -0.01274   0.00000   0.01274   0.01421   0.01501   0.01521
               15.00  -0.00194  -0.00168  -0.00124  -0.00066   0.00000   0.00066   0.00124   0.00168   0.00194
               19.00  -0.00266  -0.00232  -0.00175  -0.00094   0.00000   0.00094   0.00175   0.00232   0.00266
               23.00  -0.00277  -0.00245  -0.00187  -0.00102   0.00000   0.00102   0.00187   0.00245   0.00277
               27.00  -0.00383  -0.00338  -0.00258  -0.00140   0.00000   0.00140   0.00258   0.00338   0.00383
               32.00  -0.00444  -0.00389  -0.00296  -0.00161   0.00000   0.00161   0.00296   0.00389   0.00444
               46.00  -0.00116  -0.00102  -0.00077  -0.00042   0.00000   0.00042   0.00077   0.00102   0.00116
               70.00  -0.00011  -0.00010  -0.00007  -0.00004   0.00000   0.00004   0.00007   0.00010   0.00011
              120.00   0.00045   0.00038   0.00028   0.00015   0.00000  -0.00015  -0.00028  -0.00038  -0.00045
              180.00   0.00000   0.00000   0.00000   0.00000   0.00000   0.00000   0.00000   0.00000   0.00000
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            </tableData>
          </table>
          </product>
        </function>
        <function name="aero/coefficient/CY_rudder">
          <description>CY increment from rudder (deg), over alpha</description>
          <product>
            <property>aero/qbar-psf</property>
            <property>metrics/Sw-sqft</property>
            <property>aero/function/mach-rudder</property>
          <table>
            <independentVar lookup="row">aero/alpha-deg</independentVar>
            <independentVar lookup="column">fcs/rudder-pos-deg</independentVar>
            <tableData>
                        -25.00    -20.00    -15.00    -10.00     -5.00      0.00      5.00     10.00     15.00     20.00     25.00
             -180.00   0.00000   0.00000   0.00000   0.00000   0.00000   0.00000   0.00000   0.00000   0.00000   0.00000   0.00000
             -120.00   0.00000   0.00000   0.00000   0.00000   0.00000   0.00000   0.00000   0.00000   0.00000   0.00000   0.00000
              -70.00  -0.00585  -0.00528  -0.00449  -0.00332  -0.00177   0.00000   0.00177   0.00332   0.00448   0.00527   0.00584
              -46.00  -0.01906  -0.01724  -0.01469  -0.01089  -0.00576   0.00000   0.00576   0.01089   0.01469   0.01724   0.01906
              -32.00  -0.01940  -0.01759  -0.01502  -0.01117  -0.00596   0.00000   0.00596   0.01117   0.01502   0.01759   0.01940
              -22.00  -0.02271  -0.02056  -0.01755  -0.01307  -0.00700   0.00000   0.00700   0.01307   0.01755   0.02056   0.02271
              -17.00  -0.02528  -0.02297  -0.01965  -0.01463  -0.00780   0.00000   0.00780   0.01463   0.01965   0.02297   0.02528
              -13.00  -0.02628  -0.02388  -0.02042  -0.01521  -0.00811   0.00000   0.00811   0.01521   0.02042   0.02388   0.02628
               -9.00  -0.02697  -0.02450  -0.02095  -0.01560  -0.00832   0.00000   0.00832   0.01560   0.02095   0.02450   0.02697
               -5.00  -0.02735  -0.02484  -0.02124  -0.01582  -0.00844   0.00000   0.00844   0.01582   0.02124   0.02484   0.02735
               -1.00  -0.02742  -0.02491  -0.02130  -0.01586  -0.00846   0.00000   0.00846   0.01586   0.02130   0.02491   0.02742
                3.00  -0.02720  -0.02471  -0.02113  -0.01574  -0.00839   0.00000   0.00839   0.01574   0.02113   0.02471   0.02720
                7.00  -0.02671  -0.02427  -0.02076  -0.01546  -0.00824   0.00000   0.00824   0.01546   0.02076   0.02427   0.02671
               11.00  -0.01466  -0.01214  -0.00862  -0.01472  -0.00789   0.00000   0.00789   0.01472   0.00864   0.01217   0.01471
               15.00  -0.02496  -0.02269  -0.01942  -0.01447  -0.00772   0.00000   0.00772   0.01447   0.01942   0.02269   0.02496
               19.00  -0.02291  -0.02082  -0.01782  -0.01328  -0.00709   0.00000   0.00709   0.01328   0.01782   0.02082   0.02291
               23.00  -0.02121  -0.01920  -0.01637  -0.01218  -0.00650   0.00000   0.00650   0.01218   0.01637   0.01920   0.02121
               27.00  -0.01989  -0.01802  -0.01538  -0.01144  -0.00610   0.00000   0.00610   0.01144   0.01538   0.01802   0.01989
               32.00  -0.01797  -0.01629  -0.01391  -0.01034  -0.00551   0.00000   0.00551   0.01034   0.01391   0.01629   0.01797
               46.00  -0.01820  -0.01648  -0.01405  -0.01038  -0.00549   0.00000   0.00549   0.01038   0.01405   0.01648   0.01820
               70.00  -0.00585  -0.00528  -0.00449  -0.00332  -0.00177   0.00000   0.00177   0.00332   0.00448   0.00527   0.00584
              120.00   0.00000   0.00000   0.00000   0.00000   0.00000   0.00000   0.00000   0.00000   0.00000   0.00000   0.00000
              180.00   0.00000   0.00000   0.00000   0.00000   0.00000   0.00000   0.00000   0.00000   0.00000   0.00000   0.00000
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            </tableData>
          </table>
          </product>
        </function>
        <function name="aero/coefficient/CYp">
          <description>CY per p (non-dimensional), over alpha</description>
          <product>
            <property>aero/qbar-psf</property>
            <property>metrics/Sw-sqft</property>
            <property>aero/bi2vel</property>
            <property>velocities/p-aero-rad_sec</property>
            <property>aero/function/mach-lift</property>
          <table>
            <independentVar lookup="row">aero/alpha-deg</independentVar>
            <tableData>
                 -180.00   -0.07660
                 -165.00   -0.04053
                 -105.00   -0.03011
                  -60.00   -0.03709
                  -42.00   -0.04368
                  -30.00   -0.04818
                  -20.00   -0.19837
                  -16.00   -0.03213
                  -12.00   -0.02655
                   -8.00   -0.02539
                   -4.00   -0.02562
                    0.00   -0.02863
                    4.00   -0.03349
                    8.00   -0.05136
                   12.00   -0.38846
                   16.00   -0.04933
                   20.00   -0.04849
                   24.00   -0.02753
                   28.00   -0.01252
                   35.00   -0.00331
                   50.00   -0.03124
                   80.00   -0.02913
                  135.00   -0.03728
                  180.00   -0.07660
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            </tableData>
          </table>
          </product>
        </function>
        <function name="aero/coefficient/CYr">
          <description>CY per r (non-dimensional), over alpha</description>
          <product>
            <property>aero/qbar-psf</property>
            <property>metrics/Sw-sqft</property>
            <property>aero/bi2vel</property>
            <property>velocities/r-aero-rad_sec</property>
            <property>aero/function/mach-lift</property>
          <table>
            <independentVar lookup="row">aero/alpha-deg</independentVar>
            <tableData>
                 -180.00    0.12476
                 -165.00    0.11792
                 -105.00    0.02177
                  -60.00    0.06288
                  -42.00    0.07298
                  -30.00    0.07490
                  -20.00    0.03756
                  -16.00    0.08022
                  -12.00    0.08691
                   -8.00    0.09486
                   -4.00    0.10182
                    0.00    0.10612
                    4.00    0.10665
                    8.00    0.10585
                   12.00   -0.02988
                   16.00    0.09768
                   20.00    0.07796
                   24.00    0.08593
                   28.00    0.08881
                   35.00    0.08880
                   50.00    0.08840
                   80.00    0.01751
                  135.00    0.07000
                  180.00    0.12476
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            </tableData>
          </table>
          </product>
        </function>
      </axis>
      <axis name="LIFT">
        <function name="aero/coefficient/CL_base">
          <description>CL over alpha and beta, ground effect, compressibility (hangar)</description>
          <product>
            <property>aero/qbar-psf</property>
            <property>metrics/Sw-sqft</property>
            <property>aero/function/CL-base</property>
            <property>aero/function/mach-lift</property>
          <table>
            <independentVar lookup="row">aero/h_b-mac-ft</independentVar>
            <tableData>
                    0.00    1.20000
                    0.10    1.08692
                    0.15    1.05730
                    0.20    1.03778
                    0.30    1.01642
                    0.40    1.00713
                    0.50    1.00310
                    0.60    1.00135
                    0.70    1.00059
                    0.80    1.00025
                    0.90    1.00011
                    1.00    1.00005
                    1.10    1.00000
            </tableData>
          </table>
          </product>
        </function>
        <function name="aero/coefficient/CL_elevator">
          <description>CL increment from elevator (deg), over alpha</description>
          <product>
            <property>aero/qbar-psf</property>
            <property>metrics/Sw-sqft</property>
            <property>aero/function/mach-elevator</property>
          <table>
            <independentVar lookup="row">aero/alpha-deg</independentVar>
            <independentVar lookup="column">fcs/elevator-pos-deg</independentVar>
            <tableData>
                        -25.00    -20.00    -15.00    -10.00     -5.00      0.00      5.00     10.00     15.00
             -180.00   0.00000   0.00000   0.00000   0.00000   0.00000   0.00000   0.00000   0.00000   0.00000
             -120.00  -0.01815  -0.01637  -0.01391  -0.01031  -0.00548   0.00000   0.00548   0.01031   0.01391
              -70.00  -0.00745  -0.00665  -0.00573  -0.00433  -0.00237   0.00000   0.00251   0.00484   0.00665
              -46.00  -0.02583  -0.02314  -0.02035  -0.01564  -0.00862   0.00000   0.00907   0.01719   0.02305
              -32.00  -0.03357  -0.03005  -0.02765  -0.02222  -0.01274   0.00000   0.01400   0.02664   0.03554
              -22.00  -0.03740  -0.03157  -0.03043  -0.02587  -0.01571   0.00000   0.01858   0.03559   0.04718
              -17.00  -0.05520  -0.04797  -0.04764  -0.04069  -0.02384   0.00000   0.02605   0.04983   0.06764
              -13.00  -0.09291  -0.08472  -0.07366  -0.05515  -0.02962   0.00000   0.03014   0.05677   0.07639
               -9.00  -0.09729  -0.08892  -0.07661  -0.05745  -0.03081   0.00000   0.03104   0.05833   0.07837
               -5.00  -0.10032  -0.09154  -0.07863  -0.05877  -0.03143   0.00000   0.03154   0.05918   0.07941
               -1.00  -0.10186  -0.09280  -0.07959  -0.05938  -0.03170   0.00000   0.03171   0.05942   0.07964
                3.00  -0.10229  -0.09308  -0.07974  -0.05942  -0.03168   0.00000   0.03159   0.05912   0.07914
                7.00  -0.10167  -0.09245  -0.07915  -0.05895  -0.03134   0.00000   0.03114   0.05819   0.07779
               11.00  -0.07675  -0.07151  -0.06316  -0.03617  -0.01402   0.00000   0.00818   0.01437   0.01841
               15.00  -0.05794  -0.04772  -0.03060  -0.05680  -0.03208   0.00000   0.03032   0.05510   0.07255
               19.00  -0.16030  -0.12579  -0.09261  -0.06066  -0.02877   0.00000   0.02630   0.04923   0.06665
               23.00  -0.09650  -0.08636  -0.07370  -0.05532  -0.02978   0.00000   0.03000   0.05582   0.07421
               27.00  -0.07563  -0.06964  -0.06033  -0.04535  -0.02428   0.00000   0.02396   0.04433   0.05896
               32.00  -0.05906  -0.05529  -0.04851  -0.03681  -0.01981   0.00000   0.01963   0.03631   0.04811
               46.00  -0.03586  -0.03319  -0.02880  -0.02160  -0.01151   0.00000   0.01129   0.02087   0.02767
               70.00  -0.01023  -0.00915  -0.00770  -0.00562  -0.00293   0.00000   0.00279   0.00514   0.00682
              120.00  -0.01815  -0.01637  -0.01391  -0.01031  -0.00548   0.00000   0.00548   0.01031   0.01391
              180.00   0.00000   0.00000   0.00000   0.00000   0.00000   0.00000   0.00000   0.00000   0.00000
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            </tableData>
          </table>
          </product>
        </function>
        <function name="aero/coefficient/CL_flap">
          <description>CL increment from flap (deg), over alpha</description>
          <product>
            <property>aero/qbar-psf</property>
            <property>metrics/Sw-sqft</property>
            <property>aero/function/mach-flap</property>
          <table>
            <independentVar lookup="row">aero/alpha-deg</independentVar>
            <independentVar lookup="column">fcs/flap-pos-deg</independentVar>
            <tableData>
                          0.00      5.00     10.00     15.00     20.00     25.00     30.00     35.00
             -180.00   0.00000   0.00000   0.00000   0.00000   0.00000   0.00000   0.00000   0.00000
             -120.00   0.00000   0.02324   0.04371   0.05897   0.06938   0.07693   0.08336   0.08965
              -70.00   0.00000   0.01705   0.03253   0.04437   0.05259   0.05863   0.06383   0.06896
              -46.00   0.00000   0.04738   0.08819   0.11631   0.13252   0.14153   0.14718   0.15175
              -32.00   0.00000   0.06606   0.12125   0.15655   0.17344   0.17834   0.17742   0.17394
              -22.00   0.00000   0.09470   0.17821   0.23730   0.27230   0.29072   0.30119   0.30947
              -17.00   0.00000   0.10907   0.22905   0.32560   0.39314   0.44152   0.48137   0.51803
              -13.00   0.00000   0.15837   0.29776   0.40027   0.46841   0.51584   0.55519   0.59383
               -9.00   0.00000   0.15978   0.29969   0.40193   0.46877   0.51461   0.55223   0.58871
               -5.00   0.00000   0.15957   0.29893   0.40045   0.46655   0.51166   0.54852   0.58416
               -1.00   0.00000   0.15845   0.29654   0.39683   0.46184   0.50594   0.54180   0.57642
                3.00   0.00000   0.15648   0.29246   0.39078   0.45410   0.49672   0.53117   0.56427
                7.00   0.00000   0.15075   0.27001   0.34677   0.39380   0.42515   0.45047   0.47468
               11.00   0.00000   0.12037   0.21186   0.28548   0.34557   0.39224   0.43017   0.46243
               15.00   0.00000   0.10457   0.19465   0.26177   0.31031   0.35182   0.40658   0.48191
               19.00   0.00000   0.09423   0.17414   0.23110   0.26859   0.29554   0.31897   0.34258
               23.00   0.00000   0.08683   0.16333   0.21933   0.25592   0.28112   0.30193   0.32197
               27.00   0.00000   0.07352   0.13712   0.18201   0.20981   0.22773   0.24180   0.25519
               32.00   0.00000   0.06002   0.11261   0.14966   0.17209   0.18591   0.19629   0.20608
               46.00   0.00000   0.03833   0.07190   0.09593   0.11094   0.12063   0.12826   0.13565
               70.00   0.00000   0.00999   0.01855   0.02480   0.02900   0.03201   0.03455   0.03701
              120.00   0.00000   0.03267   0.06143   0.08289   0.09753   0.10814   0.11718   0.12602
              180.00   0.00000   0.00000   0.00000   0.00000   0.00000   0.00000   0.00000   0.00000
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            </tableData>
          </table>
          <table>
            <independentVar lookup="row">aero/h_b-mac-ft</independentVar>
            <tableData>
                    0.00    1.20000
                    0.10    1.08692
                    0.15    1.05730
                    0.20    1.03778
                    0.30    1.01642
                    0.40    1.00713
                    0.50    1.00310
                    0.60    1.00135
                    0.70    1.00059
                    0.80    1.00025
                    0.90    1.00011
                    1.00    1.00005
                    1.10    1.00000
            </tableData>
          </table>
          </product>
        </function>
        <function name="aero/coefficient/CLq">
          <description>CL per q (non-dimensional), over alpha</description>
          <product>
            <property>aero/qbar-psf</property>
            <property>metrics/Sw-sqft</property>
            <property>aero/ci2vel</property>
            <property>velocities/q-aero-rad_sec</property>
            <property>aero/function/mach-lift</property>
          <table>
            <independentVar lookup="row">aero/alpha-deg</independentVar>
            <tableData>
                 -180.00   -2.57722
                 -165.00    0.01260
                 -105.00   -0.35361
                  -60.00    0.58279
                  -42.00    1.36687
                  -30.00    1.37640
                  -20.00   -2.09653
                  -16.00    3.75893
                  -12.00    7.05427
                   -8.00    7.92052
                   -4.00    8.04259
                    0.00    8.06714
                    4.00    8.08418
                    8.00    6.20862
                   12.00   -4.87046
                   16.00    1.68806
                   20.00    1.16959
                   24.00    0.87142
                   28.00    0.59485
                   35.00    1.45997
                   50.00    0.92989
                   80.00    0.24179
                  135.00   -0.77230
                  180.00   -2.57722
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            </tableData>
          </table>
          </product>
        </function>
        <function name="aero/coefficient/CLadot">
          <description>CL per alpha-dot (downwash lag at the tail)</description>
          <product>
            <property>aero/qbar-psf</property>
            <property>metrics/Sw-sqft</property>
            <property>aero/ci2vel</property>
            <property>aero/alphadot-rad_sec</property>
            <value>0.74461</value>
            <property>aero/function/mach-lift</property>
          </product>
        </function>
      </axis>
      <axis name="ROLL">
        <function name="aero/coefficient/Cl_base">
          <description>Cl over alpha and beta (hangar)</description>
          <product>
            <property>aero/qbar-psf</property>
            <property>metrics/Sw-sqft</property>
            <property>metrics/bw-ft</property>
            <property>aero/function/mach-side</property>
          <table>
            <independentVar lookup="row">aero/alpha-deg</independentVar>
            <independentVar lookup="column">aero/beta-deg</independentVar>
            <tableData>
                        -90.00    -70.00    -50.00    -40.00    -30.00    -25.00    -20.00    -15.00    -10.00     -6.00     -3.00      0.00      3.00      6.00     10.00     15.00     20.00     25.00     30.00     40.00     50.00     70.00     90.00
             -180.00   0.00179   0.00922   0.01377   0.01370   0.01204   0.01066   0.00896   0.00699   0.00537   0.00390   0.00201  -0.00000  -0.00201  -0.00390  -0.00537  -0.00699  -0.00896  -0.01066  -0.01204  -0.01370  -0.01377  -0.00922  -0.00179
             -120.00   0.00179   0.00531   0.00687   0.00658   0.00560   0.00489   0.00406   0.00313   0.00213   0.00134   0.00089  -0.00000  -0.00089  -0.00134  -0.00213  -0.00313  -0.00406  -0.00489  -0.00560  -0.00658  -0.00687  -0.00531  -0.00179
              -70.00   0.00179   0.00534   0.00685   0.00652   0.00553   0.00482   0.00399   0.00309   0.00214   0.00138   0.00087  -0.00000  -0.00087  -0.00138  -0.00214  -0.00309  -0.00399  -0.00482  -0.00553  -0.00652  -0.00685  -0.00534  -0.00179
              -46.00   0.00179   0.00449   0.00575   0.00555   0.00485   0.00434   0.00375   0.00312   0.00283   0.00177   0.00089  -0.00000  -0.00089  -0.00177  -0.00283  -0.00312  -0.00375  -0.00434  -0.00485  -0.00555  -0.00575  -0.00449  -0.00179
              -32.00   0.00179   0.00378   0.00481   0.00448   0.00241   0.00160   0.00128   0.00177   0.00124   0.00075   0.00037  -0.00000  -0.00037  -0.00075  -0.00124  -0.00177  -0.00128  -0.00160  -0.00241  -0.00448  -0.00481  -0.00378  -0.00179
              -22.00   0.00179   0.00207   0.00357   0.00286   0.00020  -0.00037   0.00021   0.00065   0.00047   0.00027   0.00013  -0.00000  -0.00013  -0.00027  -0.00047  -0.00065  -0.00021   0.00037  -0.00020  -0.00286  -0.00357  -0.00207  -0.00179
              -17.00   0.00179   0.00096  -0.00408  -0.00496  -0.00743  -0.00740  -0.00569  -0.00394  -0.00269  -0.00164  -0.00083  -0.00000   0.00083   0.00164   0.00269   0.00394   0.00569   0.00740   0.00743   0.00496   0.00408  -0.00096  -0.00179
              -13.00   0.00179   0.00686   0.01256   0.01022   0.00606   0.00477   0.00473   0.00415   0.00286   0.00175   0.00088  -0.00000  -0.00088  -0.00175  -0.00286  -0.00415  -0.00473  -0.00477  -0.00606  -0.01022  -0.01256  -0.00686  -0.00179
               -9.00   0.00179   0.01112   0.01404   0.01140   0.00846   0.00733   0.00696   0.00586   0.00404   0.00246   0.00124  -0.00000  -0.00124  -0.00246  -0.00404  -0.00586  -0.00696  -0.00733  -0.00846  -0.01140  -0.01404  -0.01112  -0.00179
               -5.00   0.00179   0.01130   0.01512   0.01300   0.01058   0.00964   0.00888   0.00735   0.00506   0.00308   0.00155  -0.00000  -0.00155  -0.00308  -0.00506  -0.00735  -0.00888  -0.00964  -0.01058  -0.01300  -0.01512  -0.01130  -0.00179
               -1.00   0.00179   0.01136   0.01500   0.01365   0.01261   0.01184   0.01073   0.00879   0.00605   0.00369   0.00186  -0.00000  -0.00186  -0.00369  -0.00605  -0.00879  -0.01073  -0.01184  -0.01261  -0.01365  -0.01500  -0.01136  -0.00179
                3.00   0.00179   0.01017   0.01471   0.01428   0.01474   0.01414   0.01258   0.01022   0.00703   0.00428   0.00216  -0.00000  -0.00216  -0.00428  -0.00703  -0.01022  -0.01258  -0.01414  -0.01474  -0.01428  -0.01471  -0.01017  -0.00179
                7.00   0.00179  -0.00112   0.00031   0.01250   0.01600   0.01571   0.01393   0.01128   0.00776   0.00472   0.00238  -0.00000  -0.00238  -0.00472  -0.00776  -0.01128  -0.01393  -0.01571  -0.01600  -0.01250  -0.00031   0.00112  -0.00179
               11.00   0.00179  -0.00480  -0.00770  -0.01418  -0.01579  -0.01564  -0.01592  -0.01550  -0.01551  -0.01559  -0.01541  -0.00000   0.01541   0.01559   0.01551   0.01550   0.01592   0.01564   0.01579   0.01418   0.00770   0.00480  -0.00179
               15.00   0.00179   0.00218   0.00273   0.00385   0.00623   0.00654   0.00625   0.00552   0.00384   0.00234   0.00118  -0.00000  -0.00118  -0.00234  -0.00384  -0.00552  -0.00625  -0.00654  -0.00623  -0.00385  -0.00273  -0.00218  -0.00179
               19.00   0.00179   0.00287   0.00364   0.00536   0.00749   0.00771   0.00722   0.00621   0.00431   0.00262   0.00132  -0.00000  -0.00132  -0.00262  -0.00431  -0.00621  -0.00722  -0.00771  -0.00749  -0.00536  -0.00364  -0.00287  -0.00179
               23.00   0.00179   0.00330   0.00420   0.00519   0.00764   0.00807   0.00785   0.00665   0.00456   0.00275   0.00138  -0.00000  -0.00138  -0.00275  -0.00456  -0.00665  -0.00785  -0.00807  -0.00764  -0.00519  -0.00420  -0.00330  -0.00179
               27.00   0.00179   0.00361   0.00460   0.00513   0.00675   0.00692   0.00661   0.00569   0.00401   0.00243   0.00122  -0.00000  -0.00122  -0.00243  -0.00401  -0.00569  -0.00661  -0.00692  -0.00675  -0.00513  -0.00460  -0.00361  -0.00179
               32.00   0.00179   0.00391   0.00500   0.00507   0.00542   0.00531   0.00496   0.00444   0.00317   0.00192   0.00096  -0.00000  -0.00096  -0.00192  -0.00317  -0.00444  -0.00496  -0.00531  -0.00542  -0.00507  -0.00500  -0.00391  -0.00179
               46.00   0.00179   0.00458   0.00588   0.00568   0.00488   0.00432   0.00369   0.00304   0.00268   0.00167   0.00084  -0.00000  -0.00084  -0.00167  -0.00268  -0.00304  -0.00369  -0.00432  -0.00488  -0.00568  -0.00588  -0.00458  -0.00179
               70.00   0.00179   0.00539   0.00692   0.00660   0.00559   0.00487   0.00404   0.00313   0.00216   0.00139   0.00088  -0.00000  -0.00088  -0.00139  -0.00216  -0.00313  -0.00404  -0.00487  -0.00559  -0.00660  -0.00692  -0.00539  -0.00179
              120.00   0.00179   0.00525   0.00677   0.00648   0.00551   0.00481   0.00399   0.00308   0.00209   0.00132   0.00088  -0.00000  -0.00088  -0.00132  -0.00209  -0.00308  -0.00399  -0.00481  -0.00551  -0.00648  -0.00677  -0.00525  -0.00179
              180.00   0.00179   0.00922   0.01377   0.01370   0.01204   0.01066   0.00896   0.00699   0.00537   0.00390   0.00201  -0.00000  -0.00201  -0.00390  -0.00537  -0.00699  -0.00896  -0.01066  -0.01204  -0.01370  -0.01377  -0.00922  -0.00179
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            </tableData>
          </table>
          </product>
        </function>
        <function name="aero/coefficient/Cl_aileron">
          <description>Cl increment from aileron (deg), over alpha</description>
          <product>
            <property>aero/qbar-psf</property>
            <property>metrics/Sw-sqft</property>
            <property>metrics/bw-ft</property>
            <property>aero/function/mach-aileron</property>
          <table>
            <independentVar lookup="row">aero/alpha-deg</independentVar>
            <independentVar lookup="column">fcs/left-aileron-pos-deg</independentVar>
            <tableData>
                        -20.00    -15.00    -10.00     -5.00      0.00      5.00     10.00     15.00     20.00
             -180.00   0.00000   0.00000   0.00000   0.00000   0.00000   0.00000   0.00000   0.00000   0.00000
              -35.00  -0.01311  -0.01225  -0.00973  -0.00537   0.00000   0.00537   0.00973   0.01225   0.01311
              -11.00  -0.06296  -0.05431  -0.04075  -0.02182   0.00000   0.02182   0.04075   0.05431   0.06296
                4.00  -0.06409  -0.05492  -0.04095  -0.02185   0.00000   0.02185   0.04095   0.05492   0.06409
               19.00  -0.03345  -0.02943  -0.02241  -0.01211   0.00000   0.01211   0.02241   0.02943   0.03345
               42.00  -0.00557  -0.00568  -0.00476  -0.00269   0.00000   0.00269   0.00476   0.00568   0.00557
              180.00   0.00000   0.00000   0.00000   0.00000   0.00000   0.00000   0.00000   0.00000   0.00000
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            </tableData>
          </table>
          </product>
        </function>
        <function name="aero/coefficient/Cl_rudder">
          <description>Cl increment from rudder (deg), over alpha</description>
          <product>
            <property>aero/qbar-psf</property>
            <property>metrics/Sw-sqft</property>
            <property>metrics/bw-ft</property>
            <property>aero/function/mach-rudder</property>
          <table>
            <independentVar lookup="row">aero/alpha-deg</independentVar>
            <independentVar lookup="column">fcs/rudder-pos-deg</independentVar>
            <tableData>
                        -25.00    -20.00    -15.00    -10.00     -5.00      0.00      5.00     10.00     15.00     20.00     25.00
             -180.00   0.00000   0.00000   0.00000   0.00000   0.00000   0.00000   0.00000   0.00000   0.00000   0.00000   0.00000
              -35.00  -0.00111  -0.00100  -0.00085  -0.00062  -0.00033   0.00000   0.00033   0.00062   0.00085   0.00100   0.00111
              -11.00  -0.00137  -0.00123  -0.00104  -0.00077  -0.00041   0.00000   0.00041   0.00077   0.00104   0.00123   0.00137
                4.00  -0.00143  -0.00128  -0.00108  -0.00080  -0.00042   0.00000   0.00042   0.00080   0.00108   0.00128   0.00143
               19.00  -0.00130  -0.00117  -0.00099  -0.00073  -0.00039   0.00000   0.00039   0.00073   0.00099   0.00117   0.00130
               42.00  -0.00106  -0.00096  -0.00081  -0.00060  -0.00032   0.00000   0.00032   0.00060   0.00081   0.00096   0.00106
              180.00   0.00000   0.00000   0.00000   0.00000   0.00000   0.00000   0.00000   0.00000   0.00000   0.00000   0.00000
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            </tableData>
          </table>
          </product>
        </function>
        <function name="aero/coefficient/Clp">
          <description>Cl per p (non-dimensional), over alpha</description>
          <product>
            <property>aero/qbar-psf</property>
            <property>metrics/Sw-sqft</property>
            <property>metrics/bw-ft</property>
            <property>aero/bi2vel</property>
            <property>velocities/p-aero-rad_sec</property>
            <property>aero/function/mach-lift</property>
          <table>
            <independentVar lookup="row">aero/alpha-deg</independentVar>
            <tableData>
                 -180.00   -0.54874
                 -165.00   -0.16437
                  -32.00   -0.18869
                  -10.00   -0.48100
                    5.00   -0.47783
                   20.00   -0.11496
                   46.00   -0.20778
                  180.00   -0.54874
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            </tableData>
          </table>
          </product>
        </function>
        <function name="aero/coefficient/Clr">
          <description>Cl per r (non-dimensional), over alpha</description>
          <product>
            <property>aero/qbar-psf</property>
            <property>metrics/Sw-sqft</property>
            <property>metrics/bw-ft</property>
            <property>aero/bi2vel</property>
            <property>velocities/r-aero-rad_sec</property>
            <property>aero/function/mach-lift</property>
          <table>
            <independentVar lookup="row">aero/alpha-deg</independentVar>
            <tableData>
                 -180.00    0.04187
                 -165.00    0.05421
                  -32.00   -0.09852
                  -10.00   -0.00177
                    5.00    0.15457
                   20.00    0.12331
                   46.00    0.11725
                  180.00    0.04187
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            </tableData>
          </table>
          </product>
        </function>
      </axis>
      <axis name="PITCH">
        <function name="aero/coefficient/Cm_base">
          <description>Cm over alpha and beta (hangar)</description>
          <product>
            <property>aero/qbar-psf</property>
            <property>metrics/Sw-sqft</property>
            <property>metrics/cbarw-ft</property>
          <table>
            <independentVar lookup="row">aero/alpha-deg</independentVar>
            <independentVar lookup="column">aero/beta-deg</independentVar>
            <tableData>
                        -90.00    -70.00    -50.00    -40.00    -30.00    -25.00    -20.00    -15.00    -10.00     -6.00     -3.00      0.00      3.00      6.00     10.00     15.00     20.00     25.00     30.00     40.00     50.00     70.00     90.00
             -180.00  -0.00000   0.01052   0.04364   0.06255   0.08027   0.08801   0.09470   0.10011   0.10543   0.10724   0.10728   0.10727   0.10728   0.10724   0.10543   0.10011   0.09470   0.08801   0.08027   0.06255   0.04364   0.01052  -0.00000
              -35.00  -0.00000   0.02673   0.10315   0.14583   0.18166   0.19582   0.20759   0.21677   0.22168   0.22446   0.22561   0.22599   0.22561   0.22446   0.22168   0.21677   0.20759   0.19582   0.18166   0.14583   0.10315   0.02673  -0.00000
              -11.00  -0.00000   0.02447   0.08230   0.07522   0.06913   0.07577   0.08139   0.08567   0.09064   0.09316   0.09418   0.09452   0.09418   0.09316   0.09064   0.08567   0.08139   0.07577   0.06913   0.07522   0.08230   0.02447  -0.00000
                4.00  -0.00000  -0.02306  -0.06217  -0.04520  -0.03928  -0.04624  -0.05385  -0.05731  -0.05888  -0.05987  -0.06033  -0.06045  -0.06033  -0.05987  -0.05888  -0.05731  -0.05385  -0.04624  -0.03928  -0.04520  -0.06217  -0.02306  -0.00000
               19.00  -0.00000  -0.02541  -0.09468  -0.15086  -0.20391  -0.21967  -0.23776  -0.25008  -0.25907  -0.26359  -0.26547  -0.26609  -0.26547  -0.26359  -0.25907  -0.25008  -0.23776  -0.21967  -0.20391  -0.15086  -0.09468  -0.02541  -0.00000
               42.00  -0.00000  -0.03634  -0.13815  -0.19668  -0.24605  -0.26562  -0.28157  -0.29582  -0.30152  -0.30356  -0.30440  -0.30467  -0.30440  -0.30356  -0.30152  -0.29582  -0.28157  -0.26562  -0.24605  -0.19668  -0.13815  -0.03634  -0.00000
              180.00  -0.00000   0.01052   0.04364   0.06255   0.08027   0.08801   0.09470   0.10011   0.10543   0.10724   0.10728   0.10727   0.10728   0.10724   0.10543   0.10011   0.09470   0.08801   0.08027   0.06255   0.04364   0.01052  -0.00000
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            </tableData>
          </table>
          </product>
        </function>
        <function name="aero/coefficient/Cm_mach">
          <description>Cm from the neutral point's move with Mach</description>
          <product>
            <property>aero/qbar-psf</property>
            <property>metrics/Sw-sqft</property>
            <property>metrics/cbarw-ft</property>
            <property>aero/function/CL-base</property>
            <property>aero/function/mach-dCm-dCL</property>
          </product>
        </function>
        <function name="aero/coefficient/Cm_elevator">
          <description>Cm increment from elevator (deg), over alpha</description>
          <product>
            <property>aero/qbar-psf</property>
            <property>metrics/Sw-sqft</property>
            <property>metrics/cbarw-ft</property>
            <property>aero/function/mach-elevator</property>
          <table>
            <independentVar lookup="row">aero/alpha-deg</independentVar>
            <independentVar lookup="column">fcs/elevator-pos-deg</independentVar>
            <tableData>
                        -25.00    -20.00    -15.00    -10.00     -5.00      0.00      5.00     10.00     15.00
             -180.00  -0.00040  -0.00026  -0.00015  -0.00007  -0.00002   0.00000  -0.00002  -0.00007  -0.00015
              -35.00   0.05254   0.04639   0.04217   0.03331   0.01858   0.00000  -0.01879  -0.03364  -0.04122
              -11.00   0.20745   0.18861   0.16172   0.12026   0.06438   0.00000  -0.06456  -0.12108  -0.16247
                4.00   0.21849   0.19832   0.16950   0.12610   0.06717   0.00000  -0.06700  -0.12552  -0.16836
               19.00   0.35619   0.28336   0.21055   0.13905   0.06679   0.00000  -0.06306  -0.11932  -0.16273
               42.00   0.04223   0.04476   0.04318   0.03516   0.01994   0.00000  -0.02135  -0.04063  -0.05495
              180.00  -0.00040  -0.00026  -0.00015  -0.00007  -0.00002   0.00000  -0.00002  -0.00007  -0.00015
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            </tableData>
          </table>
          </product>
        </function>
        <function name="aero/coefficient/Cm_flap">
          <description>Cm increment from flap (deg), over alpha</description>
          <product>
            <property>aero/qbar-psf</property>
            <property>metrics/Sw-sqft</property>
            <property>metrics/cbarw-ft</property>
            <property>aero/function/mach-flap</property>
          <table>
            <independentVar lookup="row">aero/alpha-deg</independentVar>
            <independentVar lookup="column">fcs/flap-pos-deg</independentVar>
            <tableData>
                          0.00      5.00     10.00     15.00     20.00     25.00     30.00     35.00
             -180.00   0.00000   0.00005   0.00019   0.00042   0.00074   0.00113   0.00158   0.00207
              -35.00   0.00000  -0.00947  -0.01725  -0.02192  -0.02357  -0.02323  -0.02180  -0.01976
              -11.00   0.00000  -0.00737  -0.01444  -0.02037  -0.02506  -0.02907  -0.03303  -0.03740
                4.00   0.00000  -0.00808  -0.01546  -0.02137  -0.02585  -0.02948  -0.03283  -0.03619
               19.00   0.00000  -0.00567  -0.00938  -0.01112  -0.01134  -0.01053  -0.00904  -0.00710
               42.00   0.00000  -0.00385  -0.00740  -0.00967  -0.01064  -0.01087  -0.01090  -0.01102
              180.00   0.00000   0.00005   0.00019   0.00042   0.00074   0.00113   0.00158   0.00207
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            </tableData>
          </table>
          </product>
        </function>
        <function name="aero/coefficient/Cmq">
          <description>Cm per q (non-dimensional), over alpha</description>
          <product>
            <property>aero/qbar-psf</property>
            <property>metrics/Sw-sqft</property>
            <property>metrics/cbarw-ft</property>
            <property>aero/ci2vel</property>
            <property>velocities/q-aero-rad_sec</property>
            <property>aero/function/mach-lift</property>
          <table>
            <independentVar lookup="row">aero/alpha-deg</independentVar>
            <tableData>
                 -180.00   -6.28391
                 -165.00   -0.20095
                  -32.00   -3.19930
                  -10.00   -5.87786
                    5.00   -6.74305
                   20.00   -2.34202
                   46.00   -4.23172
                  180.00   -6.28391
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            </tableData>
          </table>
          </product>
        </function>
        <function name="aero/coefficient/Cmadot">
          <description>Cm per alpha-dot (downwash lag at the tail)</description>
          <product>
            <property>aero/qbar-psf</property>
            <property>metrics/Sw-sqft</property>
            <property>metrics/cbarw-ft</property>
            <property>aero/ci2vel</property>
            <property>aero/alphadot-rad_sec</property>
            <value>-1.72349</value>
            <property>aero/function/mach-lift</property>
          </product>
        </function>
      </axis>
      <axis name="YAW">
        <function name="aero/coefficient/Cn_base">
          <description>Cn over alpha and beta (hangar)</description>
          <product>
            <property>aero/qbar-psf</property>
            <property>metrics/Sw-sqft</property>
            <property>metrics/bw-ft</property>
            <property>aero/function/mach-side</property>
          <table>
            <independentVar lookup="row">aero/alpha-deg</independentVar>
            <independentVar lookup="column">aero/beta-deg</independentVar>
            <tableData>
                        -90.00    -70.00    -50.00    -40.00    -30.00    -25.00    -20.00    -15.00    -10.00     -6.00     -3.00      0.00      3.00      6.00     10.00     15.00     20.00     25.00     30.00     40.00     50.00     70.00     90.00
             -180.00  -0.01243  -0.01476  -0.01463  -0.01331  -0.01108  -0.00965  -0.00801  -0.00620  -0.00715  -0.00752  -0.00402  -0.00000   0.00402   0.00752   0.00715   0.00620   0.00801   0.00965   0.01108   0.01331   0.01463   0.01476   0.01243
              -35.00  -0.01243  -0.00901  -0.00512  -0.00335  -0.00237  -0.00235  -0.00286  -0.00574  -0.00395  -0.00232  -0.00115  -0.00000   0.00115   0.00232   0.00395   0.00574   0.00286   0.00235   0.00237   0.00335   0.00512   0.00901   0.01243
              -11.00  -0.01243  -0.01107  -0.00846  -0.00629  -0.00569  -0.00623  -0.00938  -0.00852  -0.00584  -0.00354  -0.00177  -0.00000   0.00177   0.00354   0.00584   0.00852   0.00938   0.00623   0.00569   0.00629   0.00846   0.01107   0.01243
                4.00  -0.01243  -0.00739  -0.00259  -0.00247  -0.00341  -0.00444  -0.00778  -0.00727  -0.00500  -0.00303  -0.00151  -0.00000   0.00151   0.00303   0.00500   0.00727   0.00778   0.00444   0.00341   0.00247   0.00259   0.00739   0.01243
               19.00  -0.01243  -0.00894  -0.00532  -0.00385  -0.00351  -0.00407  -0.00639  -0.00653  -0.00455  -0.00273  -0.00136  -0.00000   0.00136   0.00273   0.00455   0.00653   0.00639   0.00407   0.00351   0.00385   0.00532   0.00894   0.01243
               42.00  -0.01243  -0.00907  -0.00492  -0.00312  -0.00197  -0.00180  -0.00200  -0.00333  -0.00390  -0.00230  -0.00115  -0.00000   0.00115   0.00230   0.00390   0.00333   0.00200   0.00180   0.00197   0.00312   0.00492   0.00907   0.01243
              180.00  -0.01243  -0.01476  -0.01463  -0.01331  -0.01108  -0.00965  -0.00801  -0.00620  -0.00715  -0.00752  -0.00402  -0.00000   0.00402   0.00752   0.00715   0.00620   0.00801   0.00965   0.01108   0.01331   0.01463   0.01476   0.01243
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            </tableData>
          </table>
          </product>
        </function>
        <function name="aero/coefficient/Cn_aileron">
          <description>Cn increment from aileron (deg), over alpha</description>
          <product>
            <property>aero/qbar-psf</property>
            <property>metrics/Sw-sqft</property>
            <property>metrics/bw-ft</property>
            <property>aero/function/mach-aileron</property>
          <table>
            <independentVar lookup="row">aero/alpha-deg</independentVar>
            <independentVar lookup="column">fcs/left-aileron-pos-deg</independentVar>
            <tableData>
                        -20.00    -15.00    -10.00     -5.00      0.00      5.00     10.00     15.00     20.00
             -180.00  -0.00000  -0.00000  -0.00000  -0.00000   0.00000  -0.00000  -0.00000  -0.00000  -0.00000
              -35.00   0.02120   0.01784   0.01313   0.00696   0.00000  -0.00696  -0.01313  -0.01784  -0.02120
              -11.00   0.00922   0.00787   0.00586   0.00312   0.00000  -0.00312  -0.00586  -0.00787  -0.00922
                4.00  -0.00079  -0.00066  -0.00048  -0.00025   0.00000   0.00025   0.00048   0.00066   0.00079
               19.00  -0.01805  -0.01503  -0.01096  -0.00578   0.00000   0.00578   0.01096   0.01503   0.01805
               42.00  -0.01894  -0.01599  -0.01180  -0.00626   0.00000   0.00626   0.01180   0.01599   0.01894
              180.00  -0.00000  -0.00000  -0.00000  -0.00000   0.00000  -0.00000  -0.00000  -0.00000  -0.00000
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            </tableData>
          </table>
          </product>
        </function>
        <function name="aero/coefficient/Cn_rudder">
          <description>Cn increment from rudder (deg), over alpha</description>
          <product>
            <property>aero/qbar-psf</property>
            <property>metrics/Sw-sqft</property>
            <property>metrics/bw-ft</property>
            <property>aero/function/mach-rudder</property>
          <table>
            <independentVar lookup="row">aero/alpha-deg</independentVar>
            <independentVar lookup="column">fcs/rudder-pos-deg</independentVar>
            <tableData>
                        -25.00    -20.00    -15.00    -10.00     -5.00      0.00      5.00     10.00     15.00     20.00     25.00
             -180.00  -0.00000  -0.00000  -0.00000  -0.00000  -0.00000   0.00000  -0.00000  -0.00000  -0.00000  -0.00000  -0.00000
              -35.00   0.00519   0.00471   0.00401   0.00298   0.00159   0.00000  -0.00159  -0.00298  -0.00401  -0.00471  -0.00519
              -11.00   0.00728   0.00661   0.00564   0.00420   0.00224   0.00000  -0.00224  -0.00420  -0.00564  -0.00661  -0.00728
                4.00   0.00783   0.00710   0.00607   0.00452   0.00241   0.00000  -0.00241  -0.00452  -0.00607  -0.00710  -0.00783
               19.00   0.00644   0.00585   0.00500   0.00372   0.00198   0.00000  -0.00198  -0.00372  -0.00500  -0.00585  -0.00644
               42.00   0.00505   0.00457   0.00389   0.00288   0.00153   0.00000  -0.00153  -0.00288  -0.00389  -0.00457  -0.00505
              180.00  -0.00000  -0.00000  -0.00000  -0.00000  -0.00000   0.00000  -0.00000  -0.00000  -0.00000  -0.00000  -0.00000
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            </tableData>
          </table>
          </product>
        </function>
        <function name="aero/coefficient/Cnp">
          <description>Cn per p (non-dimensional), over alpha</description>
          <product>
            <property>aero/qbar-psf</property>
            <property>metrics/Sw-sqft</property>
            <property>metrics/bw-ft</property>
            <property>aero/bi2vel</property>
            <property>velocities/p-aero-rad_sec</property>
            <property>aero/function/mach-lift</property>
          <table>
            <independentVar lookup="row">aero/alpha-deg</independentVar>
            <tableData>
                 -180.00   -0.00321
                 -165.00    0.01306
                  -32.00    0.01183
                  -10.00    0.10702
                    5.00   -0.10711
                   20.00    0.01689
                   46.00    0.00754
                  180.00   -0.00321
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            </tableData>
          </table>
          </product>
        </function>
        <function name="aero/coefficient/Cnr">
          <description>Cn per r (non-dimensional), over alpha</description>
          <product>
            <property>aero/qbar-psf</property>
            <property>metrics/Sw-sqft</property>
            <property>metrics/bw-ft</property>
            <property>aero/bi2vel</property>
            <property>velocities/r-aero-rad_sec</property>
            <property>aero/function/mach-lift</property>
          <table>
            <independentVar lookup="row">aero/alpha-deg</independentVar>
            <tableData>
                 -180.00   -0.03478
                 -165.00   -0.03665
                  -32.00   -0.02022
                  -10.00   -0.03726
                    5.00   -0.03153
                   20.00   -0.01217
                   46.00   -0.02737
                  180.00   -0.03478
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            </tableData>
          </table>
          </product>
        </function>
      </axis>
    </aerodynamics>
</fdm_config>
